<?xml version="1.0"?>
<!-- Generated by Aero-Matic v 1.1

     Inputs:
                horsepower: 130
                     pitch: fixed
            max engine rpm: 1800
        prop diameter (ft): 9.3305078

     Outputs:
              max prop rpm: 2010.93
                gear ratio:    0.90
                       Cp0: 0.011294
                       Ct0: 0.015811
       static thrust (lbs):  342.97
-->

<propeller name="prop">
  <!-- <ixx>  22.01 </ixx> -->
  <ixx>  5.5 </ixx><!-- rotary engine has somewhat higher rotational inertia than plain propellor -->
  <diameter unit="IN"> 112.0 </diameter>
  <numblades> 2 </numblades>
  <gearratio>  .9</gearratio>
  <!-- <p_factor>   8.85 </p_factor> -->
  <p_factor>   8.85 </p_factor>
  <!-- <ct_factor> 19.1</ct_factor>
  <cp_factor> 10.5</cp_factor> -->

  <table name="C_THRUST" type="internal">
     <tableData>
       0.0   0.0172
       0.1   0.0165
       0.2   0.0158
       0.3   0.0145
       0.4   0.0131
       0.5   0.0115
       0.6   0.0093
       0.7   0.0071
       0.8   0.0038
       1.0  -0.0013
       1.2  -0.0068
       1.4  -0.0122
     </tableData>
  </table>


  <table name="C_POWER" type="internal">
     <tableData>
       0.0   0.0116
       0.1   0.0116
       0.2   0.0113
       0.3   0.0110
       0.4   0.0104
       0.5   0.0095
       0.6   0.0087
       0.7   0.0073
       0.8   0.0060
       1.0   0.0021
       1.2  -0.0034
       1.4  -0.0103
       1.6  -0.0175
     </tableData>
  </table>

<!-- thrust effects of helical tip Mach -->
<table name="CT_MACH" type="internal">
  <tableData>
    0.85   1.0
    1.05   0.8
  </tableData>
</table>

<!-- power-required effects of helical tip Mach -->
<table name="CP_MACH" type="internal">
  <tableData>
    0.85   1.0
    1.05   1.8
    2.00   1.4
  </tableData>
</table>

</propeller>
