<?xml version="1.0"?>
<!-- Generated by Aero-Matic v 1.1

     Inputs:
                horsepower: 130
                     pitch: fixed
            max engine rpm: 1800
        prop diameter (ft): 9.3305078

     Outputs:
              max prop rpm: 2010.93
                gear ratio:    0.90
                       Cp0: 0.011294
                       Ct0: 0.015811
       static thrust (lbs):  342.97

       Sopwith-specific experimental data on a prop/engine is available here, though it is a bit hard to convert between the various units and power & torque
       measurement systems:
       http://naca.central.cranfield.ac.uk/reports/arc/rm/448.pdf
-->

<propeller name="prop" version="1.1">  <!-- ver="1.1" fixes the 'sense' issue we've been having with gyroscopic moment, per https://sourceforge.net/p/jsbsim/bugs/110/ -->
  <!--NOTE: 1 (slug * (ft^2)) = 1.35581795 kg * (m^2) -->
  <!-- <ixx>  22.01 </ixx> --> <!-- Aero-Matic generated amount based on 70 lb prop only -->
  <!-- <ixx>  38.01 </ixx> --><!-- first WAG based on performance.  Ver 1.6, 5/6/2013, I'm going back to this because it seems to fit descriptions of performance and characteristics best.  I'm not sure if it if the best estimate or if it just fits in best with various other modelling and design decisions. -->
  <!-- Prop is 18kg per http://books.google.com/books?id=dM8qAAAAMAAJ&pg=PA791&lpg=PA791&dq=sopwith+camel+%22weight+of+wings%22&source=bl&ots=uQJawBEvdL&sig=ectotxNiSI9A0GR-QleJJ3QOYRY&hl=en&ei=eLvCTpiJJZGpsALDqcSLCw&sa=X&oi=book_result&ct=result&resnum=1&ved=0CBoQ6AEwAA#v=onepage&q=sopwith%20camel%20%22weight%20of%20wings%22&f=false
  That equals 39.7 pounds and leads to the calculation below.-->
  <!-- <ixx unit="KG*M2">  29.18 </ixx> --> <!-- for 1.7, let's try this; more or less half way beween 20.18 which seems too low & 38.01 which might be too high -->
  <!-- <ixx unit="KG*M2">  20.18 </ixx> --> <!-- See calculation spreadsheet - 12.14 for 18kg prop plus 8.04 for 381 lb clerget (much heavier but also much closer to the center of rotation in than the prop). This is in metric units, kg-m^2.  The rotary engine nearly doubles the moment of inertia compared with inline engine & prop. -->
  <!-- <ixx unit="KG*M2">  8.47 </ixx> --> <!-- "Rough estimate" per one of the historical docs -->
  <!-- Ver 2.0alpha, going with the 12.47 value for now because it provides n-prop-lbsft values that seem in line with those reported in the Calculated Camel article which reports: For the turn rates we saw in our experiments - which were probably close to the greatest rate that a Camel could maintain continuously for a long time - the moment was about 300 pound-feet. The tail moment arm is around 11 feet, so a tail force of 27 pounds or so would be needed to balance it. That should be well within the capability of the tail at the 70-knot airspeed required to maintain, say, a 3G turn, but it might require significant control-surface deflections. -->
  <!-- Ver 2.0alpha1, using the 20.18 value again, after realizing the Calculated Camel article almost exactly matches data for the engine (8.04 - see above) but we also need to include the prop (12.14).  -->
  <!-- Ver 2.0alpha2, back to 12.47, after re-reading the article and realizing they did indeed include the prop.  Plus, the a/c is just uncontrollable with 20.18 - larger control surfaces would be required to counteract that much gyro, for sure.  -->
  <!-- <ixx unit="KG*M2">  8.47 </ixx> --> <!-- This gives a moment in ftlb about what the Calculated Camel article measures (300 ftlb for a turn rate that could be reasonably sustained) -->
  <ixx unit="KG*M2">  8.47 </ixx> <!-- 2.1alpha, 9/2023, trying to reduce this by just a little to
  see it if makes the a/c a bit more flyable -->

  <diameter unit="IN"> 112.0 </diameter>
  <numblades> 2 </numblades>
  <gearratio>  1.0 </gearratio>

  <!-- As generated by Aeromatic: -->
  <!-- <p_factor>   8.85 </p_factor> -->

  <!-- The WWI era rotaries were really big engines, over 800 cu. in. so lots of torque. They had a nearly square pitch/diameter ratio that added a lot P-factor too.  http://www.rcgroups.com/forums/archive/index.php/t-789213.html  -->
 <!--  <p_factor>   19 </p_factor> -->
  <!-- Setting p_factor=0 was evidently an experiment? -->
  <!--   <p_factor>   0 </p_factor> -->

    <!-- As a WAG, let's assume about 1 1/3 X the value calculated by Aeromatic? -->
    <!-- <p_factor>   11.85 </p_factor> -->

    <!-- per David Culp it is about 0.079 * prop diameter in inches.  So 0.079*9.33*12 = 8.845 - so that must be what they use in Aeromatic.  So this might not take into consideration the high pitch/diameter ratio, though.  https://sourceforge.net/p/jsbsim/mailman/jsbsim-devel/thread/005001cbc48f$491ebdf0$db5c39d0$@net/ "JSBSim has a framework for modeling P-factor, using the <p_factor> item in the propeller configuration.  Units are inches per radian, where the inches are the distance the thrust line is offset, and radians are angle of attack." -->
    <p_factor>   17.85 </p_factor>
  <!-- <ct_factor> 1</ct_factor> -->
  <!-- <cp_factor> 1</cp_factor> -->

  <!--  -->
   <!-- best climbing speed of 70mph=60 kt and 16.66 fps climb, 1150 RPM (J=.5358)-->
   <!-- max speed of 115 kts, level flight, 130 hp, 1250 RPM (J=.976) -->
   <!-- Additional factor: Starting about 4-5MPH on a grassy runway,
   at full throttle the Camel will be airborn in about 6.9 seconds, or
   approx 7 AC lengths
   See: http://www.youtube.com/watch?v=VT9wtDNiKaI  -->

  <table name="C_THRUST" type="internal">
<!--     <tableData>

		0	   0.092
		0.01   0.092
		0.1    0.08716
		0.2    0.08188
		0.3    0.07744
		0.4    0.073
		0.5    0.0694
		0.5358 0.06768
		0.64   0.065
		0.8    0.06
		0.976  0.052013
		1.03   0.04536
		1.1    0.03312
		1.2    0.0144
		1.3   -0.0216
		1.5   -0.0864
		1.7   -0.18
		1.9   -0.36
		2     -0.72
		3     -0.72
		5     -0.72

     </tableData>
  -->
<!-- 1.3 trial, this gave perfect match with the 10,000 climb rates chart, but the lift/drag are not giving 48 MPH stall speed, so we need to recalc    <tableData>
0	0.112
0.01	0.111
0.1	0.11
0.2	0.1
0.3	0.09
0.4	0.08
0.5	0.07
0.5358	0.06
0.64	0.05
0.8	0.04
0.976	0.03120768
1.03	0.027216
1.1	0.019872
1.2	0.00864
1.3	-0.01296
1.5	-0.05184
1.7	-0.108
1.9	-0.216
2	-0.432
3	-0.432
5	-0.432
    </tableData> -->
<!-- 1.3, we are trying increased thrust at climb speed to match the10,000 ft climb rate table, with the lift/drag numbers that give 48 MPH stall.  Req more thrust at reduced RPMS

See calculations at Camel-JSBSim-calcs-2011-10D.xls, C_THRUST, C_POWER

-->
<!-- ver 1.8: this gives TAS 99.9 @ sea level -->
<!--
    <tableData>
        0	0.097
        0.1	0.095
        0.2	0.09
        0.3	0.08
        0.4	0.07
        0.5	0.066
        0.5657	0.063
        0.68	0.052
        0.8	0.044081633
        0.8611	0.042122449
        0.976	0.031630189
        1.04	0.028
        1.1	0.023
        1.2	0.013
        1.3	-0.01
        1.5	-0.08
        1.7	-0.19
        1.9	-0.432
        2	-0.432
        3	-2
        5	-10
    </tableData>

 -->
    <!-- ver 2.0 trial 1 -->
    <!--
    <tableData>
        0	0.097
        0.01	0.095
        0.1	0.09
        0.2	0.08
        0.3	0.07
        0.4	0.066
        0.5358	0.062
        0.5657	0.061
        0.64	0.057
        0.8	0.050546939
        0.976	0.036
        1.03	0.03
        1.1	0.024
        1.2	0.013
        1.3	-0.01
        1.5	-0.08
        1.7	-0.19
        1.9	-0.432
        2	-0.522
        3	-2
        5	-10
    </tableData>
    -->
    <!-- ver 2.0 trial 4 -->
    <!--
    <tableData>
        0	0.097
        0.1	0.095
        0.2	0.09
        0.3	0.08
        0.4	0.07
        0.5	0.066
        0.5657	0.063
        0.68	0.052
        0.8	0.047081633
        0.8611	0.044521224
        0.976	0.032530189
        1.04	0.028
        1.1	0.023
        1.2	0.013
        1.3	-0.01
        1.5	-0.08
        1.7	-0.19
        1.9	-0.432
        2	-0.522
        3	-2
        5	-10
    </tableData>
    -->

    <!-- ver 2.0 trial 5 -->
    <!--
    <tableData>

        0	0.097
        0.1	0.095
        0.2	0.09
        0.3	0.08
        0.4	0.07
        0.5	0.066
        0.5657	0.063
        0.68	0.057
        0.8	0.051081633
        0.8611	0.044521224
        0.976	0.032530189
        1.04	0.028
        1.1	0.023
        1.2	0.013
        1.3	-0.01
        1.5	-0.08
        1.7	-0.19
        1.9	-0.432
        2	-0.522
        3	-2
        5	-10
    </tableData>

    -->

    <!-- ver 2.0 trial 6 - Airspeed @ 6500, 10000, 15000 matches quite well, but climb time to 6500, 10000, 15000 is a bit too fast -->
    <!--
    <tableData>


        0	0.097
        0.1	0.095
        0.2	0.09
        0.3	0.085
        0.4	0.08
        0.5	0.076
        0.5657	0.072
        0.68	0.065
        0.8	0.056081633
        0.8611	0.049521224
        0.976	0.034530189
        1.04	0.028
        1.1	0.023
        1.2	0.013
        1.3	-0.01
        1.5	-0.08
        1.7	-0.19
        1.9	-0.432
        2	-0.522
        3	-2
        5	-10

    </tableData>

    -->
    <!-- ver 2.0 trial 11 : too fast to 6500, 10000, by a little, and 15000 by maybe 50%-->
    <!--
    <tableData>

        0	0.11
        0.1	0.105
        0.2	0.1
        0.3	0.095
        0.4	0.09
        0.5	0.085
        0.5657	0.081
        0.6	0.075
        0.68	0.06
        0.8	0.056081633
        0.83	0.0536
        0.8611	0.049521224
        0.976	0.034530189
        1.04	0.028
        1.1	0.023
        1.2	0.013
        1.3	-0.01
        1.5	-0.08
        1.7	-0.19
        1.9	-0.432
        2	-0.522
        3	-2
        5	-10


    </tableData>
    -->
    <!-- ver 2.0 trial 12 : Slightly too slow climbing to 6500, slightly too fast to 10000 and 150000 -->
    <!--

    <tableData>

      0	0.11
      0.1	0.105
      0.2	0.1
      0.3	0.095
      0.4	0.09
      0.5	0.08
      0.5657	0.075
      0.6	0.07
      0.72	0.056
      0.8	0.054
      0.83	0.0536
      0.8611	0.049521224
      0.976	0.034530189
      1.04	0.028
      1.1	0.023
      1.2	0.013
      1.3	-0.01
      1.5	-0.08
      1.7	-0.19
      1.9	-0.432
      2	-0.522
      3	-2
      5	-10


    </tableData>
    -->
    <!-- ver 2.0 trial 13 :  This is PRETTY good.  Slightly too long to 6500, slightly too short 6500 to 10K, slightly to long 10K to 15K  -->

    <!--
    <tableData>

        0	0.12
        0.1	0.115
        0.2	0.11
        0.3	0.105
        0.4	0.1
        0.5	0.09
        0.5657	0.08
        0.6	0.07
        0.68	0.056
        0.8	0.054
        0.83	0.0536
        0.8611	0.049521224
        0.976	0.034530189
        1.04	0.028
        1.1	0.023
        1.2	0.013
        1.3	-0.01
        1.5	-0.08
        1.7	-0.19
        1.9	-0.432
        2	-0.522
        3	-2
        5	-10


    </tableData>

    -->

    <!-- ver 2.0 trial 14  -->

    <tableData>

      0	0.12
      0.1	0.115
      0.2	0.11
      0.3	0.105
      0.4	0.1
      0.5	0.09
      0.5657	0.0825
      0.6	0.0675
      0.69	0.057
      0.8	0.054
      0.83	0.0536
      0.8611	0.049521224
      0.976	0.034530189
      1.04	0.028
      1.1	0.023
      1.2	0.013
      1.3	-0.01
      1.5	-0.08
      1.7	-0.19
      1.9	-0.432
      2	-0.522
      3	-2
      5	-10

    </tableData>

    <!-- ver 2.0 trial 7 - too slow up to 10,000 then too fast 10K to 15K -->
    <!--
    <tableData>

        0	0.097
        0.1	0.095
        0.2	0.09
        0.3	0.085
        0.4	0.08
        0.5	0.076
        0.5657	0.072
        0.68	0.065
        0.8	0.056081633
        0.8611	0.049521224
        0.976	0.034530189
        1.04	0.028
        1.1	0.023
        1.2	0.013
        1.3	-0.01
        1.5	-0.08
        1.7	-0.19
        1.9	-0.432
        2	-0.522
        3	-2
        5	-10

    </tableData>
    -->

    <!-- ver 2.0 trial 8 - still too slow climbing to 6500 ft by almost 1 minute.  That is J = .56-.59 approx. -->
    <!--
    <tableData>

        0	0.093
        0.1	0.09
        0.2	0.085
        0.3	0.081
        0.4	0.078
        0.5	0.075
        0.5657	0.071
        0.58	0.069
        0.59	0.068
        0.63	0.064
        0.68	0.063
        0.8	0.056081633
        0.8611	0.049521224
        0.976	0.034530189
        1.04	0.028
        1.1	0.023
        1.2	0.013
        1.3	-0.01
        1.5	-0.08
        1.7	-0.19
        1.9	-0.432
        2	-0.522
        3	-2
        5	-10


    </tableData>
    -->
    <!-- ver 2.0 trial 9 -->
    <!--
    <tableData>
      0	0.093
      0.1	0.09
      0.2	0.085
      0.3	0.081
      0.4	0.078
      0.5	0.076
      0.5657	0.0715
      0.58	0.07
      0.59	0.068
      0.63	0.064
      0.68	0.063
      0.8	0.056081633
      0.8611	0.049521224
      0.976	0.034530189
      1.04	0.028
      1.1	0.023
      1.2	0.013
      1.3	-0.01
      1.5	-0.08
      1.7	-0.19
      1.9	-0.432
      2	-0.522
      3	-2
      5	-10
    </tableData>
    -->

    <!-- ver 2.0 trial 10 -->
    <!--
    <tableData>

      0	0.097
      0.1	0.095
      0.2	0.09
      0.3	0.085
      0.4	0.08
      0.5	0.079
      0.5657	0.072
      0.58	0.07
      0.59	0.069
      0.63	0.068
      0.68	0.065
      0.8	0.056081633
      0.8611	0.049521224
      0.976	0.034530189
      1.04	0.028
      1.1	0.023
      1.2	0.013
      1.3	-0.01
      1.5	-0.08
      1.7	-0.19
      1.9	-0.432
      2	-0.522
      3	-2
      5	-10
    </tableData>

    -->


     <!-- ver 2.0 trial 3 (gives desired airspeed in IAS but we really need TAS (true airspeed) to match what is in aeronautical documents.  So, this is too powerful. -->
     <!-- <tableData>
        0	0.097
        0.1	0.095
        0.2	0.09
        0.3	0.08
        0.4	0.07
        0.5	0.066
        0.5657	0.062
        0.68	0.061
        0.8	0.057
        0.8611	0.055
        0.9	0.05
        0.976	0.04
        1.04	0.03
        1.1	0.024
        1.2	0.013
        1.3	-0.01
        1.5	-0.08
        1.7	-0.19
        1.9	-0.432
        2	-0.522
        3	-2
        5	-10
     </tableData>
     -->
  </table>


  <table name="C_POWER" type="internal">
  <!--
     <tableData>
          0      0.06453
          0.01   0.06453
          0.1    0.064
          0.2    0.06353
          0.3    0.062195
          0.4    0.060133
          0.5    0.058
          0.5358 0.056814
          0.64   0.055
          0.8    0.05184
          0.976  0.049032
          1.03   0.047816
          1.1    0.04286
          1.2    0.036
          1.3    0.0216
          1.5   -0.0072
          1.7   -0.036
          1.9   -0.0864
          2     -0.0864
          3     -0.1152
          5     -0.288
     </tableData>
     -->
     <tableData>
        0	0.0561411
        0.01	0.0561411
        0.1	0.05568
        0.2	0.0552711
        0.3	0.054109824
        0.4	0.052315884
        0.5	0.05046
        0.5358	0.04942818
        0.64	0.04785
        0.8	0.0451008
        0.976	0.04265784
        1.03	0.04159992
        1.1	0.0372882
        1.2	0.03132
        1.3	0.018792
        1.5	-0.006264
        1.7	-0.03132
        1.9	-0.075168
        2	-0.075168
        3	-0.100224
        5	-0.25056
     </tableData>
  </table>

  <!-- thrust effects of helical tip Mach -->
  <table name="CT_MACH" type="internal">
    <tableData>
      0.85   1.0
      1.05   0.8
    </tableData>
  </table>

  <!-- power-required effects of helical tip Mach -->
  <table name="CP_MACH" type="internal">
    <tableData>
      0.85   1.0
      1.05   1.8
      2.00   1.4
    </tableData>
  </table>

</propeller>
