<?xml version="1.0"?>
<!--
  File:     Clerget9B.xml
  Author:   Aero-Matic v 0.82

  Inputs:
    name:           Clerget9B
    type:           piston
    power:          130 hp
    augmented?      no
    injected?       no

    the clerget 130hp 9b is as follows:

no. of cylinders...........................9
bore..........................................120 mm
stroke........................................160 mm
weight complete...........................381 lbs
compression ratio..........................4:1
normal h.p....................................130
effective h.p.................................135
r.p.m...........................................12 50
oil consumption per h.p. hour............   0.09 pints
petrol consumption per h.p. hour.......   0.74 pints
[0.74 pints = 0.0925 gallons; 6.073 pounds per gallon of gasoline =   .5617525 pounds per hp hr.       In grams per kW hr that is  341.701125 ]

the 110 hp 9z is:

no. of cylinders..............................9
bore.............................................1 20 mm
stroke..........................................16 0 mm
weight complete.............................397 lbs
compression ratio............................4:1
normal h.p.....................................110
effective h.p..................................115
r.p.m............................................. 1180
oil consumption per h.p. hour............ 0.14 pints
petrol consumption per h.p. hour........ 0.75 pints

the 140 hp 9bf *is:

no. of cylinders ................................9
bore.............................................. .120 mm
stroke............................................ .172 mm
weight complete...............................381 lbs
compression ratio..............................5.3:1
normal h.p.......................................140
effective h.p....................................153
r.p.m............................................. .1250
oil consumption per h.p. hour.............. 0.11 pints
petrol consumption per h.p. hour......... 0.59 pints

SRC: http://www.theaerodrome.com/forum/2001/10278-clerget-9b-fuel-consumption.html
-->

<piston_engine name="Clerget9B">
  <minmp unit="INHG">          23.0 </minmp>
  <maxmp unit="INHG">         28.5 </maxmp>
  <displacement unit="IN3"> 993.8 </displacement>
  <maxhp unit="HP">        130.00 </maxhp>
  <cycles>         4.0 </cycles>
  <idlerpm>       50.0 </idlerpm> <!-- was 250, then 200.  If the RPM gets too var below this the engine stops.  But it seems to effect idle power, too:  	This value affects the throttle fall off and the engine stops running if it is slowed below 80% of this value. The engine starts running when it reaches 80% of this value.

  Setting this quite low allows the engine to re-start again when the RPM is quite low, which is realistic for a Clerget.  But, it allows allows a super-low power idle on throttle alone, which is not very realistic.  But, we can just limit throttle throw in jsb.xml, solving that problem.-->
  <maxrpm>      1250.0 </maxrpm>
  <maxthrottle>    1.0 </maxthrottle><!-- Deprecated -->
  <minthrottle>    0.1 </minthrottle><!-- Deprecated -->
  <sparkfaildrop>  0.292 </sparkfaildrop> <!-- this is the percentage drop in horsepower for single magneto operation. For a rotary engine, usually on magneto switch activated 5 cylinders & the other, the remaining 4 cyclinders.  So we're saying one magneto is  4/9 power drop, or 5/9 of total power. We don't have as good a way of simulating the 4/9 power setting here, unfortunately, but we do it instead in sopwithCamel1F1jsb.xml under <scheduled_gain name="fcs/throttle_limit_by_magento"> where we just scale down the throttle by about 1/9.
  ver 2.0gamma: 0.44444  Trying .17 again. .17 gives about 81 hp whereas we need about 62 hp to similate 5/9 power, so trying 0.32 which gives 57 hp.  Trying 0.295 which gives about 60-61 hp. -->

  <!-- Bomber: https://forum.flightgear.org/viewtopic.php?f=4&t=19584&sid=d48b8ac30cc7b65ddd5c5186d45cb448&start=90#p307159

17 Mar 2017 tested at sea level 15 deg C

1288rpm
122.8hp
14.73gph

right mag only = 49.8hp @ 14.73gph
left mag only = 21.1hp @ 10.5gph

With your engine you might want to consider a Ve of 0.55 and a BSFC of 0.423

which would give you
130hp
12.04gph
-->

  <volumetric-efficiency> 0.673 </volumetric-efficiency>
<!-- Optional items that affect engine performance -->
 <!-- Defining <bsfc> over-rides the built-in horsepower calculations -->
<bsfc unit="LBS/HP*HR"> 0.54 </bsfc> <!-- 0.5617525 is the calculated amount but the JSBSim manual says that JSBSim incorporates some of this internally so the number may need to be reduced some.  0.353 gives the rated top speed of 116 kts for the Camel at high rpm with unaltered CamelProp.xml.  But with the adjusted CamelProp C_THRUST values it is more like .50-->
 <stroke unit="IN">  6.2992  </stroke>
 <bore unit="IN">    4.72441 </bore>
 <cylinders>         9.0  </cylinders>
 <!-- Wikipedia: Compression ratio: 9B: 4.56:1, 9Bf: 5.3:1 -->
 <!-- The compression ratio affects volumetric efficiency at altitude, may need to be tweaked to give proper performance at high altitude and the correct service ceiling -->
 <!-- reducing static friction from 1.5 to .5  (and then, later after experimentation, 0.1) HP helps ensures that the prop does not stop while the a/c is moving.  I haven't read of any occurrences of the Camel prop stopping during flight (say, during inverted flight) and then not re-starting due to windmilling, so evidently this is how the a/c really did work. -->
 <static-friction  unit="HP"> 0.1 </static-friction>

 <!-- 1.8, 2.0gamma: 4.0.   Per Wikipedia it is 4.56 so we're goign to try that 4.56 seesm to helps some but wikipedia lists 5.2 for 9Bf so we'll try that -->
 <compression-ratio> 3.0 </compression-ratio> <!-- the compression ratio affects the change in volumetric efficiency with altitude -->

 <man-press-lag>0.01</man-press-lag>  <!--Delay in seconds for manifold pressure changes to take effect after the throttle is moved or the RPM changes. Default is 1 second.  -->
 <starter-torque>140</starter-torque> <!-- A value specifying the zero RPM torque in lb*ft the starter motor provides. Current default value is 40% of the maximum horsepower value. -->
 <starter-rpm>1250</starter-rpm> <!-- A value specifying the maximum RPM the unloaded starter motor can achieve. Loads placed on the engine by the propeller and throttle will further limit RPM achieved in practice. The actual RPM needs to be more than idlerpm * 0.8 for the engine to start running. -->


</piston_engine>
