<?xml-stylesheet href="JSBSim.xsl" type="application/xml"?>

<!-- Max sustained turn rate is about 76 deg/sec.  That is near stall speed, level flight, at sea level.  http://home.comcast.net/~clipper-108/AIAAPaper2005-119.pdf p. 7 -->
<!-- "I lived its quick response - it was so remarkably swift and sensitive that it demanded constant attention.  The torque caused the nose to rise in aleft-hand turn and rop in aright-hand turn.  Fairly large amounts of left rudder were needed in bothturns to correct for these idiosyncrasis. The tiny biplane was so snesitive in a turn, however, that if the turn were tightened just a little, it was litkely to whip into a tight spin - quickly and without warning.  Oddly this very ease for spining was used in combat by many pilots to shake a persisten German from their tails. sopwith Came vs Fokker Dr 1: Western Front 1917-18 by Jon Guttman, Harry Dempsey, quoting from mark Curtis Kinney's memoir, I Flew a Camel -->
<fdm_config name="Sopwith Camel" version="2.0" release="ALPHA">

    <fileheader>
        <author> Brent Hugh</author>
        <filecreationdate> 2011-10-29 </filecreationdate>
        <description>Sopwith Camel with Weapons, matches available data for climb, max speed, general handling</description>
        <version>Version 0.1</version>
    </fileheader>

    <metrics>
        <wingarea unit="FT2"> 231 </wingarea>
        <wingspan unit="FT"> 26.91 </wingspan>
        <chord unit="FT"> 4.5045 </chord>
        <wing_incidence unit=""> 2.5 </wing_incidence>
        <htailarea unit="FT2"> 19.6 </htailarea>
        <htailarm unit="FT"> 7.75 </htailarm>


        <!--Indeed you are correct about the Rudder - it's area was a paltry 4.9 sq. ft. (and fin at 3 sq. ft.) http://www.theaerodrome.com/forum/aircraft/47951-sopwith-camel-myth-2-a.html -->

        <vtailarea unit="FT2"> 7.90 </vtailarea>
        <vtailarm unit="FT"> 4.38 </vtailarm>

        <location name="AERORP" unit="IN">
            <x> 60 </x>
            <y> 0 </y>
            <z> 0 </z>
        </location>
        <location name="EYEPOINT" unit="IN">
            <x> 29.25 </x>
            <y> -18 </y>
            <z> 57 </z>
        </location>
        <location name="VRP" unit="IN">
            <x> 0 </x>
            <y> 0 </y>
            <z> 0 </z>
        </location>
    </metrics>


    <mass_balance>
        <!-- iyy and izz are .3 X typical plane of these dimensions due to Camel design concentrating mass v. close to c of g.  ixx is not affected by this
         design feature so remains unchanged. -->
        <ixx unit="SLUG*FT2">708</ixx>
        <iyy unit="SLUG*FT2">182.7</iyy>
        <izz unit="SLUG*FT2">366.9</izz>
        <ixz unit="KG*M2">0</ixz>
        <iyz unit="KG*M2">0</iyz>
        <ixy unit="KG*M2">0</ixy>
        <emptywt unit="LBS">1210</emptywt>
        <location name="CG" unit="IN">
            <x>60</x>
            <y>0</y>
            <z>-5.62</z>
        </location>

        <pointmass name="Equipment">
            <form shape="ball">
               <radius unit="FT"> 3 </radius>
            </form>
            <weight unit="LBS"> 90 </weight>
            <location name="cockpit_rear" unit="IN">
                <x> 80 </x>
                <y> 0 </y>
                <z> 0 </z>
            </location>
        </pointmass>
    </mass_balance>

    <ground_reactions>
        <contact type="BOGEY" name="LEFT_MAIN">
            <location unit="IN">
                <x> 30 </x>
                <y> -29.06 </y>
                <z> -65 </z>
            </location>
            <static_friction> 0.99 </static_friction>
            <dynamic_friction> 0.9 </dynamic_friction>
            <rolling_friction> 0.02 </rolling_friction>
            <spring_coeff unit="LBS/FT"> 1000 </spring_coeff>
            <damping_coeff unit="LBS/FT/SEC"> 900 </damping_coeff>
            <max_steer unit="DEG"> 0 </max_steer>
            <brake_group> NONE </brake_group>
            <retractable> 0 </retractable>
        </contact>
        <contact type="BOGEY" name="RIGHT_MAIN">
            <location unit="IN">
                <x> 30 </x>
                <y> 29.06 </y>
                <z> -65 </z>
            </location>
            <static_friction> 0.99 </static_friction>
            <dynamic_friction> 0.9 </dynamic_friction>
            <rolling_friction> 0.02 </rolling_friction>
            <spring_coeff unit="LBS/FT"> 1000 </spring_coeff>
            <damping_coeff unit="LBS/FT/SEC"> 900 </damping_coeff>
            <max_steer unit="DEG"> 0 </max_steer>
            <brake_group> NONE </brake_group>
            <retractable> 0 </retractable>
        </contact>
        <contact type="BOGEY" name="TAIL">
            <location unit="IN">
                <x> 239 </x>
                <y> 0 </y>
                <z> -18 </z>
            </location>
            <static_friction> 5 </static_friction>
            <dynamic_friction> 5 </dynamic_friction>
            <rolling_friction> .1 </rolling_friction>
            <spring_coeff unit="LBS/FT"> 200 </spring_coeff>
            <damping_coeff unit="LBS/FT/SEC"> 195 </damping_coeff>
            <max_steer unit="DEG"> -12.5 </max_steer>
            <brake_group> NONE </brake_group>
            <retractable> 0 </retractable>
        </contact>
        <contact type="STRUCTURE" name="LEFT_WING">
            <location unit="IN">
                <x> 45 </x>
                <y> -164 </y>
                <z> -16.62 </z>
            </location>
            <static_friction> 0.8 </static_friction>
            <dynamic_friction> 0.5 </dynamic_friction>
            <rolling_friction> 0.5 </rolling_friction>
            <spring_coeff unit="LBS/FT"> 200 </spring_coeff>
            <damping_coeff unit="LBS/FT/SEC"> 195 </damping_coeff>
            <max_steer unit="DEG"> 0 </max_steer>
            <brake_group> NONE </brake_group>
            <retractable> 0 </retractable>
        </contact>
        <contact type="STRUCTURE" name="RIGHT_WING">
            <location unit="IN">
                <x> 45 </x>
                <y> 164 </y>
                <z> -12.62 </z>
            </location>
            <static_friction> 0.8 </static_friction>
            <dynamic_friction> 0.5 </dynamic_friction>
            <rolling_friction> 0.5 </rolling_friction>
            <spring_coeff unit="LBS/FT"> 200 </spring_coeff>
            <damping_coeff unit="LBS/FT/SEC"> 195 </damping_coeff>
            <max_steer unit="DEG"> 0 </max_steer>
            <brake_group> NONE </brake_group>
            <retractable> 0 </retractable>
        </contact>
        <contact type="BOGEY" name="LEFT_WING_REAR">
            <location unit="IN">
                <x> 125 </x>
                <y> -164 </y>
                <z> 18.62 </z>
            </location>
            <static_friction> 0.8 </static_friction>
            <dynamic_friction> 0.5 </dynamic_friction>
            <rolling_friction> 0.5 </rolling_friction>
            <spring_coeff unit="LBS/FT"> 200 </spring_coeff>
            <damping_coeff unit="LBS/FT/SEC"> 195 </damping_coeff>
            <max_steer unit="DEG"> 0 </max_steer>
            <brake_group> NONE </brake_group>
            <retractable> 0 </retractable>
        </contact>
        <contact type="BOGEY" name="RIGHT_WING_REAR">
            <location unit="IN">
                <x> 125 </x>
                <y> 164 </y>
                <z> -16.62 </z>
            </location>
            <static_friction> 0.8 </static_friction>
            <dynamic_friction> 0.5 </dynamic_friction>
            <rolling_friction> 0.5 </rolling_friction>
            <spring_coeff unit="LBS/FT"> 200 </spring_coeff>
            <damping_coeff unit="LBS/FT/SEC"> 195 </damping_coeff>
            <max_steer unit="DEG"> 0 </max_steer>
            <brake_group> NONE </brake_group>
            <retractable> 0 </retractable>
        </contact>
        <contact type="STRUCTURE" name="LEFT_WING_OUTER_TOP">
            <location unit="IN">
                <x> 85 </x>
                <y> -164 </y>
                <z> 24.62 </z>
            </location>
            <static_friction> 0.8 </static_friction>
            <dynamic_friction> 0.5 </dynamic_friction>
            <rolling_friction> 0.5 </rolling_friction>
            <spring_coeff unit="LBS/FT"> 200 </spring_coeff>
            <damping_coeff unit="LBS/FT/SEC"> 195 </damping_coeff>
            <max_steer unit="DEG"> 0 </max_steer>
            <brake_group> NONE </brake_group>
            <retractable> 0 </retractable>
        </contact>
        <contact type="BOGEY" name="RIGHT_WING_OUTER_TOP">
            <location unit="IN">
                <x> 85 </x>
                <y> 164 </y>
                <z> 24.62 </z>
            </location>
            <static_friction> 0.8 </static_friction>
            <dynamic_friction> 0.5 </dynamic_friction>
            <rolling_friction> 0.5 </rolling_friction>
            <spring_coeff unit="LBS/FT"> 200 </spring_coeff>
            <damping_coeff unit="LBS/FT/SEC"> 195 </damping_coeff>
            <max_steer unit="DEG"> 0 </max_steer>
            <brake_group> NONE </brake_group>
            <retractable> 0 </retractable>
        </contact>

        <contact type="BOGEY" name="NOSE">
            <location unit="IN">
                <x> 0 </x>
                <y> 0 </y>
                <z> 0 </z>
            </location>
            <static_friction> 2 </static_friction>
            <dynamic_friction> 2 </dynamic_friction>
            <rolling_friction> 2 </rolling_friction>
            <spring_coeff unit="LBS/FT"> 200 </spring_coeff>
            <damping_coeff unit="LBS/FT/SEC"> 300 </damping_coeff>
            <max_steer unit="DEG"> 0 </max_steer>
            <brake_group> NONE </brake_group>
            <retractable> 0 </retractable>
        </contact>

        <contact type="BOGEY" name="PROP_TOP">
            <location unit="IN">
                <x> -10 </x>
                <y> 0 </y>
                <z> 59 </z>
            </location>
            <static_friction> 2 </static_friction>
            <dynamic_friction> 2 </dynamic_friction>
            <rolling_friction> 2 </rolling_friction>
            <spring_coeff unit="LBS/FT"> 200 </spring_coeff>
            <damping_coeff unit="LBS/FT/SEC"> 300 </damping_coeff>
            <max_steer unit="DEG"> 0 </max_steer>
            <brake_group> NONE </brake_group>
            <retractable> 0 </retractable>
        </contact>
        <contact type="BOGEY" name="PROP_BOTTOM">
            <location unit="IN">
                <x> -10 </x>
                <y> 0 </y>
                <z> -59 </z>
            </location>
            <static_friction> 2 </static_friction>
            <dynamic_friction> 2 </dynamic_friction>
            <rolling_friction> 2 </rolling_friction>
            <spring_coeff unit="LBS/FT"> 200 </spring_coeff>
            <damping_coeff unit="LBS/FT/SEC"> 300 </damping_coeff>
            <max_steer unit="DEG"> 0 </max_steer>
            <brake_group> NONE </brake_group>
            <retractable> 0 </retractable>
        </contact>


        <contact type="BOGEY" name="WING_TOP">
            <location unit="IN">
                <x> 30 </x>
                <y> 0 </y>
                <z> 36 </z>
            </location>
            <static_friction> 2 </static_friction>
            <dynamic_friction> 2 </dynamic_friction>
            <rolling_friction> 2 </rolling_friction>
            <spring_coeff unit="LBS/FT"> 200 </spring_coeff>
            <damping_coeff unit="LBS/FT/SEC"> 300 </damping_coeff>
            <max_steer unit="DEG"> 0 </max_steer>
            <brake_group> NONE </brake_group>
            <retractable> 0 </retractable>
        </contact>

        <contact type="BOGEY" name="WING_TOP_MID_LEFT">
            <location unit="IN">
                <x> 30 </x>
                <y> -50 </y>
                <z> 36 </z>
            </location>
            <static_friction> 2 </static_friction>
            <dynamic_friction> 2 </dynamic_friction>
            <rolling_friction> 2 </rolling_friction>
            <spring_coeff unit="LBS/FT"> 200 </spring_coeff>
            <damping_coeff unit="LBS/FT/SEC"> 300 </damping_coeff>
            <max_steer unit="DEG"> 0 </max_steer>
            <brake_group> NONE </brake_group>
            <retractable> 0 </retractable>
        </contact>

        <contact type="BOGEY" name="WING_TOP_MID_RIGHT">
            <location unit="IN">
                <x> 30 </x>
                <y> 50 </y>
                <z> 36 </z>
            </location>
            <static_friction> 2 </static_friction>
            <dynamic_friction> 2 </dynamic_friction>
            <rolling_friction> 2 </rolling_friction>
            <spring_coeff unit="LBS/FT"> 200 </spring_coeff>
            <damping_coeff unit="LBS/FT/SEC"> 300 </damping_coeff>
            <max_steer unit="DEG"> 0 </max_steer>
            <brake_group> NONE </brake_group>
            <retractable> 0 </retractable>
        </contact>

        <contact type="BOGEY" name="MIDDLE_UPPER">
            <location unit="IN">
                <x> 70 </x>
                <y> 0 </y>
                <z> 36 </z>
            </location>
            <static_friction> 2 </static_friction>
            <dynamic_friction> 2 </dynamic_friction>
            <rolling_friction> 2 </rolling_friction>
            <spring_coeff unit="LBS/FT"> 200 </spring_coeff>
            <damping_coeff unit="LBS/FT/SEC"> 300 </damping_coeff>
            <max_steer unit="DEG"> 0 </max_steer>
            <brake_group> NONE </brake_group>
            <retractable> 0 </retractable>
        </contact>

        <contact type="BOGEY" name="MIDDLE_BACK_UPPER">
            <location unit="IN">
                <x> 130 </x>
                <y> 0 </y>
                <z> 36 </z>
            </location>
            <static_friction> 2 </static_friction>
            <dynamic_friction> 2 </dynamic_friction>
            <rolling_friction> 2 </rolling_friction>
            <spring_coeff unit="LBS/FT"> 200 </spring_coeff>
            <damping_coeff unit="LBS/FT/SEC"> 300 </damping_coeff>
            <max_steer unit="DEG"> 0 </max_steer>
            <brake_group> NONE </brake_group>
            <retractable> 0 </retractable>
        </contact>

        <contact type="BOGEY" name="BACK_UPPER">
            <location unit="IN">
                <x> 180 </x>
                <y> 0 </y>
                <z> 36 </z>
            </location>
            <static_friction> 2 </static_friction>
            <dynamic_friction> 2 </dynamic_friction>
            <rolling_friction> 2 </rolling_friction>
            <spring_coeff unit="LBS/FT"> 200 </spring_coeff>
            <damping_coeff unit="LBS/FT/SEC"> 300 </damping_coeff>
            <max_steer unit="DEG"> 0 </max_steer>
            <brake_group> NONE </brake_group>
            <retractable> 0 </retractable>
        </contact>


        <contact type="BOGEY" name="TAIL_TOP">
            <location unit="IN">
                <x> 239 </x>
                <y> 0 </y>
                <z> 36 </z>
            </location>
            <static_friction> 2 </static_friction>
            <dynamic_friction> 2 </dynamic_friction>
            <rolling_friction> 2 </rolling_friction>
            <spring_coeff unit="LBS/FT"> 200 </spring_coeff>
            <damping_coeff unit="LBS/FT/SEC"> 300 </damping_coeff>
            <max_steer unit="DEG"> 0 </max_steer>
            <brake_group> NONE </brake_group>
            <retractable> 0 </retractable>
        </contact>


    </ground_reactions>

    <propulsion>
        <engine file="Clerget9B">
            <location unit="IN">
                <x> 10 </x>
                <y> 0 </y>
                <z> 0 </z>
            </location>
            <orient unit="DEG">
                <roll> 0 </roll>
                <pitch> 0 </pitch>
                <yaw> 0 </yaw>
            </orient>
            <feed>0</feed>
            <thruster file="CamelProp">
                <!--OK, the docs say that sense =1 for CW propeller as seen
                from the cockpit.  The camel has a CW propeller by every example
                I've been able to find. This source definitely says, "The
                direction of rotation was counter-clockwise as seen from the
                propeller-end of the engine." The photos also show a CCW (from
                propeller-end) rotating prop.  That would be clockwise as seen
                from the pilot's seat and sense=1.
                http://www.gracesguide.co.uk/Clerget

                But sense=1 makes the Camel climb on RH
                turn and dive on LH turn.  Lots of sources say the opposite,
                especially including this experienced pilot who is clearly
                flying a craft with a CW propeller (as seen from cockpit) and
                yet he says the Camel dives on RH turn and climbs on LH.

                 http://www.youtube.com/watch?v=j6PnKUEFX8g

                Wikipedia says, "To easily ascertain the direction of gyro effect, simply remember that a rolling wheel tends, when it leans to the side, to turn in the direction of the lean." http://en.wikipedia.org/wiki/Gyroscope#Properties That means, for a CW (from the rear) propeller, a turn to the right causes nose to drop, exactly what is reported for the Camel.

                My conclusion is that the JSBSim documentation (or code - it amounts to the same thing) has it backwards and sense=-1 corresponds to CW rotation of the prop, as seen from the rear.

                Thus, for a Camel, sense=-1
                -->
                <sense>-1</sense>
                <location unit="IN">
                    <x> 0 </x>
                    <y> 0 </y>
                    <z> 0 </z>
                </location>
                <orient unit="DEG">
                    <roll> 0 </roll>
                    <pitch> 0 </pitch>
                    <yaw> 0 </yaw>
                </orient>
            </thruster>
        </engine>
        <!-- Fuel is behind the pilot, 22 gal, 133.6 lb.  Appears to be
          about half way between nose & tail.  With fuel full,
          AC was tailheavy acc to http://www.theaerodrome.com/forum/2000/9166-sopwith-camel-facts-2.html With fuel empty, nose heavy. -->
        <tank type="FUEL">
            <location unit="IN">
                <x> 120 </x>
                <y> 0 </y>
                <z> -5.62 </z>
            </location>
            <capacity unit="LBS">267.2</capacity>
            <contents unit="LBS">133.6</contents>
        </tank>
    </propulsion>

    <flight_control name="FCS: Camel">

        <channel name="Pitch">

            <summer name="Pitch Trim Sum">
              <input>fcs/elevator-cmd-norm</input>
              <input>fcs/pitch-trim-cmd-norm</input>
              <clipto>
                <min>-1</min>
                <max>1</max>
              </clipto>
            </summer>

            <aerosurface_scale name="Elevator Control">
              <input>fcs/pitch-trim-sum</input>
              <range>
                <min>-0.95</min>
                <max>0.95</max>
              </range>
              <output>fcs/elevator-pos-rad</output>
            </aerosurface_scale>

            <aerosurface_scale name="elevator normalization">
              <input>fcs/elevator-pos-rad</input>
              <domain>
                <min>-0.35</min>
                <max>0.35</max>
              </domain>
              <range>
                <min>-1</min>
                <max>1</max>
              </range>
              <output>fcs/elevator-pos-norm</output>
            </aerosurface_scale>

        </channel>

        <channel name="Roll">

            <summer name="Roll Trim Sum">
              <input>fcs/aileron-cmd-norm</input>
              <input>fcs/roll-trim-cmd-norm</input>
              <clipto>
                <min>-1</min>
                <max>1</max>
              </clipto>
            </summer>

            <aerosurface_scale name="Left Aileron Control">
              <input>fcs/roll-trim-sum</input>
              <range>
                <min>-0.35</min>
                <max>0.35</max>
              </range>
              <output>fcs/left-aileron-pos-rad</output>
            </aerosurface_scale>

            <aerosurface_scale name="Right Aileron Control">
              <input>fcs/roll-trim-sum</input>
              <range>
                <min>-0.35</min>
                <max>0.35</max>
              </range>
              <output>fcs/right-aileron-pos-rad</output>
            </aerosurface_scale>

            <aerosurface_scale name="left aileron normalization">
              <input>fcs/left-aileron-pos-rad</input>
              <domain>
                <min>-0.35</min>
                <max>0.35</max>
              </domain>
              <range>
                <min>-1</min>
                <max>1</max>
              </range>
              <output>fcs/left-aileron-pos-norm</output>
            </aerosurface_scale>

            <aerosurface_scale name="right aileron normalization">
              <input>fcs/right-aileron-pos-rad</input>
              <domain>
                <min>-0.35</min>
                <max>0.35</max>
              </domain>
              <range>
                <min>-1</min>
                <max>1</max>
              </range>
              <output>fcs/right-aileron-pos-norm</output>
            </aerosurface_scale>

        </channel>

        <channel name="Yaw">

            <summer name="Rudder Command Sum">
              <input>fcs/rudder-cmd-norm</input>
              <input>fcs/yaw-trim-cmd-norm</input>
              <clipto>
                <min>-0.35</min>
                <max>0.35</max>
              </clipto>
            </summer>

            <aerosurface_scale name="Rudder Control">
              <input>fcs/rudder-command-sum</input>
              <range>
                <min>-0.35</min>
                <max>0.35</max>
              </range>
              <output>fcs/rudder-pos-rad</output>
            </aerosurface_scale>

            <aerosurface_scale name="rudder normalization">
              <input>fcs/rudder-pos-rad</input>
              <domain>
                <min>-0.35</min>
                <max>0.35</max>
              </domain>
              <range>
                <min>-1</min>
                <max>1</max>
              </range>
              <output>fcs/rudder-pos-norm</output>
            </aerosurface_scale>

        </channel>

    </flight_control>

    <system file="crash-detect"/>
    <system file="automixture"/>

    <aerodynamics>
            <function name="aero/function/kCDge">
            <description>Change_in_drag_due_to_ground_effect</description>
            <product>
                  <table>
                      <independentVar>aero/h_b-mac-ft</independentVar>
                      <tableData>
                          0.0000	0.4800
                          0.1000	0.5150
                          0.1500	0.6290
                          0.2000	0.7090
                          0.3000	0.8150
                          0.4000	0.8820
                          0.5000	0.9280
                          0.6000	0.9620
                          0.7000	0.9880
                          0.8000	1.0000
                      </tableData>
                  </table>
            </product>
        </function>

        <function name="aero/function/kCLge">
            <description>Change_in_lift_due_to_ground_effect</description>
            <product>
                  <table>
                      <independentVar>aero/h_b-mac-ft</independentVar>
                      <tableData>
                          0.0000	1.2030
                          0.1000	1.1270
                          0.1500	1.0900
                          0.2000	1.0730
                          0.3000	1.0460
                          0.4000	1.0550
                          0.5000	1.0190
                          0.6000	1.0130
                          0.7000	1.0080
                          0.8000	1.0060
                          0.9000	1.0030
                          1.0000	1.0020
                          1.1000	1.0000
                      </tableData>
                  </table>
            </product>
        </function>


        <axis name="LIFT" unit="LBS">
            <function name="aero/force/Lift_alpha">
                <description>Lift due to alpha</description>
                <product>
                    <property>aero/qbar-psf</property>
                    <property>metrics/Sw-sqft</property>
                    <property>aero/function/kCLge</property>
                    <table>
                        <independentVar>aero/alpha-rad</independentVar>
                        <tableData>
                          -0.2          -0.5
                          0             0.15
                          0.23          1
                          0.3           1.03
                          0.6           0.4
                        </tableData>
                    </table>
                </product>
            </function>
            <function name="aero/force/Lift_elevator">
                <description>Lift due to Elevator Deflection</description>
                <product>
                    <property>aero/qbar-psf</property>
                    <property>metrics/Sw-sqft</property>
                    <property>fcs/elevator-pos-rad</property>
                    <value>0.15</value>
                </product>
            </function>
        </axis>
        <axis name="DRAG" unit="LBS">
            <function name="aero/force/Drag_basic">
                <description>Drag at zero lift</description>
                <product>
                    <property>aero/qbar-psf</property>
                    <property>metrics/Sw-sqft</property>
                    <table>
                        <independentVar>aero/alpha-deg</independentVar>
                        <tableData>
                          -90         1.5
                          -30         0.9
                          -20         0.051
                          0             0.0378
                          20          0.051
                          30          0.9
                          90          1.5
                        </tableData>
                    </table>
                </product>
            </function>
            <function name="aero/force/Drag_induced">
                <description>Induced drag</description>
                <product>
                    <property>aero/qbar-psf</property>
                    <property>metrics/Sw-sqft</property>
                    <property>aero/cl-squared</property>
                    <property>aero/function/kCDge</property>
                    <value>0.04</value>
                </product>
            </function>
            <function name="aero/force/Drag_mach">
                <description>Drag due to mach</description>
                <product>
                    <property>aero/qbar-psf</property>
                    <property>metrics/Sw-sqft</property>
                    <table>
                        <independentVar>velocities/mach</independentVar>
                        <tableData>
                          0             0
                          0.7           0
                          1.1           0.023
                          1.8           0.015
                        </tableData>
                    </table>
                </product>
            </function>
            <function name="aero/force/Drag_beta">
                <description>Drag due to sideslip</description>
                <product>
                    <property>aero/qbar-psf</property>
                    <property>metrics/Sw-sqft</property>
                    <table>
                        <independentVar>aero/beta-rad</independentVar>
                        <tableData>
                          -1.57         0.5
                          -0.26         0.05
                          0             0
                          0.26          0.05
                          1.57          0.5
                        </tableData>
                    </table>
                </product>
            </function>
            <function name="aero/force/Drag_elevator">
                <description>Drag due to Elevator Deflection</description>
                <product>
                    <property>aero/qbar-psf</property>
                    <property>metrics/Sw-sqft</property>
                    <abs>
                        <property>fcs/elevator-pos-norm</property>
                    </abs>
                    <value>0.02</value>
                </product>
            </function>
        </axis>
        <axis name="SIDE" unit="LBS">
            <function name="aero/force/Side_beta">
                <description>Side force due to beta</description>
                <product>
                    <property>aero/qbar-psf</property>
                    <property>metrics/Sw-sqft</property>
                    <property>aero/beta-rad</property>
                    <value>-1</value>
                </product>
            </function>
        </axis>
        <axis name="ROLL" unit="LBS*FT">
            <function name="aero/moment/Roll_beta">
                <description>Roll moment due to beta</description>
                <product>
                    <property>aero/qbar-psf</property>
                    <property>metrics/Sw-sqft</property>
                    <property>metrics/bw-ft</property>
                    <property>aero/beta-rad</property>
                    <!-- value>-0.2</value -->
                    <value>-0.05</value>
                    <!-- Asymmetric stall -->
                    <!-- This is cribbed directory from p51d-jsbsim.xml for now -->
                  <!-- <table>                            h
                        <independentVar lookup="row">aero/alpha-deg</independentVar>
                        <independentVar lookup="column">velocities/vc-kts</independentVar>
                         <tableData>
                                 0  22  38   44   48  52
                            -35  1  2  8     2    1   1
                            -10  1  3 14     4    2   1
                            -8   1  1  1     1    1   1
                            10.2 1  1  1     1    1   1
                            11   1  4 25     20   5   1
                            25   1  4 25     20   3   1
                            35   1  2 12     9    2   1
                        </tableData>
                    </table> -->
                </product>
            </function>
            <function name="aero/moment/Roll_damp">
                <description>Roll moment due to roll rate</description>
                <product>
                    <property>aero/qbar-psf</property>
                    <property>metrics/Sw-sqft</property>
                    <property>metrics/bw-ft</property>
                    <property>aero/bi2vel</property>
                    <property>velocities/p-aero-rad_sec</property>
                    <!-- <value>-.3</value> -->
                    <!-- orig: <value>-0.4</value> -->

                    <table>
                        <independentVar>velocities/p-aero-rad_sec</independentVar>
                        <tableData>
                          -32.14       -0.1
                          -1.57        -0.1
                          -0.7         -0.2
                          -0.4         -0.3
                          0            -0.4
                          0.4          -0.3
                          0.7          -0.1
                          1.57         -0.1
                          32.14
                        </tableData>
                    </table>


                    <!-- camel is poorly damped and won't get out of spin/dive/etc just by releasing the controls -->

                </product>
            </function>
            <function name="aero/moment/Roll_yaw">
                <description>Roll moment due to yaw rate</description>
                <product>
                    <property>aero/qbar-psf</property>
                    <property>metrics/Sw-sqft</property>
                    <property>metrics/bw-ft</property>
                    <property>aero/bi2vel</property>
                    <property>velocities/r-aero-rad_sec</property>
                    <!-- value>0.35</value -->
                    <value>0.15</value>
                    <!-- Asymmetric stall -->
                    <!-- This is cribbed directory from p51d-jsbsim.xml for now -->
                    <table>
                        <independentVar lookup="row">aero/alpha-deg</independentVar>
                        <independentVar lookup="column">velocities/vc-kts</independentVar>
                        <tableData>
                                 0  22  38   44   48  52
                            -35  1  2  6     2    1   1
                            -10  1  3  8     3    1   1
                            -8   1  1  1     1    1   1
                            10.2 1  1  1     1    1   1
                            11   1  4  20    18   4   1
                            25   1  4  20    18   3   1
                            35   1  2  12    8    2   1
                        </tableData>
                    </table>
                </product>
            </function>
            <function name="aero/moment/Roll_aileron">
                <description>Roll moment due to aileron</description>
                <product>
                    <property>aero/qbar-psf</property>
                    <property>metrics/Sw-sqft</property>
                    <property>metrics/bw-ft</property>
                    <property>fcs/left-aileron-pos-rad</property>
                    <table>
                        <independentVar>velocities/mach</independentVar>
                        <tableData>
                          0             0.08
                          2             0.057
                        </tableData>
                    </table>
                    <!-- It became harder & harder to deflect the Camel's
                    ailerons as the speed increased.
                    p. 7: http://assets.cambridge.org/97805218/09924/sample/9780521809924ws.pdf  -->
                   <table>
                        <independentVar>velocities/ve-kts</independentVar>
                        <tableData>
                          0             1
                          70            0.9
                          180           0.3
                          400           0
                        </tableData>
                    </table>
                    <!-- Asymmetric stall; you lose aileron control as stall deepens -->
                    <!-- This is cribbed directory from p51d-jsbsim.xml for now -->
                    <table>
                        <independentVar lookup="row">aero/alpha-deg</independentVar>
                        <tableData>
                        -35    0.3
                        -27    0.3
                        -22    1
                        22     1
                        27     0.3
                        35     0.3
                        </tableData>
                    </table>
                </product>
            </function>
            <function name="aero/moment/Roll_rudder">
                <description>Roll moment due to rudder</description>
                <product>
                    <property>aero/qbar-psf</property>
                    <property>metrics/Sw-sqft</property>
                    <property>metrics/bw-ft</property>
                    <property>fcs/rudder-pos-rad</property>
                    <value>0.005</value>
                </product>
            </function>
            <!--
               Create roll moment with a tendancy
               to drop the left wing at stall.
               This will help to induce a spin.

               #The positive value at aero/alpha-deg = 10.35
               #is to simulate actual behavior.  The NACA
               #test report on stall behavior says that
               #initially it will drop the right wing and then
               #roll to the left as the stall deepens.
               #this commented out for Camel.

               Camel: The idea of the r-aero-rad-_sec table is to turn the spin in the
               direction of the change in yaw, ie, spin in the direction the
               AC is already spinning, if any.
            -->
           <function name="aero/coefficient/Clalpha">
                <description>roll_moment_due_to_alpha</description>
                <product>
                    <property>aero/qbar-psf</property>
                    <property>metrics/Sw-sqft</property>
                    <property>metrics/bw-ft</property>
                    <table>
                        <independentVar>velocities/r-aero-rad_sec</independentVar>
                        <tableData>
                          -34.15            1
                          -.0001            1
                          0              0
                          .0001             -1
                          34.15             -1
                        </tableData>
                    </table>
                    <table>
                        <independentVar lookup="row">aero/alpha-deg</independentVar>
                        <independentVar lookup="column">aero/Re</independentVar>
                        <tableData>
                                          2500000  5000000  10000000   20000000
                               -33.0      0.0     0.005   0.0025    0.00025
                                -9.0      0.0     0.00025 0.000125  0.0000125
                                 0.0      0.0      0.0      0.0        0.0
                                10.2      0.0      0.0      0.0        0.0

                                10.5      0.0     0.00025 0.000125  0.00000125
                                34.5      0.0     0.0005  0.00025   0.0000025
                        </tableData>
                    </table>
                </product>
            </function>


        </axis>
        <axis name="PITCH" unit="LBS*FT">
            <function name="aero/moment/Pitch_alpha">
                <description>Pitch moment due to alpha</description>
                <product>
                    <property>aero/qbar-psf</property>
                    <property>metrics/Sw-sqft</property>
                    <property>metrics/cbarw-ft</property>
                    <property>aero/alpha-rad</property>
                    <value>-0.5</value>
                </product>
            </function>
            <function name="aero/moment/Pitch_elevator">
                <description>Pitch moment due to elevator</description>
                <product>
                    <property>aero/qbar-psf</property>
                    <property>metrics/Sw-sqft</property>
                    <property>metrics/cbarw-ft</property>
                    <property>fcs/elevator-pos-rad</property>
                    <table>
                        <independentVar>velocities/mach</independentVar>
                        <tableData>
                          0             -0.551
                          2             -0.175
                        </tableData>
                    </table>

                    <!-- Asymmetric stall; you lose elevator control as stall deepens -->
                    <table>
                        <independentVar lookup="row">aero/alpha-deg</independentVar>
                        <tableData>
                        -35    0.3
                        -27    0.3
                        -22    1
                        22     1
                        27     0.3
                        35     0.3
                        </tableData>
                    </table>

                </product>
            </function>
            <function name="aero/moment/Pitch_damp">
                <description>Pitch moment due to pitch rate</description>
                <product>
                    <property>aero/qbar-psf</property>
                    <property>metrics/Sw-sqft</property>
                    <property>metrics/cbarw-ft</property>
                    <property>aero/ci2vel</property>
                    <property>velocities/q-aero-rad_sec</property>
                    <value>-12</value>
                    <!-- orig: <value>-12</value> -->
                    <!-- Camel is pretty poorly damped in most all ways -->
                </product>
            </function>
            <function name="aero/moment/Pitch_alphadot">
                <description>Pitch moment due to alpha rate</description>
                <product>
                    <property>aero/qbar-psf</property>
                    <property>metrics/Sw-sqft</property>
                    <property>metrics/cbarw-ft</property>
                    <property>aero/ci2vel</property>
                    <property>aero/alphadot-rad_sec</property>
                    <value>-7</value>
                </product>
            </function>
        </axis>
        <axis name="YAW" unit="LBS*FT">
            <function name="aero/moment/Yaw_beta">
                <description>Yaw moment due to beta</description>
                <product>
                    <property>aero/qbar-psf</property>
                    <property>metrics/Sw-sqft</property>
                    <property>metrics/bw-ft</property>
                    <property>aero/beta-rad</property>
                    <value>0.12</value>
                </product>
            </function>
            <function name="aero/moment/Yaw_damp">
                <description>Yaw moment due to yaw rate</description>
                <product>
                    <property>aero/qbar-psf</property>
                    <property>metrics/Sw-sqft</property>
                    <property>metrics/bw-ft</property>
                    <property>aero/bi2vel</property>
                    <property>velocities/r-aero-rad_sec</property>
                    <!-- <value>-0.10</value>  accidentally left this un-remed out and it worked quite well, so  . . . -->
                    <!-- orig: <value>-0.15</value> -->
                    <!-- camel is poorly damped and won't get out of spin/turn automatically if the controls are released.  You have to steer it out. -->
                    <table>
                        <independentVar>velocities/r-aero-rad_sec</independentVar>
                        <tableData>
                          -32.14        -0.03
                          -1.57         -0.03
                          -0.7          -0.05
                          -0.25         -0.10
                          0             -0.15
                          0.25          -0.10
                          0.7           -0.05
                          1.57          -0.03
                          32.14         -0.03
                        </tableData>
                    </table>


                </product>
            </function>
            <function name="aero/moment/Yaw_rudder">
                <description>Yaw moment due to rudder</description>
                <product>
                    <property>aero/qbar-psf</property>
                    <property>metrics/Sw-sqft</property>
                    <property>metrics/bw-ft</property>
                    <property>fcs/rudder-pos-rad</property>
                    <value>-0.12</value>
                    <!-- it became harder & hard to rudder with speed,
                    due to wind pressure -->
                    <table>
                        <independentVar>velocities/ve-kts</independentVar>
                        <tableData>
                          0             1
                          70            0.95
                          180           0.5
                          500           0
                        </tableData>
                    </table>

                                        <!-- Asymmetric stall; you lose rudder as a stall in beta occurs -->
                    <!-- This is cribbed directory from p51d-jsbsim.xml for now -->
                    <table>
                        <independentVar lookup="row">aero/beta-deg</independentVar>
                        <tableData>
                        -90    0.2
                        -27    0.3
                        -22    1
                        22     1
                        27     0.3
                        90     0.2
                        </tableData>
                    </table>

                </product>
            </function>
            <function name="aero/moment/Yaw_aileron">
                <description>Adverse yaw</description>
                <product>
                    <property>aero/qbar-psf</property>
                    <property>metrics/Sw-sqft</property>
                    <property>metrics/bw-ft</property>
                    <property>fcs/left-aileron-pos-rad</property>
                    <value>-0.01</value>
                    <table>
                        <independentVar>velocities/ve-kts</independentVar>
                        <tableData>
                          0             1
                          70            0.9
                          180           0.3
                          400           0
                        </tableData>
                    </table>
                </product>
            </function>
            <!--
               Create YAW to help drop a wing at stall.
               This will help to induce a spin or a snap
               roll depending on how fast the stall entry
               speed is.
               Which wing is dropped and how hard it
               drops depends on the beta angle.
            -->
           <!-- This is cribbed directory from p51d-jsbsim.xml for now -->

           <function name="aero/coefficient/Cnalphabeta">
                <description>Yaw_moment_due_to_alpha-beta</description>
                <product>
                    <value> -1.0 </value>
                    <property>aero/qbar-psf</property>
                    <property>metrics/Sw-sqft</property>
                    <property>metrics/bw-ft</property>
                    <table>
                        <independentVar lookup="row">aero/alpha-deg</independentVar>
                        <independentVar lookup="column">aero/beta-deg</independentVar>
                        <independentVar lookup="table">aero/Re</independentVar>
                        <tableData breakPoint="2500000">
                                     -30     -5      -2      2.5       6      32
                               -14.5  0.0  0.05      0.03    -0.03     -0.05    0.0
                               -10.0  0.0  0.05      0.03    -0.03     -0.05    0.0
                                -9.5  0.0  0.05      0.03    -0.03     -0.05    0.0
                                -9.0  0.0  0.05      0.03    -0.03     -0.05    0.0
                                -8.5  0.0  0.05      0.03    -0.03     -0.05    0.0
                                -8.0  0.0  0.05      0.03    -0.03     -0.05    0.0
                                -7.0  0.0  0.0       0.0      0.0      0.0      0.0
                                 0.0  0.0  0.0       0.0      0.0      0.0      0.0
                                10.0  0.0  0.0       0.0      0.0      0.0      0.0
                                10.6  0.0  0.001     0.005   -0.005   -0.001    0.0
                                11.2  0.0  0.0015    0.006   -0.006   -0.0015   0.0
                                11.5  0.0  0.0025    0.008   -0.008   -0.0025   0.0
                                12.0  0.0  0.0035    0.01    -0.01    -0.0035   0.0
                                12.2  0.0  0.005     0.012   -0.012   -0.005    0.0
                                12.5  0.0  0.00625   0.013   -0.013   -0.00625  0.0
                                14.5  0.0  0.0075    0.015   -0.015   -0.0075   0.0
                                25.0  0.0  0.00125   0.005   -0.005   -0.00125  0.0
                        </tableData>
                        <tableData breakPoint="5000000">
                                     -30    -5       -2        2.5          6          32
                               -14.5 0.0  0.05      0.03      -0.03       -0.05        0.0
                               -10.0 0.0  0.05      0.03      -0.03       -0.05        0.0
                                -9.5 0.0  0.05      0.03      -0.03       -0.05        0.0
                                -9.0 0.0  0.05      0.03      -0.03       -0.05        0.0
                                -8.5 0.0  0.05      0.03      -0.03       -0.05        0.0
                                -8.0 0.0  0.005     0.003     -0.003      -0.005       0.0
                                -7.0 0.0  0.0       0.0        0.0         0.0         0.0
                                 0.0 0.0  0.0       0.0        0.0         0.0         0.0
                                10.0 0.0  0.0       0.0        0.0         0.0         0.0
                                10.6 0.0  0.005     0.01      -0.01       -0.005       0.0
                                11.2 0.0  0.015     0.01      -0.01       -0.015       0.0
                                11.5 0.0  0.02      0.015     -0.015      -0.02        0.0
                                12.0 0.0  0.025     0.02      -0.02       -0.025       0.0
                                12.2 0.0  0.03      0.023     -0.023      -0.03        0.0
                                12.5 0.0  0.04      0.026     -0.026      -0.04        0.0
                                14.5 0.0  0.05      0.03      -0.03       -0.05        0.0
                                25.0 0.0  0.02      0.01      -0.01       -0.02        0.0
                        </tableData>
                        <tableData breakPoint="10000000">
                                        -30    -5      -2      2.5         6         32
                               -14.5    0.0  0.05     0.03    -0.03      -0.05       0.0
                               -10.0    0.0  0.05     0.03    -0.03      -0.05       0.0
                                -9.5    0.0  0.05     0.03    -0.03      -0.05       0.0
                                -9.0    0.0  0.05     0.03    -0.03      -0.05       0.0
                                -8.5    0.0  0.02     0.01    -0.01      -0.02       0.0
                                -8.0    0.0  0.005    0.003   -0.003     -0.005      0.0
                                -7.0    0.0  0.0      0.0      0.0        0.0        0.0
                                 0.0    0.0  0.0      0.0      0.0        0.0        0.0
                                10.0    0.0  0.0      0.0      0.0        0.0        0.0
                                10.6    0.0  0.002    0.006   -0.006     -0.002      0.0
                                11.2    0.0  0.005    0.005   -0.005     -0.005      0.0
                                11.5    0.0  0.01     0.01    -0.01      -0.01       0.0
                                12.0    0.0  0.015    0.015   -0.015     -0.015      0.0
                                12.2    0.0  0.03     0.02    -0.02      -0.03       0.0
                                12.5    0.0  0.035    0.025   -0.025     -0.035      0.0
                                14.5    0.0  0.04     0.03    -0.03      -0.04       0.0
                                25.0    0.0  0.02     0.01    -0.01      -0.02       0.0
                        </tableData>
                        <tableData breakPoint="20000000">
                                        -30    -5        -2       2.5       6        32
                               -14.5    0.0    0.05     0.03    -0.03     -0.05      0.0
                               -10.0    0.0    0.05     0.03    -0.03     -0.05      0.0
                                -9.5    0.0    0.05     0.03    -0.03     -0.05      0.0
                                -9.0    0.0    0.02     0.01    -0.01     -0.02      0.0
                                -8.5    0.0    0.005    0.003   -0.003    -0.005     0.0
                                -8.0    0.0    0.002    0.001   -0.001    -0.002     0.0
                                -7.0    0.0    0.0      0.0      0.0       0.0       0.0
                                 0.0    0.0    0.0      0.0      0.0       0.0       0.0
                                10.0    0.0    0.0      0.0      0.0       0.0       0.0
                                10.6    0.0    0.0      0.0      0.0       0.0       0.0
                                11.2    0.0    0.0      0.0      0.0       0.0       0.0
                                11.5    0.0    0.0      0.0      0.0       0.0       0.0
                                12.0    0.0    0.01     0.01    -0.01     -0.01      0.0
                                12.2    0.0    0.02     0.016   -0.016    -0.02      0.0
                                12.5    0.0    0.03     0.023   -0.023    -0.03      0.0
                                14.5    0.0    0.05     0.03    -0.03     -0.05      0.0
                                25.0    0.0    0.02     0.01    -0.01     -0.02      0.0
                        </tableData>
                        <tableData breakPoint="30000000">
                                       -30     -5          -2      2.5     6       32
                               -14.5   0.0    0.05       0.03    -0.03   -0.05     0.0
                               -10.0   0.0    0.05       0.03    -0.03   -0.05     0.0
                                -9.5   0.0    0.02       0.01    -0.01   -0.02     0.0
                                -9.0   0.0    0.005      0.003   -0.003  -0.005    0.0
                                -8.5   0.0    0.002      0.001   -0.001  -0.002    0.0
                                -8.0   0.0    0.0        0.0      0.0     0.0      0.0
                                -7.0   0.0    0.0        0.0      0.0     0.0      0.0
                                 0.0   0.0    0.0        0.0      0.0     0.0      0.0
                                10.0   0.0    0.0        0.0      0.0     0.0      0.0
                                10.6   0.0    0.0        0.0      0.0     0.0      0.0
                                11.2   0.0    0.0        0.0      0.0     0.0      0.0
                                11.5   0.0    0.0        0.0      0.0     0.0      0.0
                                12.0   0.0    0.0        0.0      0.0     0.0      0.0
                                12.2   0.0    0.01       0.01    -0.01   -0.01     0.0
                                12.5   0.0    0.03       0.02    -0.02   -0.03     0.0
                                14.5   0.0    0.05       0.03    -0.03   -0.05     0.0
                                25.0   0.0    0.02       0.01    -0.01   -0.02     0.0
                        </tableData>
                        <tableData breakPoint="40000000">
                                         -30     -5       -2       2.5       6      32
                               -14.5     0.0    0.05     0.03    -0.03     -0.05    0.0
                               -10.0     0.0    0.05     0.03    -0.03     -0.05    0.0
                                -9.5     0.0    0.02     0.01    -0.01     -0.02    0.0
                                -9.0     0.0    0.005    0.003   -0.003    -0.005   0.0
                                -8.5     0.0    0.002    0.001   -0.001    -0.002   0.0
                                -8.0     0.0    0.0      0.0      0.0       0.0     0.0
                                -7.0     0.0    0.0      0.0      0.0       0.0     0.0
                                 0.0     0.0    0.0      0.0      0.0       0.0     0.0
                                10.0     0.0    0.0      0.0      0.0       0.0     0.0
                                10.6     0.0    0.0      0.0      0.0       0.0     0.0
                                11.2     0.0    0.0      0.0      0.0       0.0     0.0
                                11.5     0.0    0.0      0.0      0.0       0.0     0.0
                                12.0     0.0    0.0      0.0      0.0       0.0     0.0
                                12.2     0.0    0.0      0.0      0.0       0.0     0.0
                                12.5     0.0    0.03     0.02    -0.02     -0.03    0.0
                                14.5     0.0    0.05     0.03    -0.03     -0.05    0.0
                                25.0     0.0    0.02     0.01    -0.01     -0.02    0.0
                        </tableData>
                    </table>
                </product>
            </function>


        </axis>
    </aerodynamics>

    <output name="JSBout.csv" type="CSV" rate="100">
        <simulation> ON </simulation>
        <atmosphere> ON </atmosphere>
        <massprops> ON </massprops>
        <aerosurfaces> ON </aerosurfaces>
        <rates> ON </rates>
        <velocities> ON </velocities>
        <forces> ON </forces>
        <moments> ON </moments>
        <position> ON </position>
        <coefficients> ON </coefficients>
        <ground_reactions> ON </ground_reactions>
        <fcs> ON </fcs>
        <propulsion> ON </propulsion>
    </output>
</fdm_config>
