<?xml-stylesheet href="JSBSim.xsl" type="application/xml"?>

<!--

************************************************************************

JSBSim aerodynamic model for a Sopwith Camel 1F1

Version: 1.1

Author: Brent Hugh, 2 April 2013

Goal: Create a flight model of the Camel that would incorporate as many of the documented combat flight characteristics of the Camel as possible, and in as realistic a way as possible.

Sources & Acknowledgements: See SopwithCamel-Realistic-JSBSim-Flight-Model-Notes.txt in the Docs subdirectory, other docs in that directory, and the notes below.

************************************************************************

-->


<!-- Max sustained turn rate is about 76 deg/sec.  That is near stall speed, level flight, at sea level.  http://home.comcast.net/~clipper-108/AIAAPaper2005-119.pdf p. 7 -->

<!-- "I lived its quick response - it was so remarkably swift and sensitive that it demanded constant attention.  The torque caused the nose to rise in a left-hand turn and drop in a right-hand turn.  Fairly large amounts of left rudder were needed in bothturns to correct for these idiosyncrasis. The tiny biplane was so snesitive in a turn, however, that if the turn were tightened just a little, it was likely to whip into a tight spin - quickly and without warning.  Oddly this very ease for spining was used in combat by many pilots to shake a persisten German from their tails. sopwith Came vs Fokker Dr 1: Western Front 1917-18 by Jon Guttman, Harry Dempsey, quoting from mark Curtis Kinney's memoir, I Flew a Camel

Here is a description about the Camel's traits from BARKER VC, (via author Wayne Ralph at http://www.theaerodrome.com/forum/2001/11306-sopwith-camel-flight-characteristics.html ):

Quote:

All the weight of the engine, guns, and pilot was concentrated in the first seven feet of a short 18-foot fuselage. The various models of rotary engine fitted to the Camel, from a 110-hp Le Rhone, to a 130-hp Clerget, to a 150-hp Bentley, had the propeller attached to the engine crankcase and the crankshaft to the aircraft so that the propeller and engine revolved together at more than 1250 rpm. This heavy whirling engine was lubricated continually by castor oil which was not recycled, but rather was burned in the combustion process and vented overboard, soaking the aircraft, the pilot's flying suit, helmet and goggles.
The gyroscopic forces that were generated varied in intensity based on a complex interaction of engine rpm, aircraft speed, and control input. The scout had a different character turning left or right, as did all the rotary-engined aeroplanes, but the Camel to an extreme degree. It was sluggish in left turns and the nose always pitched up, while right turns were very quick, with the nose dropping sharply. Without plenty of top (ie, left) rudder to correct the pitch down, it would spin.
A Camel pilot had to apply left rudder turning left or right, the amount varying with aircraft speed and engine rpm. Since the engine rotation countered the input of left stick and rudder, some pilots made all turns to the right because the aircraft was quicker through 270 degrees, than 90 degrees to the left. The Camel's elevator was powerful and sensitive, while the rudder was too small and relatively ineffective.
Coordinated turns demanded a fine touch. Correcting sideslip, the tendency of the aeroplane to slide to the inside of a banked turn, by applying opposite rudder, caused the Camel to tighten up in the turn. In steep turns over 45 degrees of bank, the aircraft tended to pitch up its nose, and tighten up its bank angle as speed reduced, requiring continual adjustments in the amount of forward pressure on the stick with engine rpm changes. In the words of test pilot W/C Paul A. Hartman, RCAF, the Camel has no 'dynamic longitudinal stability' in steep turns.
Accelerating the aircraft caused the nose to climb, and swing to the left. At 110 miles per hour, there was about 15 to 20 pounds of back force on the control column, which could not be trimmed out because the aircraft had no pilot-adjustable, moveable horizontal stabilizer. Therefore, Camel pilots had to fly two-to-three hour missions, continually applying forward pressure just to maintain level flight. Letting go resulted in the aircraft pitching up, and rolling inverted to the right. Moving the stick forward to enter a dive caused the Camel to yaw left because of gyroscopic force, and correcting this yaw with right rudder caused the nose to pitch down sharply. By today's standards the Camel was completely unacceptable, and yet many pilots of 1917-8, most with under 100 hours of flying time used it as a lethal weapon.

- - -
http://www.theaerodrome.com/forum/2001/11306-sopwith-camel-flight-characteristics-3.html

 In those notes are a description of when and why the mixture had to be adjusted. If memory serves, it was perilously low to the ground, under 250 feet. The shift to left rudder would have to have taken place either just before or just after this, because the whole point of changing the mixture was that the engine would have been on the verge of choking, which means that you'd be trying to maintain flying speed.

My guess is that the shift would have to happen within 10-20 seconds of getting airborne under normal circumstances.

- - -

"...all flights of these early machines were conducted from the grass surface of the airfield, not the paved runways, and the steerable tail skid of the Camel helped to overcome a slight swing to the left as I opened the throttle. The tail came up at about 20 knots.

As the speed reached 40 knots I eased the stick back slightly and the Camel became airborne. It accelerated rapidly to 55 knots and I held it in a climb at that speed until I reached 500 feet. I leveled off, leaned the mixture, and started a left hand turn. The gyroscopic effect from the rotary engine quickly became apparent...

...I enjoyed flying the Camel, but its vices of control instability, extreme control sensitivity and pronounced gyroscopic effects all combined to create the impression of balancing an egg on the point of a needle rather than flying an aircraft...it was never forced into manoeuvres - they were executed by light pressure on the controls and subsequently relaxing, or sometimes reversing, the pressure once the desired rate of response was attained.

By modern standards of stability and control, the Camel would be totally unacceptable as a military aircraft...

(quoted from Canada's National Aviation Museum - Its History and Collection, by K.M. Molson)

http://www.theaerodrome.com/forum/2001/11306-sopwith-camel-flight-characteristics.html


"As I opened the throttle I simultaneously applied full left rudder and as I became airborn I found that I had full left rudder on. (This was the answer always, as I afterwards found, and I was never in trouble again from this cause)"

August 98 issue of FLight journal has the flying of the Camel by Rich King. 160 Hp Gnome engine (yes, rotary)
qoute:
..Right rudder is needed to keep the Camel tracking straight ahead while it is on the runway, and as the tail comes up, I find that my rudder correction was right on. I m facing straight down the center of the runway.........A little back pressure on the control stick and the bumpy ground falls away behind me, and the Camels speed continues to increase at an exhilarating rate. A little forward pressure on the "closh handle" hold the aeroplane a few feet above the runway while its speed continues to increase. ....
Left Rudder is now needed to keep the racing Camel straight....." end quote

http://www.theaerodrome.com/forum/2001/11306-sopwith-camel-flight-characteristics-2.html


From the Frank Tallman book "Flying the old planes"...

My Sopwith Camel is, as far as I'm aware, the only original World War 1 Camel ever brought back to flying condition. It was originally owned by Colonel Jarrett of the Jarrett War Museum located on the old Steel Pier in Atlantic City; who in the 1930's had the best museum of WWI equipment ever assembled, including the Belgian War Museum in Brussels. The Jarrett Museum fell on hard times following WWII and, with time and money on my side after my service period, and a lifelong ambition of owning a WWI aircraft, I purchased for a small sum (by today's standards) several antique aircraft including the Camel, a Nieuport 28, a Pfalz D.XII, a Fokker D.VII and a SPAD VII.

The Camel was the first WWI aircraft I brought back to flying condition and required some major rebuilding, which took several years, many thousands of dollars and a whole host of experts including Paul Poberzney of the Experimental Aircraft Association, the gifted master craftsman Ned Kensinger, the Hawker Siddeley Group and a number of very dedicated volunteer's.

(NB: There is quite a bit on the rebuilding process in the Chapter but I have left it out of this extract for the sake of space).

When the day finally came to fly the air was filled with great anticipation. On arrival at the airport though I was dismayed to hear from my team that they had been trying to get the temperamental 110 h.p. Le Rhone started since 8.00am that morning, without success. The lack of knowledge amongst us regarding the Le Rhone was appalling. Did we have spark? Yes. Was the mag set? Yes. Had the commutator ring been wiped off? Yes. Had we primed it? Only every other cylinder.

With only a vague notion of what I was doing I clambered into the cockpit (a very tight fit) and reviewed the cord-wrapped Spade stick, the Block tube, carburettors next to one's knees, the flexible air intake to the outside air scoops, the wood wire brace longerons, the instrument panel with it's clutter and the duel control cables to the wooden rudder bar. At my request, the crew forced open the intake valves as the engine was pushed through (switch off) and shot a charge of fuel in each cylinder, as the cylinder came in front of the hole in the cowling. By accident, rather than by knowledge, I advanced the long lever controlling the air, and in pushing the manet (a small wheel knob on the miniature control quadrant) forward and then returning it, I had hit on the correct starting procedure. Wonder of wonders, as I flipped the porcelain-mounted switch up and called for contact, the Le Rhone started with a full-throated bellow, scaring both me and the crew!

By shoving the fuel-controlling lever forward and using the coupe (cut-out) button on the stick, I was able to keep the engine running. Soon the never-to-be-forgotten smell of castor oil infused our area, and the sight of oil splattering the leading edge of the low wings indicated that the engine was lubricating properly. Taxiing practice ended ignominiously a hundred feet from the starting point, when my newfound knowledge wasn't equal to the delicate adjustment of fuel and air, and the Le Rhone quit.

The revitalised ground crew hauled the 900 pound airplane over the grass and faced me into the wind. For safety sake we changed the plugs, and the Le Rhone started first try. I headed down the field with the throttle wide open. The tail came up almost instantly, and visibility was good, except for the Aldis sight and the twin Vickers. Not having planned on flight it came as something of a shock to find the Camel airborne at about 35 mph after a ground run of just 150 feet. Being afraid of jockeying with my ticklish fuel and air controls I stayed low and just got used to the Camel's sensitive ailerons, elevators and rudder.

I circled the field once, got into position for landing, shut fuel air and switch off, and made a light forward slip, touching down gently on three points. Total landing couldn't have been much longer than the initial take-off run.

So much for my first (unintentional) flight in the Camel.

Since then I've spent more time flying the Camel than any of the other historical aircraft in our collection. I've also had more forced landings in it than all the rest of the WWI aircraft combined. It's that temperamental Le Rhone. Cylinders have blown, magneto's have failed, even fouled spark plugs have brought me down unceremoniously, with sweating hands and my heart in my mouth, desperately seeking a patch of open ground on which to land. Yet for all that it's the one I turn to first for any show or exhibition, as the Camel gets my blood going like no other. This is an aircraft that is a joy to fly.

With the Le Rhone 9J, you cannot adjust either the fuel or air intake without running the risk of a dead-stick landing. You must leave them alone and use you Coupe (cut-out) button for all fight handling.

The take-off run is easy. In a wind of 10 to 15 knots you are airborne in a couple of plane lengths at 35 mph and climbing out at 60 mph, with a rate of climb of almost 1,000 feet a minute. The elevators are sensitive, as is the rudder. Consequently, when fling for any distance I often put the heels of my shoes on the floor tie wires, because the vibration of the Le Rhone through the rudder bar exaggerates the rudder movements.

In level flight at 100 mph indicated, the Camel is delightful, with just a hint of rudder being required for straight flight. The structure is rugged enough to feel comfortable in loops, and being slightly tail-heavy it goes up and over in an incredibly small circle in the sky, and faster than any other WWI aircraft I have flown. Sneeze and your halfway through a loop before your aware of what's happened. 110 mph is enough to carry you through, and as you slow down over the top you must feed in rudder against the torque.

In military shows I have ground strafed, and as soon as the airspeed reaches 130 to 140 mph the nose begins to hunt up and down, and the elevator becomes extremely sensitive. I feel this action is due largely to the square windshield between the two Vickers guns, causing a substantial burble over the tail surfaces.

Turns are what the Camel is all about. Turning to the right with the torque requires the top rudder to hold the nose up, and the speed with which you can complete a 360-degree turn is breathtaking. Left turns are slower, with the nose wanting to rise during the turn. But small rudder input easily keeps the nose level with the horizon. In stalls at 35 to 40 mph the nose drops frighteningly fast and hard to the right, but you also get control back quickly, although a surprising amount of altitude has been lost. I have had the pleasure of limited dog fighting with other WWI fighters, and there are none that can stay with a Camel in a turn.

With the Le Rhone being temperamental as it is, flying the Camel is best done at times when there are few other aircraft in the sky, leaving easy access to the airport in cases of emergency. The Camel touches down easily but runs out of rudder control almost instantly, and if you bounce your landing at all, you are likely to find yourself in a hairy ground loop looking at a rapidly bending aileron dragging in the grass.

For a wide variety of reasons, the Camel is a fascinating airplane, flight-wise as well as historically. But don't think I ever got out of the Camel after being airborne even in the coldest weather without buckets of perspiration and considerable gratitude that I had gotten the little girl home again without breaking her into splinters!

http://www.theaerodrome.com/forum/aircraft/45869-sopwith-camel-myth-6.html


Additional comments on Camel handling characteristics by  Victor Yeates, author of "Winged Victory" (yes, it's a fictional novel, but his experiences of flying a camel were realistic, and are a valid, honest description)...


Re training:

"Camels were wonderful fliers when you had got used to them, which took about three months of hard flying. At the end of that time you were either dead, a nervous wreck, or the hell of a pilot and a terror to Huns . . ."

Re turns:

"And in the more legitimate matter of vertical turns, nothing in the skies could follow in so tight a circle..."

Re the half-roll (Split S):

"The same with the half-roll. Nothing would half-roll like a Camel. A twitch of the stick and flick of the rudder and you were on your back. The nose dropped at once and you pulled out having made a complete reversal of direction in the least possible time.

Thomson, the squadron stunt expert told him that it (half-roll) was just the first half of a roll followed by the second half of a loop; the only stunt useful in fighting. If you were going the wrong way, it was the quickest known method of returning in your slipstream."

Re the loop (he didn't like looping a Camel):

"But a Camel had to be flown carefully round with exactly the right amount of left rudder, or else it would rear and buck and hang upside down and flop and spin."

Re general flight:

" . . . a Camel had to be held in flying position all the time, and was out of it in a flash. It was nose light, having a rotary engine weighing next to nothing per horse power, and was rigged tail heavy so that you had to be holding her down all the time. Take your hand off the stick and it would rear right up with a terrific jerk and stand on its tail."

Re ground strafing (which he hated due to ground anti-ac machine gun fire):

"Unfortunately, they were good machines for ground-strafing. They could dive straight down on anything, and when a few feet off the ground, go straight up again."

Re speed:"...a Camel was a wonderful machine in a scrap. If only it had been fifty per cent faster! There was the rub. A Camel could neither catch anything except by surprise, nor hurry away from an awkward situation, and seldom had the option of accepting or declining combat...You couldn't have everything."

http://www.theaerodrome.com/forum/aircraft/45869-sopwith-camel-myth-6.html

-->
<fdm_config name="Sopwith Camel" version="2.0" release="Alpha">

    <fileheader>
        <author> Brent Hugh</author>
        <filecreationdate> 2011-10-29 </filecreationdate>
        <description>Sopwith Camel with Weapons, matches available data for climb, max speed, general handling</description>
        <version>Version 1.0</version>
    </fileheader>

    <metrics>
        <!-- wing area 19.76 m^2 per sopwith-camel-specs-drawings-2-2.jpg, see docs directory-->
        <wingarea unit="FT2"> 212.6948698 </wingarea>
        <wingspan unit="FT"> 26.91 </wingspan>
        <!-- wing chord calculated by measuring drawing sopwith-camel-specs-drawings-2-2.jpg; see calculations at Camel-JSBSim-calcs-2011-10D.xls sheet Camel Dimensions -->
        <chord unit="FT"> 4.5045 </chord>
        <wing_incidence unit=""> 2.5 </wing_incidence>


        <!-- htailarea calculated by measuring drawing sopwith-camel-specs-drawings-2-2.jpg; see calculations at Camel-JSBSim-calcs-2011-10D.xls sheet Camel Dimensions
          But we assume 13.1 ft2 for htail, plus about half of elevator area (11.8 ft2) because the
          elevator is there but unless the pilot is holding it absolutely steady it doesn't really work to
          stabilize as well as a fixed surface. -->
        <htailarea unit="FT2"> 19.6 </htailarea>

        <!-- htailarm calculated by measuring drawing sopwith-camel-specs-drawings-2-2.jpg; see calculations at Camel-JSBSim-calcs-2011-10D.xls sheet Camel Dimensions -->
        <htailarm unit="FT"> 12.38 </htailarm>


        <!--Indeed you are correct about the Rudder - it's area was a paltry 4.9 sq. ft. (and fin at 3 sq. ft.) http://www.theaerodrome.com/forum/aircraft/47951-sopwith-camel-myth-2-a.html

        The pathetically small fixed area on the fin/rudder made the problems in yaw even worse. A pilot generally doesn't hold the rudder pedals stiffly enough
for the rudder to contribute very much to yaw stability.

        http://www.djaerotech.com/dj_askjd/dj_questions/short_coupled.html
         -->

        <!-- <vtailarea unit="FT2"> 7.90 </vtailarea> -->
        <!-- We'll say 3 sq ft for fin plus an additional 2 sq ft for
        the effect of the rudder -->
        <vtailarea unit="FT2"> 5 </vtailarea>
        <!-- htailarm calculated by measuring drawing sopwith-camel-specs-drawings-2-2.jpg; see calculations at Camel-JSBSim-calcs-2011-10D.xls sheet Camel Dimensions -->
        <vtailarm unit="FT"> 13.66 </vtailarm>

        <location name="AERORP" unit="IN">
            <x> 60 </x>
            <y> 0 </y>
            <z> 0 </z>
        </location>
        <location name="EYEPOINT" unit="IN">
            <x> 29.25 </x>
            <y> -18 </y>
            <z> 57 </z>
        </location>
        <location name="VRP" unit="IN">
            <x> 0 </x>
            <y> 0 </y>
            <z> 0 </z>
        </location>
    </metrics>


    <mass_balance>
        <!-- iyy and izz are .3 X that of a typical plane of these dimensions due to Camel design concentrating mass v. close to c of g.  ixx is not affected by this
         design feature so remains unchanged. -->
        <!-- <ixx unit="SLUG*FT2">708</ixx> -->
        <ixx unit="SLUG*FT2">740</ixx>
        <iyy unit="SLUG*FT2">182.7</iyy>
        <izz unit="SLUG*FT2">366.9</izz>
        <ixz unit="KG*M2">0</ixz>
        <iyz unit="KG*M2">0</iyz>
        <ixy unit="KG*M2">0</ixy>
        <emptywt unit="LBS">1210</emptywt>
        <location name="CG" unit="IN">
            <x>60</x>
            <y>0</y>
            <z>-5.62</z>
        </location>

        <pointmass name="Equipment">
            <form shape="ball">
               <radius unit="FT"> 3 </radius>
            </form>
            <weight unit="LBS"> 90 </weight>
            <location name="cockpit_rear" unit="IN">
                <x> 80 </x>
                <y> 0 </y>
                <z> 0 </z>
            </location>
        </pointmass>
    </mass_balance>

    <ground_reactions>
        <contact type="BOGEY" name="LEFT_MAIN">
            <location unit="IN">
                <x> 30 </x>
                <y> -29.06 </y>
                <z> -65 </z>
            </location>
            <static_friction> 0.99 </static_friction>
            <dynamic_friction> 0.9 </dynamic_friction>
            <rolling_friction> 0.02 </rolling_friction>
            <spring_coeff unit="LBS/FT"> 1000 </spring_coeff>
            <damping_coeff unit="LBS/FT/SEC"> 900 </damping_coeff>
            <max_steer unit="DEG"> 0 </max_steer>
            <brake_group> NONE </brake_group>
            <retractable> 0 </retractable>
        </contact>
        <contact type="BOGEY" name="RIGHT_MAIN">
            <location unit="IN">
                <x> 30 </x>
                <y> 29.06 </y>
                <z> -65 </z>
            </location>
            <static_friction> 0.99 </static_friction>
            <dynamic_friction> 0.9 </dynamic_friction>
            <rolling_friction> 0.02 </rolling_friction>
            <spring_coeff unit="LBS/FT"> 1000 </spring_coeff>
            <damping_coeff unit="LBS/FT/SEC"> 900 </damping_coeff>
            <max_steer unit="DEG"> 0 </max_steer>
            <brake_group> NONE </brake_group>
            <retractable> 0 </retractable>
        </contact>
        <contact type="BOGEY" name="TAIL">
            <location unit="IN">
                <x> 239 </x>
                <y> 0 </y>
                <z> -18 </z>
            </location>
            <static_friction> 5 </static_friction>
            <dynamic_friction> 5 </dynamic_friction>
            <rolling_friction> .1 </rolling_friction>
            <spring_coeff unit="LBS/FT"> 200 </spring_coeff>
            <damping_coeff unit="LBS/FT/SEC"> 195 </damping_coeff>
            <max_steer unit="DEG"> -20 </max_steer>
            <brake_group> NONE </brake_group>
            <retractable> 0 </retractable>
        </contact>
        <contact type="STRUCTURE" name="LEFT_WING">
            <location unit="IN">
                <x> 45 </x>
                <y> -164 </y>
                <z> -16.62 </z>
            </location>
            <static_friction> 0.8 </static_friction>
            <dynamic_friction> 0.5 </dynamic_friction>
            <rolling_friction> 0.5 </rolling_friction>
            <spring_coeff unit="LBS/FT"> 200 </spring_coeff>
            <damping_coeff unit="LBS/FT/SEC"> 195 </damping_coeff>
            <max_steer unit="DEG"> 0 </max_steer>
            <brake_group> NONE </brake_group>
            <retractable> 0 </retractable>
        </contact>
        <contact type="STRUCTURE" name="RIGHT_WING">
            <location unit="IN">
                <x> 45 </x>
                <y> 164 </y>
                <z> -12.62 </z>
            </location>
            <static_friction> 0.8 </static_friction>
            <dynamic_friction> 0.5 </dynamic_friction>
            <rolling_friction> 0.5 </rolling_friction>
            <spring_coeff unit="LBS/FT"> 200 </spring_coeff>
            <damping_coeff unit="LBS/FT/SEC"> 195 </damping_coeff>
            <max_steer unit="DEG"> 0 </max_steer>
            <brake_group> NONE </brake_group>
            <retractable> 0 </retractable>
        </contact>
        <contact type="BOGEY" name="LEFT_WING_REAR">
            <location unit="IN">
                <x> 125 </x>
                <y> -164 </y>
                <z> 18.62 </z>
            </location>
            <static_friction> 0.8 </static_friction>
            <dynamic_friction> 0.5 </dynamic_friction>
            <rolling_friction> 0.5 </rolling_friction>
            <spring_coeff unit="LBS/FT"> 200 </spring_coeff>
            <damping_coeff unit="LBS/FT/SEC"> 195 </damping_coeff>
            <max_steer unit="DEG"> 0 </max_steer>
            <brake_group> NONE </brake_group>
            <retractable> 0 </retractable>
        </contact>
        <contact type="BOGEY" name="RIGHT_WING_REAR">
            <location unit="IN">
                <x> 125 </x>
                <y> 164 </y>
                <z> -16.62 </z>
            </location>
            <static_friction> 0.8 </static_friction>
            <dynamic_friction> 0.5 </dynamic_friction>
            <rolling_friction> 0.5 </rolling_friction>
            <spring_coeff unit="LBS/FT"> 200 </spring_coeff>
            <damping_coeff unit="LBS/FT/SEC"> 195 </damping_coeff>
            <max_steer unit="DEG"> 0 </max_steer>
            <brake_group> NONE </brake_group>
            <retractable> 0 </retractable>
        </contact>
        <contact type="STRUCTURE" name="LEFT_WING_OUTER_TOP">
            <location unit="IN">
                <x> 85 </x>
                <y> -164 </y>
                <z> 24.62 </z>
            </location>
            <static_friction> 0.8 </static_friction>
            <dynamic_friction> 0.5 </dynamic_friction>
            <rolling_friction> 0.5 </rolling_friction>
            <spring_coeff unit="LBS/FT"> 200 </spring_coeff>
            <damping_coeff unit="LBS/FT/SEC"> 195 </damping_coeff>
            <max_steer unit="DEG"> 0 </max_steer>
            <brake_group> NONE </brake_group>
            <retractable> 0 </retractable>
        </contact>
        <contact type="BOGEY" name="RIGHT_WING_OUTER_TOP">
            <location unit="IN">
                <x> 85 </x>
                <y> 164 </y>
                <z> 24.62 </z>
            </location>
            <static_friction> 0.8 </static_friction>
            <dynamic_friction> 0.5 </dynamic_friction>
            <rolling_friction> 0.5 </rolling_friction>
            <spring_coeff unit="LBS/FT"> 200 </spring_coeff>
            <damping_coeff unit="LBS/FT/SEC"> 195 </damping_coeff>
            <max_steer unit="DEG"> 0 </max_steer>
            <brake_group> NONE </brake_group>
            <retractable> 0 </retractable>
        </contact>

        <contact type="BOGEY" name="NOSE">
            <location unit="IN">
                <x> 0 </x>
                <y> 0 </y>
                <z> 0 </z>
            </location>
            <static_friction> 2 </static_friction>
            <dynamic_friction> 2 </dynamic_friction>
            <rolling_friction> 2 </rolling_friction>
            <spring_coeff unit="LBS/FT"> 200 </spring_coeff>
            <damping_coeff unit="LBS/FT/SEC"> 300 </damping_coeff>
            <max_steer unit="DEG"> 0 </max_steer>
            <brake_group> NONE </brake_group>
            <retractable> 0 </retractable>
        </contact>

        <contact type="BOGEY" name="PROP_TOP">
            <location unit="IN">
                <x> -10 </x>
                <y> 0 </y>
                <z> 59 </z>
            </location>
            <static_friction> 2 </static_friction>
            <dynamic_friction> 2 </dynamic_friction>
            <rolling_friction> 2 </rolling_friction>
            <spring_coeff unit="LBS/FT"> 200 </spring_coeff>
            <damping_coeff unit="LBS/FT/SEC"> 300 </damping_coeff>
            <max_steer unit="DEG"> 0 </max_steer>
            <brake_group> NONE </brake_group>
            <retractable> 0 </retractable>
        </contact>
        <contact type="BOGEY" name="PROP_BOTTOM">
            <location unit="IN">
                <x> -10 </x>
                <y> 0 </y>
                <z> -59 </z>
            </location>
            <static_friction> 2 </static_friction>
            <dynamic_friction> 2 </dynamic_friction>
            <rolling_friction> 2 </rolling_friction>
            <spring_coeff unit="LBS/FT"> 200 </spring_coeff>
            <damping_coeff unit="LBS/FT/SEC"> 300 </damping_coeff>
            <max_steer unit="DEG"> 0 </max_steer>
            <brake_group> NONE </brake_group>
            <retractable> 0 </retractable>
        </contact>


        <contact type="BOGEY" name="WING_TOP">
            <location unit="IN">
                <x> 30 </x>
                <y> 0 </y>
                <z> 36 </z>
            </location>
            <static_friction> 2 </static_friction>
            <dynamic_friction> 2 </dynamic_friction>
            <rolling_friction> 2 </rolling_friction>
            <spring_coeff unit="LBS/FT"> 200 </spring_coeff>
            <damping_coeff unit="LBS/FT/SEC"> 300 </damping_coeff>
            <max_steer unit="DEG"> 0 </max_steer>
            <brake_group> NONE </brake_group>
            <retractable> 0 </retractable>
        </contact>

        <contact type="BOGEY" name="WING_TOP_MID_LEFT">
            <location unit="IN">
                <x> 30 </x>
                <y> -50 </y>
                <z> 36 </z>
            </location>
            <static_friction> 2 </static_friction>
            <dynamic_friction> 2 </dynamic_friction>
            <rolling_friction> 2 </rolling_friction>
            <spring_coeff unit="LBS/FT"> 200 </spring_coeff>
            <damping_coeff unit="LBS/FT/SEC"> 300 </damping_coeff>
            <max_steer unit="DEG"> 0 </max_steer>
            <brake_group> NONE </brake_group>
            <retractable> 0 </retractable>
        </contact>

        <contact type="BOGEY" name="WING_TOP_MID_RIGHT">
            <location unit="IN">
                <x> 30 </x>
                <y> 50 </y>
                <z> 36 </z>
            </location>
            <static_friction> 2 </static_friction>
            <dynamic_friction> 2 </dynamic_friction>
            <rolling_friction> 2 </rolling_friction>
            <spring_coeff unit="LBS/FT"> 200 </spring_coeff>
            <damping_coeff unit="LBS/FT/SEC"> 300 </damping_coeff>
            <max_steer unit="DEG"> 0 </max_steer>
            <brake_group> NONE </brake_group>
            <retractable> 0 </retractable>
        </contact>

        <contact type="BOGEY" name="MIDDLE_UPPER">
            <location unit="IN">
                <x> 70 </x>
                <y> 0 </y>
                <z> 36 </z>
            </location>
            <static_friction> 2 </static_friction>
            <dynamic_friction> 2 </dynamic_friction>
            <rolling_friction> 2 </rolling_friction>
            <spring_coeff unit="LBS/FT"> 200 </spring_coeff>
            <damping_coeff unit="LBS/FT/SEC"> 300 </damping_coeff>
            <max_steer unit="DEG"> 0 </max_steer>
            <brake_group> NONE </brake_group>
            <retractable> 0 </retractable>
        </contact>

        <contact type="BOGEY" name="MIDDLE_BACK_UPPER">
            <location unit="IN">
                <x> 130 </x>
                <y> 0 </y>
                <z> 36 </z>
            </location>
            <static_friction> 2 </static_friction>
            <dynamic_friction> 2 </dynamic_friction>
            <rolling_friction> 2 </rolling_friction>
            <spring_coeff unit="LBS/FT"> 200 </spring_coeff>
            <damping_coeff unit="LBS/FT/SEC"> 300 </damping_coeff>
            <max_steer unit="DEG"> 0 </max_steer>
            <brake_group> NONE </brake_group>
            <retractable> 0 </retractable>
        </contact>

        <contact type="BOGEY" name="BACK_UPPER">
            <location unit="IN">
                <x> 180 </x>
                <y> 0 </y>
                <z> 36 </z>
            </location>
            <static_friction> 2 </static_friction>
            <dynamic_friction> 2 </dynamic_friction>
            <rolling_friction> 2 </rolling_friction>
            <spring_coeff unit="LBS/FT"> 200 </spring_coeff>
            <damping_coeff unit="LBS/FT/SEC"> 300 </damping_coeff>
            <max_steer unit="DEG"> 0 </max_steer>
            <brake_group> NONE </brake_group>
            <retractable> 0 </retractable>
        </contact>


        <contact type="BOGEY" name="TAIL_TOP">
            <location unit="IN">
                <x> 239 </x>
                <y> 0 </y>
                <z> 36 </z>
            </location>
            <static_friction> 2 </static_friction>
            <dynamic_friction> 2 </dynamic_friction>
            <rolling_friction> 2 </rolling_friction>
            <spring_coeff unit="LBS/FT"> 200 </spring_coeff>
            <damping_coeff unit="LBS/FT/SEC"> 300 </damping_coeff>
            <max_steer unit="DEG"> 0 </max_steer>
            <brake_group> NONE </brake_group>
            <retractable> 0 </retractable>
        </contact>


    </ground_reactions>

    <propulsion>
        <engine file="Clerget9B">
            <location unit="IN">
                <x> 10 </x>
                <y> 0 </y>
                <z> 0 </z>
            </location>
            <orient unit="DEG">
                <roll> 0 </roll>
                <pitch> 0 </pitch>
                <yaw> 0 </yaw>
            </orient>
            <feed>0</feed>
            <thruster file="CamelProp">
                <!--OK, the docs say that sense =1 for CW propeller as seen
                from the cockpit.  The camel has a CW propeller by every example
                I've been able to find. This source definitely says, "The
                direction of rotation was counter-clockwise as seen from the
                propeller-end of the engine." The photos also show a CCW (from
                propeller-end) rotating prop.  That would be clockwise as seen
                from the pilot's seat and sense=1.
                http://www.gracesguide.co.uk/Clerget

                But sense=1 makes the Camel climb on RH
                turn and dive on LH turn.  Lots of sources say the opposite,
                especially including this experienced pilot who is clearly
                flying a craft with a CW propeller (as seen from cockpit) and
                yet he says the Camel dives on RH turn and climbs on LH.

                 http://www.youtube.com/watch?v=j6PnKUEFX8g

                Wikipedia says, "To easily ascertain the direction of gyro effect, simply remember that a rolling wheel tends, when it leans to the side, to turn in the direction of the lean." http://en.wikipedia.org/wiki/Gyroscope#Properties That means, for a CW (from the rear) propeller, a turn to the right causes nose to drop, exactly what is reported for the Camel.

                My conclusion is that JSBSim has it backwards and sense=1 corresponds to CCW rotation of the prop, as seen from the rear, as far as gyroscopic moment is concerned.

				However, as far as p_factor & torque is concerned, JSBSim seems to have it right.

                So what we're going to do is put in sense=1 here to get correct p_factor and torque effects, but then put in a correction down in the aero section
				to correct the moments, which JSBSim seems to have reversed.
                -->
                <sense>-1</sense>
                <location unit="IN">
                    <x> 0 </x>
                    <y> 0 </y>
                    <z> 0 </z>
                </location>
                <orient unit="DEG">
                    <roll> 0 </roll>
                    <pitch> 0 </pitch>
                    <yaw> 0 </yaw>
                </orient>
            </thruster>
        </engine>
        <!-- Fuel is behind the pilot, 22 gal, 133.6 lb.  Appears to be
          about half way between nose & tail.  With fuel full,
          AC was tailheavy acc to http://www.theaerodrome.com/forum/2000/9166-sopwith-camel-facts-2.html With fuel empty, nose heavy. -->
        <tank type="FUEL">
            <location unit="IN">
                <x> 90 </x>
                <y> 0 </y>
                <z> -5.62 </z>
            </location>
            <capacity unit="LBS">133.6</capacity>
            <contents unit="LBS">133.6</contents>
        </tank>
          <tank type="FUEL">
            <location unit="IN">
                <x> 60 </x>
                <y> 0 </y>
                <z> -5.62 </z>
            </location>
            <capacity unit="LBS">133.6</capacity>
            <contents unit="LBS">0</contents>
        </tank>
    </propulsion>

    <flight_control name="FCS: Camel">

        <channel name="Pitch">

            <summer name="Pitch Trim Sum">
              <input>fcs/elevator-cmd-norm</input>
              <input>fcs/pitch-trim-cmd-norm</input>
              <clipto>
                <min>-1</min>
                <max>1</max>
              </clipto>
            </summer>

            <aerosurface_scale name="Elevator Control">
              <input>fcs/pitch-trim-sum</input>
              <range>
                <min>-0.55</min>
                <max>0.55</max>
              </range>
              <output>fcs/elevator-pos-rad</output>
            </aerosurface_scale>

            <aerosurface_scale name="elevator normalization">
              <input>fcs/elevator-pos-rad</input>
              <domain>
                <min>-0.35</min>
                <max>0.35</max>
              </domain>
              <range>
                <min>-1</min>
                <max>1</max>
              </range>
              <output>fcs/elevator-pos-norm</output>
            </aerosurface_scale>

        </channel>

        <channel name="Roll">

            <summer name="Roll Trim Sum">
              <input>fcs/aileron-cmd-norm</input>
              <input>fcs/roll-trim-cmd-norm</input>

              <!-- This bias value just trims out the ailerons a bit so that
              the Camel doesn't require continual aileron input under
              full power.   -->
              <!-- <bias> 0.11825 </bias> -->
              <clipto>
                <min>-1</min>
                <max>1</max>
              </clipto>
            </summer>

            <aerosurface_scale name="Left Aileron Control">
              <input>fcs/roll-trim-sum</input>
              <range>
                <min>-0.35</min>
                <max>0.35</max>
              </range>
              <output>fcs/left-aileron-pos-rad</output>
            </aerosurface_scale>


            <aerosurface_scale name="Right Aileron Control">
              <input>fcs/roll-trim-sum</input>
              <range>
                <min>-0.35</min>
                <max>0.35</max>
              </range>
              <output>fcs/right-aileron-pos-rad</output>
            </aerosurface_scale>

            <aerosurface_scale name="left aileron normalization">
              <input>fcs/left-aileron-pos-rad</input>
              <domain>
                <min>-0.35</min>
                <max>0.35</max>
              </domain>
              <range>
                <min>-1</min>
                <max>1</max>
              </range>
              <output>fcs/left-aileron-pos-norm</output>
            </aerosurface_scale>

            <aerosurface_scale name="right aileron normalization">
              <input>fcs/right-aileron-pos-rad</input>
              <domain>
                <min>-0.35</min>
                <max>0.35</max>
              </domain>
              <range>
                <min>-1</min>
                <max>1</max>
              </range>
              <output>fcs/right-aileron-pos-norm</output>
            </aerosurface_scale>

        </channel>

        <channel name="Yaw">

            <summer name="Rudder Command Sum">
              <input>fcs/rudder-cmd-norm</input>
              <input>fcs/yaw-trim-cmd-norm</input>
              <clipto>
                <min>-0.35</min>
                <max>0.35</max>
              </clipto>
            </summer>

            <aerosurface_scale name="Rudder Control">
              <input>fcs/rudder-command-sum</input>
              <range>
                <min>-0.35</min>
                <max>0.35</max>
              </range>
              <output>fcs/rudder-pos-rad</output>
            </aerosurface_scale>

            <aerosurface_scale name="rudder normalization">
              <input>fcs/rudder-pos-rad</input>
              <domain>
                <min>-0.35</min>
                <max>0.35</max>
              </domain>
              <range>
                <min>-1</min>
                <max>1</max>
              </range>
              <output>fcs/rudder-pos-norm</output>
            </aerosurface_scale>

        </channel>

    </flight_control>

    <system file="crash-detect"/>
    <system file="automixture"/>

    <aerodynamics>
            <function name="aero/function/kCDge">
            <description>Change_in_drag_due_to_ground_effect</description>
            <product>
                  <table>
                      <independentVar>aero/h_b-mac-ft</independentVar>
                      <tableData>
                          0.0000	0.4800
                          0.1000	0.5150
                          0.1500	0.6290
                          0.2000	0.7090
                          0.3000	0.8150
                          0.4000	0.8820
                          0.5000	0.9280
                          0.6000	0.9620
                          0.7000	0.9880
                          0.8000	1.0000
                      </tableData>
                  </table>
            </product>
        </function>

        <function name="aero/function/kCLge">
            <description>Change_in_lift_due_to_ground_effect</description>
            <product>
                  <table>
                      <independentVar>aero/h_b-mac-ft</independentVar>
                      <tableData>
                          0.0000	1.2030
                          0.1000	1.1270
                          0.1500	1.0900
                          0.2000	1.0730
                          0.3000	1.0460
                          0.4000	1.0550
                          0.5000	1.0190
                          0.6000	1.0130
                          0.7000	1.0080
                          0.8000	1.0060
                          0.9000	1.0030
                          1.0000	1.0020
                          1.1000	1.0000
                      </tableData>
                  </table>
            </product>
        </function>


        <axis name="LIFT" unit="LBS">
            <function name="aero/force/Lift_alpha">
                <description>Lift due to alpha</description>
                <product>
                    <property>aero/qbar-psf</property>
                    <property>metrics/Sw-sqft</property>
                    <property>aero/function/kCLge</property>
                    <table>
                        <!--
                        <independentVar>aero/alpha-rad</independentVar>
                        <tableData>
                          -0.2          -0.5
                          0             0.15
                          0.23          1
                          0.3           1.03
                          0.6           0.4
                        </tableData>
                        -->
                        <!-- the lift data is based on wind tunnel data from:
                          On the Effect of Cutting a Hole in the Top Plan of a Biplane
                          By C.H. Powell, Repots and Memoranda (New Series), No. 419, Feb 1918
                          That includes data for the wings only, so it has been
                          massaged to approximate the entire AC and also extended
                          to create data for -90 to 90 degrees.  See
                          Camel-JSBSim-calcs-2011-10D.xls in Docs directory for details.
                        -->

                        <independentVar>aero/alpha-deg</independentVar>
                        <tableData>
                            -90	0
                            -60	-0.0875
                            -30	-0.35
                            -20	-0.525
                            -14	-0.448
                            -12	-0.392875
                            -10	-0.331625
                            -8	-0.26775
                            -6	-0.21385
                            -4	-0.1015
                            -3	-0.04235
                            -2	0.01575
                            -1	0.07035
                            0	0.1295
                            1	0.197225
                            2	0.267225
                            3	0.331625
                            4	0.392875
                            5	0.448
                            6	0.50225
                            8	0.60375
                            10	0.69125
                            12	0.784
                            14	0.86625
                            16	0.92925
                            18	0.93275
                            20	0.91175
                            30	0.6125
                            60	0.2625
                            90	0
                        </tableData>
                        <!-- The lift data from LesterBoffo -->
                        <!--
                        <independentVar>aero/alpha-rad</independentVar>
                        <tableData>
                          -0.2793        -1.298
                          -0.1396        -0.5118
                          -0.1047        -0.3244
                          -0.0698        -0.1446
                          -0.0349        0.0581
                           0.000         0.170
                           0.01745       0.355
                           0.03491       0.536
                           0.0428        0.69
                           0.0523        0.84
                           0.06981       0.984
                           0.1047         1.045
                           0.1396         1.18
                           0.1745         1.316
                           0.1918         1.59
                           0.2443         1.565
                           0.2793         1.491
                           0.3142         1.383
                           0.3316         1.214
                           0.3491         1.191
                           0.3665         1.037
                           0.3840         0.8031
                           0.436         0.6785
                        </tableData>
                        -->

                    </table>
                </product>
            </function>
            <function name="aero/force/Lift_elevator">
                <description>Lift due to Elevator Deflection</description>
                <product>
                    <property>aero/qbar-psf</property>
                    <property>metrics/Sw-sqft</property>
                    <property>fcs/elevator-pos-rad</property>
                    <!-- Aeromatic: <value>0.15</value> -->
                    <value>0.05</value>
                </product>
            </function>
        </axis>
        <axis name="DRAG" unit="LBS">
            <function name="aero/force/Drag_basic">
                <description>Drag at zero lift</description>
                <product>
                    <property>aero/qbar-psf</property>
                    <property>metrics/Sw-sqft</property>
                    <table>
                        <!-- We could model stall of one wing independent of the other here, if we knew what the conditions were that caused the stalls, such as one wing stalling at a different alpha angle than the other -->
                        <!-- Stall speed for the Camel is 48mph or 41.7 knots per wikipedia.  This corresponds to about 14 degrees of alpha -->
                        <!-- Experimenting with 15.5 instead. -->
                        <independentVar>aero/alpha-deg</independentVar>
                        <!-- <tableData>
                          -90         1.5
                          -20         0.9
                          -15.5         0.051
                          0           0.0378
                          15.5          0.051
                          20          0.9
                          90          1.5
                        </tableData> -->
                        <!-- Drag curve above is very abrupt from 15.5 - degrees
                        This is a more realistic type of drag curve. -->
                        <!-- <tableData>
                          -90         1.5
                          -20         0.9
                          -15.5         0.051
                          0           0.0378
                          15.5          0.051
                          20          0.9
                          90          1.5
                        </tableData>
                        -->
                        <!-- The drag data is based on wind tunnel data from:
                          On the Effect of Cutting a Hole in the Top Plan of a Biplane
                          By C.H. Powell, Repots and Memoranda (New Series), No. 419, Feb 1918
                          That includes data for the wings only, so it has been
                          massaged to meet the known zero-lift drag value for the Camel of .0378
                          and also extended to create data for -90 to 90 degrees.  See
                          Camel-JSBSim-calcs-2011-10D.xls in Docs directory for details.
                        -->
                        <tableData>
                            -90	5.318592965
                            -60	2.659296482
                            -30	0.759798995
                            -20	0.227939698
                            -14	0.146261307
                            -12	0.121567839
                            -10	0.100673367
                            -8	0.081678392
                            -6	0.069141709
                            -4	0.049196985
                            -3	0.042358794
                            -2	0.0378
                            -1	0.035140704
                            0	0.033051256
                            1	0.032671357
                            2	0.033241206
                            3	0.035330653
                            4	0.039129648
                            5	0.044638191
                            6	0.051096482
                            8	0.065722613
                            10	0.082058291
                            12	0.100483417
                            14	0.12061809
                            16	0.146831156
                            18	0.206855276
                            20	0.286824121
                            30	0.759798995
                            60	2.659296482
                            90	5.318592965
                        </tableData>

                    </table>
                </product>
            </function>
            <function name="aero/force/Drag_induced">
                <description>Induced drag</description>
                <product>
                    <property>aero/qbar-psf</property>
                    <property>metrics/Sw-sqft</property>
                    <property>aero/cl-squared</property>
                    <property>aero/function/kCDge</property>
                    <value>0.04</value>
                </product>
            </function>
            <function name="aero/force/Drag_mach">
                <description>Drag due to mach</description>
                <product>
                    <property>aero/qbar-psf</property>
                    <property>metrics/Sw-sqft</property>
                    <table>
                        <independentVar>velocities/mach</independentVar>
                        <tableData>
                          0             0
                          0.7           0
                          1.1           0.023
                          1.8           0.015
                        </tableData>
                    </table>
                </product>
            </function>
            <function name="aero/force/Drag_beta">
                <description>Drag due to sideslip</description>
                <product>
                    <property>aero/qbar-psf</property>
                    <property>metrics/Sw-sqft</property>
                    <table>
                        <!--
                        <independentVar>aero/beta-rad</independentVar>
                        <tableData>
                          -1.57         0.5
                          -0.26         0.05
                          0             0
                          0.26          0.05
                          1.57          0.5
                        </tableData>
                        -->
                        <!-- Switching this to degrees just for
                        consistency with alpha drag -->

                        <independentVar>aero/beta-deg</independentVar>
                        <tableData>
                          -90           0.5
                          -30           0.05
                          0             0
                          30.0          0.05
                          90            0.5
                        </tableData>

                    </table>
                </product>
            </function>

            <function name="aero/force/Drag_elevator">
                <description>Drag due to Elevator Deflection</description>
                <product>
                    <property>aero/qbar-psf</property>
                    <property>metrics/Sw-sqft</property>
                    <abs>
                        <property>fcs/elevator-pos-norm</property>
                    </abs>
                    <!--Aeromatic: 0.02 -->
                    <value>0.015</value>
                </product>
            </function>

            <!-- Camels large (but ineffective) 'barn door' ailerons produced
            'awe-inspiring' amounts of adverse yaw and also a great deal of drag. With no
            rudder correction it falls into a deep side-slip within a few seconds.
            http://riseofflight.com/Forum/download/file.php?id=31942&mode=view
            -->
            <function name="aero/force/Drag_left_aileron">
                <description>Drag due to Left Aileron Deflection</description>
                <product>
                    <property>aero/qbar-psf</property>
                    <property>metrics/Sw-sqft</property>
                    <abs>
                        <property>fcs/left-aileron-pos-norm</property>
                    </abs>
                    <!--Aeromatic for Elevators: 0.02
                    Each aileron is nearly as large as the Elevator and there
                    are two of them on each side . . .
                    -->
                    <value>0.04</value>
                </product>
            </function>
            <function name="aero/force/Drag_right_aileron">
                <description>Drag due to Right Aileron Deflection</description>
                <product>
                    <property>aero/qbar-psf</property>
                    <property>metrics/Sw-sqft</property>
                    <abs>
                        <property>fcs/right-aileron-pos-norm</property>
                    </abs>
                    <!--Aeromatic for Elevators: 0.02
                    Each aileron is nearly as large as the Elevator and there
                    are two of them on each side . . .
                    -->
                    <value>0.04</value>
                </product>
            </function>


        </axis>
        <axis name="SIDE" unit="LBS">
            <function name="aero/force/Side_beta">
                <description>Side force due to beta</description>
                <product>
                    <property>aero/qbar-psf</property>
                    <property>metrics/Sw-sqft</property>
                    <property>aero/beta-rad</property>
                    <value>-1</value>
                </product>
            </function>
        </axis>

        <axis name="ROLL" unit="LBS*FT">
            <!-- This is to compensate for the fact the JSBSim has the direction of the gyroscopic moment from the propellor/engine
            reversed.  So we're switching sense to -1 to compensate, but then Torque is reversed.  So
            We're using this function to reverse the torque. -->
            <!--  Note for dummies:
              l = roll
              m = pitch
              n = yaw
            -->

           <!--  rem-ing this out for now -->

     		    <function name="aero/moment/Roll_moment_prop_torque_jsbsim_correction">
                <description>This reverses the roll moment of the propeller, which we have reversed to compensate for the reversed sense of the gyroscopic moment in JSBSim</description>
                <product>
                    <property>moments/l-prop-lbsft</property>
                    <value>-2</value>
                </product>
            </function>
            <!-- -->

            <function name="aero/moment/Roll_beta">
                <description>Roll moment due to beta</description>
                <product>
                    <property>aero/qbar-psf</property>
                    <property>metrics/Sw-sqft</property>
                    <property>metrics/bw-ft</property>
                    <property>aero/beta-rad</property>
                    <!-- value>-0.2</value -->
                    <!-- -0.1 according to Aeromatic -->
                    <value>-0.05</value>
                    <!-- Asymmetric stall -->
                    <!-- This is cribbed directory from p51d-jsbsim.xml for now -->
                  <!-- <table>
                        <independentVar lookup="row">aero/alpha-deg</independentVar>
                        <independentVar lookup="column">velocities/vc-kts</independentVar>
                         <tableData>
                                 0  22  38   44   48  52
                            -35  1  2  8     2    1   1
                            -10  1  3 14     4    2   1
                            -8   1  1  1     1    1   1
                            10.2 1  1  1     1    1   1
                            11   1  4 25     20   5   1
                            25   1  4 25     20   3   1
                            35   1  2 12     9    2   1
                        </tableData>
                    </table> -->
                </product>
            </function>
            <function name="aero/moment/Roll_damp">
                <description>Roll moment due to roll rate</description>
                <product>
                    <property>aero/qbar-psf</property>
                    <property>metrics/Sw-sqft</property>
                    <property>metrics/bw-ft</property>
                    <property>aero/bi2vel</property>
                    <property>velocities/p-aero-rad_sec</property>

                    <!-- Aeromatic value was -0.4; this is replaced by the value * table value
                    below, to reduce the damping values for the Camel -->

                    <!-- Camel was sensitive & poorly damped in all directions of motion.  Adjusting this 0-1 adjusts this sensitivity. -->

                    <!--this tends to damp or *stop* the roll, thus the negative numbers (the overall effect is always to reduce the amount of roll moment).
          					With the Camel, in certain situations the roll actually won't damp out (ie, when in a tailspin - if you take your hands off the controls it will
          					just keep tailspinning indefinitely, unlike modern aircraft which are designed to naturally recover if you take your hands off the controls);
          					this is like having a roll damp of 0 or close to it.

                    "its time period is 1 to 2 seconds, and the loss of height per turn 150 to 200
                    feet." The table below is designed to 'channel' the spin to a speed of between
                    3.14 and 6.28 rad per second.
          					-->

                    <value>0.9</value>
          					<table>
                        <independentVar>velocities/p-aero-rad_sec</independentVar>
                        <tableData>
                          -100         -0.25
                          -6.28        -0.75
					              	-5           -0.005
                          -3.14        -0.005
                          <!-- -2.5         -0.1
                          -0.4         -0.1 -->
                          0            -0.35
                          <!-- 0.4          -0.1
                          2.5          -0.1 -->
                          3.14         -0.005
						              5            -0.005
						              6.28         -0.75
                          100          -0.25
                        </tableData>
                    </table>


                    <!-- camel is poorly damped and won't get out of spin/dive/etc just by releasing the controls -->

                </product>
            </function>
            <function name="aero/moment/Roll_yaw">
                <description>Roll moment due to yaw rate</description>
                <product>
                    <property>aero/qbar-psf</property>
                    <property>metrics/Sw-sqft</property>
                    <property>metrics/bw-ft</property>
                    <property>aero/bi2vel</property>
                    <property>velocities/r-aero-rad_sec</property>
                    <!-- value>0.35</value -->
                    <value>0.08</value>
                    <!-- Spin on stall -->
                        <!-- This seems to provide the main source of spin/rotation for the aircraft
                        when it is stalling. In the abscence of wind tunnel data the numbers are a
                        guess, of course, but it matches well the contemporary description, that if in
                        a sharp turn you tightened up the elevator just a little too much, you would
                        end up in a severe spin. The trick is that the alpha angles less than 20
                        degrees or so (whatever the the stall angle of the wing is) shouldn't produce
                        any spin, especially at low speeds, or landing and takeoff become almost
                        impossible.-->
                    <table>

                        <independentVar lookup="row">aero/alpha-deg</independentVar>
                        <independentVar lookup="column">velocities/vc-kts</independentVar>
                        <tableData>
                                 0   13  28  38  48  70  100   150
                            -45  -1 -2 -12  -6   -8   -5  -3    -1.5
                            -35  -1 -4 -20  -20  -20  -12 -6    -3
                            -32  -1 -4 -20  -20  -20  -12 -6    -3
                            -16.5  -1 -1 -1   -1   -1   -1  -1  -1
                            -15.5  0 0   0    0    0    0  0     0
                             0     0 0   0    0    0    0  0     0
                            15.5   0 0   0    0    0    0  0     0
                            16.5   1  1  1     1    1   1   1     1
                            32   1  4  20    20   20  12  6     3
                            35   1  4  20    20   20  12  6     3
                            45   1  2  12    8    8   5   3     1.5
                        </tableData>
                    </table>
                </product>
            </function>
            <function name="aero/moment/Roll_aileron">
                <description>Roll moment due to aileron</description>
                <product>
                    <property>aero/qbar-psf</property>
                    <property>metrics/Sw-sqft</property>
                    <property>metrics/bw-ft</property>
                    <property>fcs/left-aileron-pos-rad</property>

                    <!-- .08 per aeromatic; Camel had relatively ineffective ailerons;  they
                    are large as 'barn doors' but induce tons of drag & adverse yaw. 23 seconds
                    to slow roll - if could even be done at all! -->
                    <table>
                        <independentVar>velocities/mach</independentVar>
                        <tableData>
                          0             0.07
                          2             0.01
                        </tableData>
                    </table>
                    <!-- It became harder & harder to deflect the Camel's
                    ailerons as the speed increased.
                    p. 7: http://assets.cambridge.org/97805218/09924/sample/9780521809924ws.pdf  -->
                   <table>
                        <independentVar>velocities/ve-kts</independentVar>
                        <tableData>
                          0             1
                          70            0.9
                          180           0.3
                          400           0
                        </tableData>
                    </table>
                    <!-- Asymmetric stall; you lose aileron control as stall deepens -->
                    <!-- This is cribbed directly from p51d-jsbsim.xml for now -->
                    <table>
                        <independentVar lookup="row">aero/alpha-deg</independentVar>
                        <tableData>
                        -35    0.3
                        -19    0.3
                        -15.5    1
                        15     1
                        19     0.3
                        35     0.3
                        </tableData>
                    </table>
                </product>
            </function>
            <function name="aero/moment/Roll_rudder">
                <description>Roll moment due to rudder</description>
                <product>
                    <property>aero/qbar-psf</property>
                    <property>metrics/Sw-sqft</property>
                    <property>metrics/bw-ft</property>
                    <property>fcs/rudder-pos-rad</property>
                    <!-- Aeromatic 0.01 -->
                    <value>0.01</value>
                </product>
            </function>
            <!--
               Create roll moment with a tendency
               to drop a wing at stall.
               This will help to induce a spin.

               From example/source of the following table (not Sopwith Camel):
               #The positive value at aero/alpha-deg = 10.35
               #is to simulate actual behavior.  The NACA
               #test report on stall behavior says that
               #initially it will drop the right wing and then
               #roll to the left as the stall deepens.
               #this commented out for Camel.

               Camel: The idea of the r-aero-rad-_sec table is to turn the spin in the
               direction of the change in yaw, ie, spin in the direction the
               AC is already spinning, if any.
            -->
           <function name="aero/coefficient/Clalpha">
                <description>roll_moment_due_to_alpha</description>
                <product>
                    <property>aero/qbar-psf</property>
                    <property>metrics/Sw-sqft</property>
                    <property>metrics/bw-ft</property>
                    <table>
                        <independentVar>velocities/r-aero-rad_sec</independentVar>
                        <tableData>
                          -34.15             1
                          -.0001             1
                          0                  0
                          .0001             -1
                          34.15             -1
                        </tableData>
                    </table>
                    <table>
                        <independentVar lookup="row">aero/alpha-deg</independentVar>
                        <independentVar lookup="column">aero/Re</independentVar>
                        <tableData>
                                          2500000  5000000  10000000   20000000
                                 -23.0    0.0    -0.005   -0.0025   -0.00025
                                 -18      0.0    -0.00025 -0.000125 -0.0000125
                                 -16      0       0       0         0
                                   0.0    0.0     0.0     0.0       0.0
                                  16      0       0       0         0
                                  18      0.0     0.00025 0.000125  0.00000125
                                  23      0.0     0.0005  0.00025   0.0000025
                        </tableData>
                    </table>
                </product>
            </function>


        </axis>
        <axis name="PITCH" unit="LBS*FT">
            <function name="aero/moment/Pitch_alpha">
                <description>Pitch moment due to alpha</description>
                <product>
                    <property>aero/qbar-psf</property>
                    <property>metrics/Sw-sqft</property>
                    <property>metrics/cbarw-ft</property>
                    <property>aero/alpha-rad</property>
                    <!-- <value>-0.5</value> orig -->
                    <value>-0.5</value>
                </product>
            </function>

            <function name="aero/moment/Pitch_elevator">
                <description>Pitch moment due to elevator</description>
                <product>
                    <property>aero/qbar-psf</property>
                    <property>metrics/Sw-sqft</property>
                    <property>metrics/cbarw-ft</property>
                    <property>fcs/elevator-pos-rad</property>
                    <table>
                        <independentVar>velocities/mach</independentVar>
                        <tableData>
                            <!-- aeromatic original values:
                                        <tableData>
                                          0.0     -1.100
                                          2.0     -0.275
                                        </tableData>
                                  Camel had a powerful and sensitive elevator
                            -->
                            0      -1.1
                            2      -0.275

                        </tableData>
                    </table>

                    <!-- The idea of the following table is to model the force feedback or the
                    idea that as you pull higher & higher Gs you really can't just keep yanking on
                    the controls as hard. They are pulling back harder and harder with back-force
                    or maybe you are just feeling the G forces physically with your body that
                    gives you the feedback to stop yanking on the controls so hard.
                    Load factor is in Gs, http://en.wikipedia.org/wiki/Load_factor_(aeronautics)
                    -->

                    <table>

                        <independentVar>forces/load-factor</independentVar>
                        <tableData>
                            <!-- -.0551 = aeromatic original value; Camel had a powerful and
                            sensitive elevator -->
                           -100     0.01
                            -10     0.2
                             -1     1
                              0     1
                              1     1
                             10     0.2
                            100     0.01

                        </tableData>
                    </table>

                    <!-- Asymmetric stall; you lose elevator control as stall deepens -->
                    <table>
                        <independentVar lookup="row">aero/alpha-deg</independentVar>
                        <tableData>
                        -35    0.3
                        -21    0.3
                        -16    1
                        16     1
                        21     0.3
                        35     0.3
                        </tableData>
                    </table>

                </product>
            </function>
            <function name="aero/moment/Pitch_damp">
                <description>Pitch moment due to pitch rate</description>
                <product>
                    <property>aero/qbar-psf</property>
                    <property>metrics/Sw-sqft</property>
                    <property>metrics/cbarw-ft</property>
                    <property>aero/ci2vel</property>
                    <property>velocities/q-aero-rad_sec</property>

                    <!-- Aeromatic value was -12; this is replaced by the value * table value
                    below, to reduce the damping values for the Camel -->

                    <value>-8</value>

                    <table>
                        <independentVar>velocities/q-aero-rad_sec</independentVar>
                        <tableData>
                          -32.14        0.2
						              -9            0.2
                          -2            0.02
						              -1.57         0.2
                          -0.7          0.2
                          -0.25         0.5
                          0             1.5
                          0.25          0.5
                          0.7           0.2
                          1.57          0.2
						              2             0.02
                          9             0.2
						              32.14         0.2
                        </tableData>
                    </table>

                    <!-- orig: <value>-12</value> -->
                    <!-- Camel is pretty poorly damped in most all ways -->
                </product>
            </function>

            <function name="aero/moment/Pitch_alphadot">
                <description>Pitch moment due to alpha rate</description>
                <product>
                    <property>aero/qbar-psf</property>
                    <property>metrics/Sw-sqft</property>
                    <property>metrics/cbarw-ft</property>
                    <property>aero/ci2vel</property>
                    <property>aero/alphadot-rad_sec</property>
                    <value>-7</value>
                </product>
            </function>

            <!-- "On strafing runs, as soon as the airspeed reaches 130 to 140 mph the nose
            begins to hunt up and down, and the elevator becomes extremely sensitive. I
            feel this action is due largely to the square windshield between the two
            Vickers guns, causing a substantial burble over the tail surfaces."
            We're modeling it here as simply reduced elevator effectiveness starting at
            that speed (130 mph = 0.17 mach) - which may not be the best way. -->

            <function name="aero/moment/Pitch_burble">
                <description>Pitch moment due to burble at high speeds</description>
                <product>
                     <value> 400 </value>
                     <table>
                        <independentVar>velocities/mach</independentVar>
                        <tableData>
                            <!-- -.0551 = aeromatic original value; Camel had a powerful and
                            sensitive elevator -->
                            0      0
                            <!-- "On strafing runs, as soon as the airspeed reaches 130 to 140 mph the nose
                            begins to hunt up and down, and the elevator becomes extremely sensitive. I
                            feel this action is due largely to the square windshield between the two
                            Vickers guns, causing a substantial burble over the tail surfaces."
                            We're modeling it here as simply bumps up/down in pitch starting at
                            that speed (130 mph = 0.196 mach). -->
                            0.196    0
                            0.197   -0.5
                            0.198    0.5
                            0.199   -0.6
                            0.200    0.6
                            0.201   -0.7
                            0.202    0.7
                            0.203   -0.8
                            0.204    0.8
                            0.205   -0.9
                            0.2064   0.9
                            0.207   -1
                            0.2083   1
                            0.209   -1.1
                            0.2101   1.2
                            0.21103 -1.3
                            0.21202  1.4
                            0.21304 -1.5
                            0.21406  1.6
                            0.21501 -1.7
                            0.21605  1.7
                            0.21703 -1.3
                            0.21802  1.7
                            0.21904 -1.4
                            0.22006  1.5
                            0.22101 -1.7
                            0.22205  1.7
                            0.22301 -1.7
                            0.22405  1.1
                            0.22501 -1.7
                            0.22605  1.7
                            0.227   -1.9
                            0.2283   1.7
                            0.229   -1.2
                            0.2301   1.1
                            0.23103 -1.0
                            0.23202  1.8
                            0.23304 -1.4
                            0.23406  1.2
                            0.23501 -1.1
                            0.23605  1.0
                            0.24     -1.3
                            0.25      1
                            0.26     -1.1
                            0.27      1.4
                            0.28     -1.1
                            0.29      1.5
                            0.30      0
                            2      0

                        </tableData>
                     </table>
                </product>
            </function>

            <!-- This is to compensate for the fact the JSBSim has the direction of the gyroscopic moment from the propellor/engine
            reversed.  However it seems to have some feedback/delay problems of its own so for now we're going to remove it
            and live with the fact that the gyroscopic moment is reversed. -->

      			<!-- <function name="aero/moment/Pitch_moment_gyroscopic_jsbsim_correction">
                      <description>This reverses the pitch moment due to the gyrosopic action of the propeller, which JSBSim seems to have reversed</description>
                      <product>
                          <property>moments/m-prop-lbsft</property>
                          <value>-2</value>
                      </product>
            </function>
            -->

        </axis>

        <axis name="YAW" unit="LBS*FT">
            <function name="aero/moment/Yaw_beta">
                <description>Yaw moment due to beta</description>
                <product>
                    <property>aero/qbar-psf</property>
                    <property>metrics/Sw-sqft</property>
                    <property>metrics/bw-ft</property>
                    <property>aero/beta-rad</property>
                    <!-- <value>0.12</value> orig -->
                    <value>0.12</value>
                </product>
            </function>
            <function name="aero/moment/Yaw_damp">
                <description>Yaw moment due to yaw rate</description>
                <product>
                    <property>aero/qbar-psf</property>0
                    <property>metrics/Sw-sqft</property>
                    <property>metrics/bw-ft</property>
                    <property>aero/bi2vel</property>
                    <property>velocities/r-aero-rad_sec</property>
                    <!-- Aeromatic value was -0.15; this is replaced by the value * table value
                    below, to reduce the damping values for the Camel -->

                    <!-- Camel was sensitive & poorly damped in all directions of motion, particularly in yaw stability, where the pathetically small tail fin doesn't do much and the rudder doesn't do much in terms of damping.  Adjusting this 0-1 adjusts this sensitivity. -->
                    <!-- <value>-0.10</value>  accidentally left this un-remed out and it worked quite well, so  . . . -->
                    <!-- orig: <value>-0.15</value> -->
                    <!-- camel is poorly damped and won't get out of spin/turn automatically if the controls are released.  You have to steer it out. -->
					<!--this tends to damp or *stop* the yaw, thus the negative numbers (the overall effect is always to reduce the amount of yaw moment).
					With the Camel, in certain situations the yaw & roll actually won't damp out (ie, when in a tailspin - if you take your hands off the controls it will
					just keep tailspinning indefinitely, unlike modern aircraft which are designed to naturally recover if you take your hands off the controls);
					this is like having a yaw damp of 0 or close to it.
					-->
                    <value>0.9</value>
                    <table>
                        <independentVar>velocities/r-aero-rad_sec</independentVar>
                        <tableData>
                          -32.14        -0.050
						              -9            -0.03
                          -2            -0.003
						              <!-- -1.57         -0.01
                          -0.7          -0.03
                          -0.25         -0.05 -->
                          0             -0.20
                          <!-- 0.25          -0.05
                          0.7           -0.03
                          1.57          -0.01 -->
						              2             -0.003
                          9             -0.03
						              32.14         -0.05
                        </tableData>
                    </table>


                </product>
            </function>
            <function name="aero/moment/Yaw_rudder">
                <description>Yaw moment due to rudder</description>
                <product>
                    <property>aero/qbar-psf</property>
                    <property>metrics/Sw-sqft</property>
                    <property>metrics/bw-ft</property>
                    <property>fcs/rudder-pos-rad</property>
                    <!-- 0.18 - Aeromatic -->
                    <value>-0.25</value>
                    <!-- it became harder & hard to rudder with speed,
                    due to wind pressure -->
                    <table>
                        <independentVar>velocities/ve-kts</independentVar>
                        <tableData>
                          0             1
                          105           0.95
                          180           0.5
                          500           0
                        </tableData>
                    </table>

                    <!-- Rudder effectiveness lost as soon as tail sets down on landing -->
                    <!-- <table>
                        <independentVar lookup="row">aero/alpha-deg</independentVar>
                        <tableData>
                        -90    1
                        11     1
                        14     0.2
                        90     0.1
                        </tableData>
                    </table>
                    -->

                    <!-- Asymmetric stall; you lose rudder as a stall in beta occurs -->
                    <!-- Based p51d-jsbsim.xml -->
                    <table>
                        <independentVar lookup="row">aero/beta-deg</independentVar>
                        <tableData>
                        -90    0.2
                        -40    0.3
                        -20    1
                        20     1
                        40     0.3
                        90     0.2
                        </tableData>
                    </table>

                </product>
            </function>
            <function name="aero/moment/Yaw_aileron">
                <!-- Camels large (but ineffective) 'barn door' ailerons produced 'awe-inspiring'
                amounts of adverse yaw and also a great deal of drag. With no rudder correction it falls into a deep
                side-slip with a few seconds.  http://riseofflight.com/Forum/download/file.php?id=31942&mode=view-->
                <description>Adverse yaw</description>
                <product>
                    <property>aero/qbar-psf</property>
                    <property>metrics/Sw-sqft</property>
                    <property>metrics/bw-ft</property>
                    <property>fcs/left-aileron-pos-rad</property>
                    <!-- Aeromatic: -0.01 -->
                    <value>-0.07</value>
                    <table>
                        <independentVar>velocities/ve-kts</independentVar>
                        <tableData>
                          0             1
                          70            0.9
                          180           0.3
                          400           0
                        </tableData>
                    </table>
                </product>
            </function>

            <!-- This is to compensate for the fact the JSBSim has the direction of the gyroscopic moment from the propellor/engine
            reversed.  However it seems to have some feedback/delay problems of its own so for now we're going to remove it
            and live with the fact that the gyroscopic moment is reversed. -->

     		    <!-- <function name="aero/moment/Yaw_moment_gyroscopic_jsbsim_correction">
                <description>This reverses the yaw moment due to the gyrosopic action of the propeller, which JSBSim seems to have reversed</description>
                <product>
                    <property>moments/n-prop-lbsft</property>
                    <value>-2</value>
                </product>
            </function>
            -->


            <!--
               Create YAW to help drop a wing at stall.
               This will help to induce a spin or a snap
               roll depending on how fast the stall entry
               speed is.
               Which wing is dropped and how hard it
               drops depends on the beta angle.
            -->
           <!-- This is based on p51d-jsbsim.xml, modified to produce better/more realistic results for the Camel -->

           <function name="aero/coefficient/Cnalphabeta">
                <description>Yaw_moment_due_to_alpha-beta</description>
                <product>
                    <value> -1.0 </value>
                    <property>aero/qbar-psf</property>
                    <property>metrics/Sw-sqft</property>
                    <property>metrics/bw-ft</property>
                    <table>
                        <independentVar lookup="row">aero/alpha-deg</independentVar>
                        <independentVar lookup="column">aero/beta-deg</independentVar>
                        <independentVar lookup="table">aero/Re</independentVar>
                        <tableData breakPoint="2500000">
                                     -30     -5      -2      2.5       6      32
                               -27.0  0.0  0.05      0.03    -0.03     -0.05    0.0
                               -17.0  0.0  0.05      0.03    -0.03     -0.05    0.0
                               -16.7  0.0  0.05      0.03    -0.03     -0.05    0.0
                               -16.3  0.0  0.05      0.03    -0.03     -0.05    0.0
                               -15.9  0.0  0.05      0.03    -0.03     -0.05    0.0
                               -15.4  0.0  0.05      0.03    -0.03     -0.05    0.0
                               -15.0  0.0  0.0       0.0      0.0      0.0      0.0
                                 0.0  0.0  0.0       0.0      0.0      0.0      0.0
                                15.5  0.0  0.0       0.0      0.0      0.0      0.0
                                16.0  0.0  0.001     0.005   -0.005   -0.001    0.0
                                17.6  0.0  0.0015    0.006   -0.006   -0.0015   0.0
                                17.8  0.0  0.0025    0.008   -0.008   -0.0025   0.0
                                18.8  0.0  0.0035    0.01    -0.01    -0.0035   0.0
                                19.5  0.0  0.005     0.012   -0.012   -0.005    0.0
                                20.5  0.0  0.00625   0.013   -0.013   -0.00625  0.0
                                21.5  0.0  0.0075    0.015   -0.015   -0.0075   0.0
                                27.0  0.0  0.00125   0.005   -0.005   -0.00125  0.0
                        </tableData>
                        <tableData breakPoint="5000000">
                                     -30    -5       -2        2.5          6          32
                               -27.0 0.0  0.05      0.03      -0.03       -0.05        0.0
                               -17.0 0.0  0.05      0.03      -0.03       -0.05        0.0
                               -16.7 0.0  0.05      0.03      -0.03       -0.05        0.0
                               -16.3 0.0  0.05      0.03      -0.03       -0.05        0.0
                               -15.9 0.0  0.05      0.03      -0.03       -0.05        0.0
                               -15.4 0.0  0.005     0.003     -0.003      -0.005       0.0
                               -15.0 0.0  0.0       0.0        0.0         0.0         0.0
                                 0.0 0.0  0.0       0.0        0.0         0.0         0.0
                                15.5 0.0  0.0       0.0        0.0         0.0         0.0
                                16.0 0.0  0.005     0.01      -0.01       -0.005       0.0
                                17.6 0.0  0.015     0.01      -0.01       -0.015       0.0
                                17.8 0.0  0.02      0.015     -0.015      -0.02        0.0
                                18.8 0.0  0.025     0.02      -0.02       -0.025       0.0
                                19.5 0.0  0.03      0.023     -0.023      -0.03        0.0
                                20.5 0.0  0.04      0.026     -0.026      -0.04        0.0
                                21.5 0.0  0.05      0.03      -0.03       -0.05        0.0
                                27.0 0.0  0.02      0.01      -0.01       -0.02        0.0
                        </tableData>
                        <tableData breakPoint="10000000">
                                        -30    -5      -2      2.5         6         32
                               -27.0    0.0  0.05     0.03    -0.03      -0.05       0.0
                               -17.0    0.0  0.05     0.03    -0.03      -0.05       0.0
                               -16.7    0.0  0.05     0.03    -0.03      -0.05       0.0
                               -16.3    0.0  0.05     0.03    -0.03      -0.05       0.0
                               -15.9    0.0  0.02     0.01    -0.01      -0.02       0.0
                               -15.4    0.0  0.005    0.003   -0.003     -0.005      0.0
                               -15.0    0.0  0.0      0.0      0.0        0.0        0.0
                                 0.0    0.0  0.0      0.0      0.0        0.0        0.0
                                15.5    0.0  0.0      0.0      0.0        0.0        0.0
                                16.0    0.0  0.002    0.006   -0.006     -0.002      0.0
                                17.6    0.0  0.005    0.005   -0.005     -0.005      0.0
                                17.8    0.0  0.01     0.01    -0.01      -0.01       0.0
                                18.8    0.0  0.015    0.015   -0.015     -0.015      0.0
                                19.5    0.0  0.03     0.02    -0.02      -0.03       0.0
                                20.5    0.0  0.035    0.025   -0.025     -0.035      0.0
                                21.5    0.0  0.04     0.03    -0.03      -0.04       0.0
                                27.0    0.0  0.02     0.01    -0.01      -0.02       0.0
                        </tableData>
                        <tableData breakPoint="20000000">
                                        -30    -5        -2       2.5       6        32
                               -27.0    0.0    0.05     0.03    -0.03     -0.05      0.0
                               -17.0    0.0    0.05     0.03    -0.03     -0.05      0.0
                               -16.7    0.0    0.05     0.03    -0.03     -0.05      0.0
                               -16.3    0.0    0.02     0.01    -0.01     -0.02      0.0
                               -15.9    0.0    0.005    0.003   -0.003    -0.005     0.0
                               -15.4    0.0    0.002    0.001   -0.001    -0.002     0.0
                               -15.0    0.0    0.0      0.0      0.0       0.0       0.0
                                 0.0    0.0    0.0      0.0      0.0       0.0       0.0
                                15.5    0.0    0.0      0.0      0.0       0.0       0.0
                                16.0    0.0    0.0      0.0      0.0       0.0       0.0
                                17.6    0.0    0.0      0.0      0.0       0.0       0.0
                                17.8    0.0    0.0      0.0      0.0       0.0       0.0
                                18.8    0.0    0.01     0.01    -0.01     -0.01      0.0
                                19.5    0.0    0.02     0.016   -0.016    -0.02      0.0
                                20.5    0.0    0.03     0.023   -0.023    -0.03      0.0
                                21.5    0.0    0.05     0.03    -0.03     -0.05      0.0
                                27.0    0.0    0.02     0.01    -0.01     -0.02      0.0
                        </tableData>
                        <tableData breakPoint="30000000">
                                       -30     -5          -2      2.5     6       32
                               -27.0   0.0    0.05       0.03    -0.03   -0.05     0.0
                               -17.0   0.0    0.05       0.03    -0.03   -0.05     0.0
                               -16.7   0.0    0.02       0.01    -0.01   -0.02     0.0
                               -16.3   0.0    0.005      0.003   -0.003  -0.005    0.0
                               -15.9   0.0    0.002      0.001   -0.001  -0.002    0.0
                               -15.4   0.0    0.0        0.0      0.0     0.0      0.0
                               -15.0   0.0    0.0        0.0      0.0     0.0      0.0
                                 0.0   0.0    0.0        0.0      0.0     0.0      0.0
                                15.5   0.0    0.0        0.0      0.0     0.0      0.0
                                16.0   0.0    0.0        0.0      0.0     0.0      0.0
                                17.6   0.0    0.0        0.0      0.0     0.0      0.0
                                17.8   0.0    0.0        0.0      0.0     0.0      0.0
                                18.8   0.0    0.0        0.0      0.0     0.0      0.0
                                19.5   0.0    0.01       0.01    -0.01   -0.01     0.0
                                20.5   0.0    0.03       0.02    -0.02   -0.03     0.0
                                21.5   0.0    0.05       0.03    -0.03   -0.05     0.0
                                27.0   0.0    0.02       0.01    -0.01   -0.02     0.0
                        </tableData>
                        <tableData breakPoint="40000000">
                                         -30     -5       -2       2.5       6      32
                               -27.0     0.0    0.05     0.03    -0.03     -0.05    0.0
                               -17.0     0.0    0.05     0.03    -0.03     -0.05    0.0
                               -16.7     0.0    0.02     0.01    -0.01     -0.02    0.0
                               -16.3     0.0    0.005    0.003   -0.003    -0.005   0.0
                               -15.9     0.0    0.002    0.001   -0.001    -0.002   0.0
                               -15.4     0.0    0.0      0.0      0.0       0.0     0.0
                               -15.0     0.0    0.0      0.0      0.0       0.0     0.0
                                 0.0     0.0    0.0      0.0      0.0       0.0     0.0
                                15.5     0.0    0.0      0.0      0.0       0.0     0.0
                                16.0     0.0    0.0      0.0      0.0       0.0     0.0
                                17.6     0.0    0.0      0.0      0.0       0.0     0.0
                                17.8     0.0    0.0      0.0      0.0       0.0     0.0
                                18.8     0.0    0.0      0.0      0.0       0.0     0.0
                                19.5     0.0    0.0      0.0      0.0       0.0     0.0
                                20.5     0.0    0.03     0.02    -0.02     -0.03    0.0
                                21.5     0.0    0.05     0.03    -0.03     -0.05    0.0
                                27.0     0.0    0.02     0.01    -0.01     -0.02    0.0
                        </tableData>
                    </table>
                </product>
            </function>


        </axis>
    </aerodynamics>

	<!-- <output name="JSBout.csv" type="CSV" rate="100">
        <simulation> ON </simulation>
        <atmosphere> ON </atmosphere>
        <massprops> ON </massprops>
        <aerosurfaces> ON </aerosurfaces>
        <rates> ON </rates>
        <velocities> ON </velocities>
        <forces> ON </forces>
        <moments> ON </moments>
        <position> ON </position>
        <coefficients> ON </coefficients>
        <ground_reactions> ON </ground_reactions>
        <fcs> ON </fcs>
        <propulsion> ON </propulsion>
    </output>
	-->
</fdm_config>
