<?xml version="1.0"?>
<!-- Generated by Aero-Matic v 1.1

     Inputs:
                horsepower: 130
                     pitch: fixed
            max engine rpm: 1800
        prop diameter (ft): 9.3305078

     Outputs:
              max prop rpm: 2010.93
                gear ratio:    0.90
                       Cp0: 0.011294
                       Ct0: 0.015811
       static thrust (lbs):  342.97

       Sopwith-specific experimental data on a prop/engine is available here, though it is a bit hard to convert between the various units and power & torque
       measurement systems:
       http://naca.central.cranfield.ac.uk/reports/arc/rm/448.pdf
-->

<propeller name="prop">
  <!-- <ixx>  22.01 </ixx> --> <!-- Aero-Match generated amount based on 70 lb prop only -->
  <!-- <ixx>  28.01 </ixx> --> <!-- first WAG based on performance -->
  <ixx>  18.77 </ixx> <!-- See calculation spreadsheet - 10.73 for 35 lb prop plus 8.04 for 381 lb clerget (heavier but much closer in). This is in metric units, kg-m^2.  The rotary engine nearly doubles the moment of inertia compared with inline engine & prop. -->

  <!-- rotary engine has somewhat higher rotational inertia than plain propellor because of the cylinders rotating along with the prop -->
  <diameter unit="IN"> 112.0 </diameter>
  <numblades> 2 </numblades>
  <gearratio>  1.0 </gearratio>
  <!-- <p_factor>   8.85 </p_factor> -->
  <p_factor>   4.85 </p_factor>
  <!-- <ct_factor> 1</ct_factor> -->
  <!-- <cp_factor> 1</cp_factor> -->

  <!-- This is close, but top speed a bit too slow & RPM & 60kts & climb a bit too high: -->
   <!-- best climbing speed of 70mph=60 kt and 16.66 fps climb, 1150 RPM (J=.5358)-->
   <!-- max speed of 115 kts, level flight, 130 hp, 1250 RPM (J=.976) -->
   <!-- Additional factor: Starting about 4-5MPH on a grassy runway,
   at full throttle the Camel will be airborn in about 6.9 seconds, or
   approx 7 AC lengths
   See: http://www.youtube.com/watch?v=VT9wtDNiKaI  -->

  <table name="C_THRUST" type="internal">
     <tableData>

        0 0.072
        0.01 0.072
        0.1 0.07416
        0.2 0.07488
        0.3 0.07344
        0.4 0.072
        0.5 0.0684
        0.5358 0.06768
        0.64 0.06624
        0.8 0.0612
        0.976 0.049536
        1.03 0.04536
        1.1 0.03312
        1.2 0.0144
        1.3 -0.0216
        1.5 -0.0864
        1.7 -0.18
        1.9 -0.36
        2 -0.72
        3 -0.72
        5 -0.72

     </tableData>
  </table>


  <table name="C_POWER" type="internal">
     <tableData>
        0   0.06258
        0.01   0.06258
        0.1   0.06273
        0.2   0.06353
        0.3   0.062195
        0.4   0.060133
        0.5   0.057
        0.5358   0.055814
        0.64   0.05428
        0.8   0.05184
        0.976   0.049032
        1.03   0.047816
        1.1   0.04286
        1.2   0.036
        1.3   0.0216
        1.5   -0.0072
        1.7   -0.036
        1.9   -0.0864
        2   -0.0864
        3   -0.1152
        5   -0.288
     </tableData>
  </table>

<!-- thrust effects of helical tip Mach -->
<table name="CT_MACH" type="internal">
  <tableData>
    0.85   1.0
    1.05   0.8
  </tableData>
</table>

<!-- power-required effects of helical tip Mach -->
<table name="CP_MACH" type="internal">
  <tableData>
    0.85   1.0
    1.05   1.8
    2.00   1.4
  </tableData>
</table>

</propeller>
