<?xml-stylesheet href="JSBSim.xsl" type="application/xml"?>

<!--

************************************************************************

JSBSim aerodynamic model for a Sopwith Camel 1F1

Version: 2.1alpha

Author: Brent Hugh, 9 Sept 2023

Goal: Create a flight model of the Camel that would incorporate as many of the documented combat flight characteristics of the Camel as possible, and in as realistic a way as possible.

Sources & Acknowledgements: See SopwithCamel-Realistic-JSBSim-Flight-Model-Notes.txt in the Docs subdirectory, other docs in that directory, and the notes below.

************************************************************************

-->


<!-- Max sustained turn rate is about 76 deg/sec.  That is near stall speed, level flight, at sea level.  http://home.comcast.net/~clipper-108/AIAAPaper2005-119.pdf p. 7 -->

<!-- "I lived its quick response - it was so remarkably swift and sensitive that it demanded constant attention.  The torque caused the nose to rise in a left-hand turn and drop in a right-hand turn.  Fairly large amounts of left rudder were needed in bothturns to correct for these idiosyncrasis. The tiny biplane was so snesitive in a turn, however, that if the turn were tightened just a little, it was likely to whip into a tight spin - quickly and without warning.  Oddly this very ease for spining was used in combat by many pilots to shake a persisten German from their tails. sopwith Came vs Fokker Dr 1: Western Front 1917-18 by Jon Guttman, Harry Dempsey, quoting from mark Curtis Kinney's memoir, I Flew a Camel

Here is a description about the Camel's traits from BARKER VC, (via author Wayne Ralph at http://www.theaerodrome.com/forum/2001/11306-sopwith-camel-flight-characteristics.html ):

Quote:

All the weight of the engine, guns, and pilot was concentrated in the first seven feet of a short 18-foot fuselage. The various models of rotary engine fitted to the Camel, from a 110-hp Le Rhone, to a 130-hp Clerget, to a 150-hp Bentley, had the propeller attached to the engine crankcase and the crankshaft to the aircraft so that the propeller and engine revolved together at more than 1250 rpm. This heavy whirling engine was lubricated continually by castor oil which was not recycled, but rather was burned in the combustion process and vented overboard, soaking the aircraft, the pilot's flying suit, helmet and goggles.
The gyroscopic forces that were generated varied in intensity based on a complex interaction of engine rpm, aircraft speed, and control input. The scout had a different charactering left or right, as did all the rotary-engined aeroplanes, but the Camel to an extreme degree. It was sluggish in left turns and the nose always pitched up, while right turns were very quick, with the nose dropping sharply. Without plenty of top (ie, left) rudder to correct the pitch down, it would spin.
A Camel pilot had to apply left rudder turning left or right, the amount varying with aircraft speed and engine rpm. Since the engine rotation countered the input of left stick and rudder, some pilots made all turns to the right because the aircraft was quicker through 270 degrees, than 90 degrees to the left. The Camel's elevator was powerful and sensitive, while the rudder was too small and relatively ineffective.
Coordinated turns demanded a fine touch. Correcting sideslip, the tendency of the aeroplane to slide to the inside of a banked turn, by applying opposite rudder, caused the Camel to tighten up in the turn. In steep turns over 45 degrees of bank, the aircraft tended to pitch up its nose, and tighten up its bank angle as speed reduced, requiring continual adjustments in the amount of forward pressure on the stick with engine rpm changes. In the words of test pilot W/C Paul A. Hartman, RCAF, the Camel has no 'dynamic longitudinal stability' in steep turns.
Accelerating the aircraft caused the nose to climb, and swing to the left. At 110 miles per hour, there was about 15 to 20 pounds of back force on the control column, which could not be trimmed out because the aircraft had no pilot-adjustable, moveable horizontal stabilizer. Therefore, Camel pilots had to fly two-to-three hour missions, continually applying forward pressure just to maintain level flight. Letting go resulted in the aircraft pitching up, and rolling inverted to the right. Moving the stick forward to enter a dive caused the Camel to yaw left because of gyroscopic force, and correcting this yaw with right rudder caused the nose to pitch down sharply. By today's standards the Camel was completely unacceptable, and yet many pilots of 1917-8, most with under 100 hours of flying time used it as a lethal weapon.

- - -
http://www.theaerodrome.com/forum/2001/11306-sopwith-camel-flight-characteristics-3.html

 In those notes are a description of when and why the mixture had to be adjusted. If memory serves, it was perilously low to the ground, under 250 feet. The shift to left rudder would have to have taken place either just before or just after this, because the whole point of changing the mixture was that the engine would have been on the verge of choking, which means that you'd be trying to maintain flying speed.

My guess is that the shift would have to happen within 10-20 seconds of getting airborne under normal circumstances.

- - -

"...all flights of these early machines were conducted from the grass surface of the airfield, not the paved runways, and the steerable tail skid of the Camel helped to overcome a slight swing to the left as I opened the throttle. The tail came up at about 20 knots.

As the speed reached 40 knots I eased the stick back slightly and the Camel became airborne. It accelerated rapidly to 55 knots and I held it in a climb at that speed until I reached 500 feet. I leveled off, leaned the mixture, and started a left hand turn. The gyroscopic effect from the rotary engine quickly became apparent...

...I enjoyed flying the Camel, but its vices of control instability, extreme control sensitivity and pronounced gyroscopic effects all combined to create the impression of balancing an egg on the point of a needle rather than flying an aircraft...it was never forced into manoeuvres - they were executed by light pressure on the controls and subsequently relaxing, or sometimes reversing, the pressure once the desired rate of response was attained.

By modern standards of stability and control, the Camel would be totally unacceptable as a military aircraft...

(quoted from Canada's National Aviation Museum - Its History and Collection, by K.M. Molson)

http://www.theaerodrome.com/forum/2001/11306-sopwith-camel-flight-characteristics.html


"As I opened the throttle I simultaneously applied full left rudder and as I became airborn I found that I had full left rudder on. (This was the answer always, as I afterwards found, and I was never in trouble again from this cause)"

August 98 issue of FLight journal has the flying of the Camel by Rich King. 160 Hp Gnome engine (yes, rotary)
qoute:
..Right rudder is needed to keep the Camel tracking straight ahead while it is on the runway, and as the tail comes up, I find that my rudder correction was right on. I m facing straight down the center of the runway.........A little back pressure on the control stick and the bumpy ground falls away behind me, and the Camels speed continues to increase at an exhilarating rate. A little forward pressure on the "closh handle" hold the aeroplane a few feet above the runway while its speed continues to increase. ....
Left Rudder is now needed to keep the racing Camel straight....." end quote

http://www.theaerodrome.com/forum/2001/11306-sopwith-camel-flight-characteristics-2.html


From the Frank Tallman book "Flying the old planes"...

My Sopwith Camel is, as far as I'm aware, the only original World War 1 Camel ever brought back to flying condition. It was originally owned by Colonel Jarrett of the Jarrett War Museum located on the old Steel Pier in Atlantic City; who in the 1930's had the best museum of WWI equipment ever assembled, including the Belgian War Museum in Brussels. The Jarrett Museum fell on hard times following WWII and, with time and money on my side after my service period, and a lifelong ambition of owning a WWI aircraft, I purchased for a small sum (by today's standards) several antique aircraft including the Camel, a Nieuport 28, a Pfalz D.XII, a Fokker D.VII and a SPAD VII.

The Camel was the first WWI aircraft I brought back to flying condition and required some major rebuilding, which took several years, many thousands of dollars and a whole host of experts including Paul Poberzney of the Experimental Aircraft Association, the gifted master craftsman Ned Kensinger, the Hawker Siddeley Group and a number of very dedicated volunteer's.

(NB: There is quite a bit on the rebuilding process in the Chapter but I have left it out of this extract for the sake of space).

When the day finally came to fly the air was filled with great anticipation. On arrival at the airport though I was dismayed to hear from my team that they had been trying to get the temperamental 110 h.p. Le Rhone started since 8.00am that morning, without success. The lack of knowledge amongst us regarding the Le Rhone was appalling. Did we have spark? Yes. Was the mag set? Yes. Had the commutator ring been wiped off? Yes. Had we primed it? Only every other cylinder.

With only a vague notion of what I was doing I clambered into the cockpit (a very tight fit) and reviewed the cord-wrapped Spade stick, the Block tube, carburettors next to one's knees, the flexible air intake to the outside air scoops, the wood wire brace longerons, the instrument panel with it's clutter and the duel control cables to the wooden rudder bar. At my request, the crew forced open the intake valves as the engine was pushed through (switch off) and shot a charge of fuel in each cylinder, as the cylinder came in front of the hole in the cowling. By accident, rather than by knowledge, I advanced the long lever controlling the air, and in pushing the manet (a small wheel knob on the miniature control quadrant) forward and then returning it, I had hit on the correct starting procedure. Wonder of wonders, as I flipped the porcelain-mounted switch up and called for contact, the Le Rhone started with a full-throated bellow, scaring both me and the crew!

By shoving the fuel-controlling lever forward and using the coupe (cut-out) button on the stick, I was able to keep the engine running. Soon the never-to-be-forgotten smell of castor oil infused our area, and the sight of oil splattering the leading edge of the low wings indicated that the engine was lubricating properly. Taxiing practice ended ignominiously a hundred feet from the starting point, when my newfound knowledge wasn't equal to the delicate adjustment of fuel and air, and the Le Rhone quit.

The revitalised ground crew hauled the 900 pound airplane over the grass and faced me into the wind. For safety sake we changed the plugs, and the Le Rhone started first try. I headed down the field with the throttle wide open. The tail came up almost instantly, and visibility was good, except for the Aldis sight and the twin Vickers. Not having planned on flight it came as something of a shock to find the Camel airborne at about 35 mph after a ground run of just 150 feet. Being afraid of jockeying with my ticklish fuel and air controls I stayed low and just got used to the Camel's sensitive ailerons, elevators and rudder.

I circled the field once, got into position for landing, shut fuel air and switch off, and made a light forward slip, touching down gently on three points. Total landing couldn't have been much longer than the initial take-off run.

So much for my first (unintentional) flight in the Camel.

Since then I've spent more time flying the Camel than any of the other historical aircraft in our collection. I've also had more forced landings in it than all the rest of the WWI aircraft combined. It's that temperamental Le Rhone. Cylinders have blown, magneto's have failed, even fouled spark plugs have brought me down unceremoniously, with sweating hands and my heart in my mouth, desperately seeking a patch of open ground on which to land. Yet for all that it's the one I turn to first for any show or exhibition, as the Camel gets my blood going like no other. This is an aircraft that is a joy to fly.

With the Le Rhone 9J, you cannot adjust either the fuel or air intake without running the risk of a dead-stick landing. You must leave them alone and use you Coupe (cut-out) button for all fight handling.

The take-off run is easy. In a wind of 10 to 15 knots you are airborne in a couple of plane lengths at 35 mph and climbing out at 60 mph, with a rate of climb of almost 1,000 feet a minute. The elevators are sensitive, as is the rudder. Consequently, when fling for any distance I often put the heels of my shoes on the floor tie wires, because the vibration of the Le Rhone through the rudder bar exaggerates the rudder movements.

In level flight at 100 mph indicated, the Camel is delightful, with just a hint of rudder being required for straight flight. The structure is rugged enough to feel comfortable in loops, and being slightly tail-heavy it goes up and over in an incredibly small circle in the sky, and faster than any other WWI aircraft I have flown. Sneeze and your halfway through a loop before your aware of what's happened. 110 mph is enough to carry you through, and as you slow down over the top you must feed in rudder against the torque.

In military shows I have ground strafed, and as soon as the airspeed reaches 130 to 140 mph the nose begins to hunt up and down, and the elevator becomes extremely sensitive. I feel this action is due largely to the square windshield between the two Vickers guns, causing a substantial burble over the tail surfaces.

Turns are what the Camel is all about. Turning to the right with the torque requires the top rudder to hold the nose up, and the speed with which you can complete a 360-degree turn is breathtaking. Left turns are slower, with the nose wanting to rise during the turn. But small rudder input easily keeps the nose level with the horizon. In stalls at 35 to 40 mph the nose drops frighteningly fast and hard to the right, but you also get control back quickly, although a surprising amount of altitude has been lost. I have had the pleasure of limited dog fighting with other WWI fighters, and there are none that can stay with a Camel in a turn.

With the Le Rhone being temperamental as it is, flying the Camel is best done at times when there are few other aircraft in the sky, leaving easy access to the airport in cases of emergency. The Camel touches down easily but runs out of rudder control almost instantly, and if you bounce your landing at all, you are likely to find yourself in a hairy ground loop looking at a rapidly bending aileron dragging in the grass.

For a wide variety of reasons, the Camel is a fascinating airplane, flight-wise as well as historically. But don't think I ever got out of the Camel after being airborne even in the coldest weather without buckets of perspiration and considerable gratitude that I had gotten the little girl home again without breaking her into splinters!

http://www.theaerodrome.com/forum/aircraft/45869-sopwith-camel-myth-6.html


Additional comments on Camel handling characteristics by  Victor Yeates, author of "Winged Victory" (yes, it's a fictional novel, but his experiences of flying a camel were realistic, and are a valid, honest description)...


Re training:

"Camels were wonderful fliers when you had got used to them, which took about three months of hard flying. At the end of that time you were either dead, a nervous wreck, or the hell of a pilot and a terror to Huns . . ."

Re turns:

"And in the more legitimate matter of vertical turns, nothing in the skies could follow in so tight a circle..."

Re the half-roll (Split S):

"The same with the half-roll. Nothing would half-roll like a Camel. A twitch of the stick and flick of the rudder and you were on your back. The nose dropped at once and you pulled out having made a complete reversal of direction in the least possible time.

Thomson, the squadron stunt expert told him that it (half-roll) was just the first half of a roll followed by the second half of a loop; the only stunt useful in fighting. If you were going the wrong way, it was the quickest known method of returning in your slipstream."

Re the loop (he didn't like looping a Camel):

"But a Camel had to be flown carefully round with exactly the right amount of left rudder, or else it would rear and buck and hang upside down and flop and spin."

Re general flight:

" . . . a Camel had to be held in flying position all the time, and was out of it in a flash. It was nose light, having a rotary engine weighing next to nothing per horse power, and was rigged tail heavy so that you had to be holding her down all the time. Take your hand off the stick and it would rear right up with a terrific jerk and stand on its tail."

Re ground strafing (which he hated due to ground anti-ac machine gun fire):

"Unfortunately, they were good machines for ground-strafing. They could dive straight down on anything, and when a few feet off the ground, go straight up again."

Re speed:"...a Camel was a wonderful machine in a scrap. If only it had been fifty per cent faster! There was the rub. A Camel could neither catch anything except by surprise, nor hurry away from an awkward situation, and seldom had the option of accepting or declining combat...You couldn't have everything."

http://www.theaerodrome.com/forum/aircraft/45869-sopwith-camel-myth-6.html

-->
<fdm_config name="Sopwith Camel" version="2.1" release="Alpha">

    <fileheader>
        <author> Brent Hugh</author>
        <filecreationdate> 2023-09-09 </filecreationdate>
        <description>Sopwith Camel with Weapons, matches available data for climb, max speed, general handling</description>
        <version>Version 2.1alpha</version>
    </fileheader>

    <metrics>
        <!-- wing area 19.76 m^2 per sopwith-camel-specs-drawings-2-2.jpg, see docs directory-->
        <!-- Note: per wikipedia winspan is 28.0 ft & wing area is 231 ft^2-->
        <!-- Per http://aviation.technomuses.ca/collections/artifacts/aircraft/Sopwith2F1Camel/ :
              Wing Span	8.2 m (26 ft 11 in)
              Length	5.6 m (18 ft 6 in)
              Height	2.8 m (9 ft 1 in)
              Weight, Empty	434 kg (956 lb)
              Weight, Gross	691 kg (1,523 lb)
        -->
        <!-- ver 1.8: 212.6948698 -->
        <!-- This is Sw-sqft used many times below: -->
        <!-- 2.0gamma exper: <wingarea unit="FT2"> 231 </wingarea> -->
        <wingarea unit="FT2"> 231 </wingarea> <!-- 2.0delta: putting this back to 212.69 from 231 bec it seems to make our control surfaces problematic, but then we'll correct for the difference in drag in that section. -->
        <!--bw-ft used below: -->
        <wingspan unit="FT"> 26.91 </wingspan>
        <!-- wing chord calculated by measuring drawing sopwith-camel-specs-drawings-2-2.jpg; see calculations at Camel-JSBSim-calcs-2011-10D.xls sheet Camel Dimensions. -->
        <!-- See CamelVsFokker in Docs directory for possibly more accurate figures for all aircraft parts. -->
        <!-- Does the chord need to be doubled since this is a bi-plane? -->

        <!-- <chord unit="FT"> 4.5045 </chord> -->
        <!--cbarw-ft -->
        <chord unit="FT"> 9.01 </chord>

        <wing_incidence unit=""> 2.5 </wing_incidence>


        <!-- htailarea calculated by measuring drawing sopwith-camel-specs-drawings-2-2.jpg; see calculations at Camel-JSBSim-calcs-2011-10D.xls sheet Camel Dimensions
          But we assume 13.1 ft2 for htail, plus about half of elevator area (11.8 ft2) because the
          elevator is there but unless the pilot is holding it absolutely steady it doesn't really work to
          stabilize as well as a fixed surface. -->
        <htailarea unit="FT2"> 19.6 </htailarea>

        <!-- htailarm calculated by measuring drawing sopwith-camel-specs-drawings-2-2.jpg; see calculations at Camel-JSBSim-calcs-2011-10D.xls sheet Camel Dimensions -->
        <htailarm unit="FT"> 12.38 </htailarm>


        <!--Indeed you are correct about the Rudder - it's area was a paltry 4.9 sq. ft. (and fin at 3 sq. ft.) http://www.theaerodrome.com/forum/aircraft/47951-sopwith-camel-myth-2-a.html

        The pathetically small fixed area on the fin/rudder made the problems in yaw even worse. A pilot generally doesn't hold the rudder pedals stiffly enough
for the rudder to contribute very much to yaw stability.

        http://www.djaerotech.com/dj_askjd/dj_questions/short_coupled.html
         -->

        <!-- <vtailarea unit="FT2"> 7.90 </vtailarea> -->
        <!-- We'll say 3 sq ft for fin plus an additional 2 sq ft for
        the effect of the rudder -->
        <vtailarea unit="FT2"> 5 </vtailarea>
        <!-- htailarm calculated by measuring drawing sopwith-camel-specs-drawings-2-2.jpg; see calculations at Camel-JSBSim-calcs-2011-10D.xls sheet Camel Dimensions -->
        <vtailarm unit="FT"> 13.66 </vtailarm>

        <location name="AERORP" unit="IN">
            <x> 44 </x>   <!-- 2.0gamma 47; trying 44 to replicate nose up attitude with full fuel -->
            <y> 0 </y>
            <z> 0 </z>
        </location>
        <location name="EYEPOINT" unit="IN">
            <x> 29.25 </x>
            <y> -18 </y>
            <z> 57 </z>
        </location>
        <location name="VRP" unit="IN">
            <x> 0 </x>
            <y> 0 </y>
            <z> 0 </z>
        </location>
    </metrics>


    <mass_balance>
        <!-- iyy and izz are .3 X that of a typical plane of these dimensions due to Camel design concentrating mass v. close to c of g.  ixx is not affected by this
         design feature so remains unchanged. -->
        <!-- <ixx unit="SLUG*FT2">708</ixx> -->
        <ixx unit="SLUG*FT2">740</ixx>
        <!--2.0gamma values -->
        <iyy unit="SLUG*FT2">182.7</iyy>
        <izz unit="SLUG*FT2">366.9</izz>

        <!-- experiment for 2.0delta, putting these values up a bit.  It causes strange stall/spin behavior, so boing back to the 2.0gamma values -->
        <!-- <iyy unit="SLUG*FT2">365.4</iyy>
        <izz unit="SLUG*FT2">733.8</izz> -->
        <ixz unit="KG*M2">0</ixz>
        <iyz unit="KG*M2">0</iyz>
        <ixy unit="KG*M2">0</ixy>
        <!-- experiment: unloaded (reducing weight by about 300 lbs cuts stall speed from ~48 mph to ~40 mph) <emptywt unit="LBS">1010</emptywt> -->
        <emptywt unit="LBS">1210</emptywt>
        <!-- This was used in ver 1.0-1.3:
        <location name="CG" unit="IN">
            <x>60</x>
            <y>0</y>
            <z>-5.62</z>
        </location>
        -->
        <!-- Updated CoG info, courtesy Simon,
         http://www.flightgear.org/forums/viewtopic.php?f=4&t=19584&start=30#p182202
          x=111.8cm  = 44.012 in
          y=0
          z=8cm (above)
          -->
        <location name="CG" unit="IN">
            <x>44</x>
            <y>0</y>
            <z>3.54</z>
        </location>

        <pointmass name="Equipment">
            <form shape="ball">
               <radius unit="FT"> 3 </radius>
            </form>
            <weight unit="LBS"> 90 </weight>
            <location name="cockpit_rear" unit="IN">
                <x> 80 </x>
                <y> 0 </y>
                <z> 0 </z>
            </location>
        </pointmass>
       <pointmass name="Castor Oil/Engine Lube">
            <form shape="ball">
               <radius unit="FT"> 1.5 </radius>
            </form>
            <!-- <weight unit="LBS"> 62.31 </weight>-->
            <weight unit="LBS"> 0 </weight>
            <location name="just_behind_engine" unit="IN">
                <x> 30 </x>
                <y> 0 </y>
                <z> 10.62 </z>
            </location>
        </pointmass>
    </mass_balance>

    <ground_reactions>
        <!-- Various aspects of the ground reactions are manipulated in the file
        Nasal/JSBSim.nas. Systems/crash-detect.xml is also involved.  If you
        change anything in this section, double check those files to make sure
        everything there still works.

        For a land landing, the water bogeys are retracted and the _MAIN bogeys active.
        For a water landing, it is reversed.  The _MAIN_WATER bogeys are active. This allows us to have different coefficient of friction & spring coefficients for a water landing, better modeling what happens with a water landing.
         -->
        <contact type="BOGEY" name="LEFT_MAIN">
            <location unit="IN">
                <x> 30 </x>
                <y> -29.06 </y>
                <z> -65 </z>
            </location>
            <static_friction> 0.99 </static_friction>
            <dynamic_friction> 0.9 </dynamic_friction>
            <rolling_friction> 0.02 </rolling_friction>
            <spring_coeff unit="LBS/FT"> 2000 </spring_coeff>      <!-- spring, DC, DCR were 1000, 900, 2000 in 2.0.  Trying to double them to prevent the structures (high friction) from rubbing the ground when the a/c tilts slightly R or L  on takeoff.  9/2023, 2.1-->
            <damping_coeff unit="LBS/FT/SEC"> 1800 </damping_coeff>
            <damping_coeff_rebound type="SQUARE" unit="LBS/FT2/SEC2"> 4000 </damping_coeff_rebound>

            <!-- works only in 2.12 onwards; replaces the above 3 parameters-->
            <!-- strut_force>
                <function>
                    <sum>
                        <product>
                            <value> -5400. </value>
                            <property> gear/unit[2]/compression-ft </property>
                        </product>
                        <ifthen>
                            <ge>
                                <property> gear/unit[2]/compression-velocity-fps </property>
                                <value> 0.0 </value>
                            </ge>
                            <product>
                                <value> -160. </value>
                                <property> gear/unit[2]/compression-velocity-fps </property>
                            </product>
                            <product>
                                <value> -320. </value>
                                <property> gear/unit[2]/compression-velocity-fps </property>
                            </product>
                        </ifthen>
                    </sum>
                </function>
            </strut_force -->

            <max_steer unit="DEG"> 0 </max_steer>
            <brake_group> NONE </brake_group>
            <retractable> 0 </retractable>
        </contact>
        <contact type="BOGEY" name="RIGHT_MAIN">
            <location unit="IN">
                <x> 30 </x>
                <y> 29.06 </y>
                <z> -65 </z>
            </location>
            <static_friction> 0.99 </static_friction>
            <dynamic_friction> 0.9 </dynamic_friction>
            <rolling_friction> 0.02 </rolling_friction>
            <spring_coeff unit="LBS/FT"> 2000 </spring_coeff>
            <damping_coeff unit="LBS/FT/SEC"> 1800 </damping_coeff>
            <damping_coeff_rebound type="SQUARE" unit="LBS/FT2/SEC2"> 4000 </damping_coeff_rebound>
            <!-- works only in 2.12 onwards; replaces the above 3 parameters-->
            <!-- strut_force>
                <function>
                    <sum>
                        <product>
                            <value> -5400. </value>
                            <property> gear/unit[2]/compression-ft </property>
                        </product>
                        <ifthen>
                            <ge>
                                <property> gear/unit[2]/compression-velocity-fps </property>
                                <value> 0.0 </value>
                            </ge>
                            <product>
                                <value> -160. </value>
                                <property> gear/unit[2]/compression-velocity-fps </property>
                            </product>
                            <product>
                                <value> -320. </value>
                                <property> gear/unit[2]/compression-velocity-fps </property>
                            </product>
                        </ifthen>
                    </sum>
                </function>
            </strut_force -->


            <max_steer unit="DEG"> 0 </max_steer>
            <brake_group> NONE </brake_group>
            <retractable> 0 </retractable>
        </contact>
        <contact type="BOGEY" name="RIGHT_MAIN_WATER">
            <location unit="IN">
                <x> 30 </x>
                <y> 29.06 </y>
                <z> -60 </z>
            </location>
            <static_friction> 0.2 </static_friction>
            <dynamic_friction> 0.2 </dynamic_friction>
            <rolling_friction> 0.02 </rolling_friction>  #rolling friction for water gear elements is manipulated in JSBSim.nas depending on water depth.
            <spring_coeff unit="LBS/FT"> 35 </spring_coeff>
            <damping_coeff unit="LBS/FT/SEC"> 90 </damping_coeff>
            <damping_coeff_rebound type="SQUARE" unit="LBS/FT2/SEC2"> 90 </damping_coeff_rebound>
            <max_steer unit="DEG"> 0 </max_steer>
            <brake_group> NONE </brake_group>
            <retractable> 0 </retractable>
        </contact>

        <contact type="BOGEY" name="LEFT_MAIN_WATER">
            <location unit="IN">
                <x> 30 </x>
                <y> -29.06 </y>
                <z> -60 </z>
            </location>
            <static_friction> 0.2 </static_friction>
            <dynamic_friction> 0.2 </dynamic_friction>
            <rolling_friction> 0.02 </rolling_friction> #rolling friction for water gear elements is manipulated in JSBSim.nas depending on water depth.
            <spring_coeff unit="LBS/FT"> 35 </spring_coeff>
            <damping_coeff unit="LBS/FT/SEC"> 90 </damping_coeff>
            <damping_coeff_rebound type="SQUARE" unit="LBS/FT2/SEC2"> 90 </damping_coeff_rebound>
            <max_steer unit="DEG"> 0 </max_steer>
            <brake_group> NONE </brake_group>
            <retractable> 0 </retractable>
        </contact>

        <contact type="BOGEY" name="TAIL">
            <location unit="IN">
                <x> 239 </x>
                <y> 0 </y>
                <z> -18 </z>
            </location>
            <static_friction> 1 </static_friction><!-- 1.6: 5. This is abnormally high but it seems like there was some reason this was important - perhaps to help with steering? -->
            <dynamic_friction> 1 </dynamic_friction> <!-- 1.6: 5. This is abnormally high but it seems like there was some reason this was important - perhaps to help with steering? -->
            <rolling_friction> .1 </rolling_friction>
            <spring_coeff unit="LBS/FT"> 200 </spring_coeff>
            <damping_coeff unit="LBS/FT/SEC"> 195 </damping_coeff>
            <damping_coeff_rebound type="SQUARE" unit="LBS/FT2/SEC2"> 400 </damping_coeff_rebound>
            <max_steer unit="DEG"> -20 </max_steer>

            <!-- 2017/02/24 - an experiment - should explore this more, at least as an option to be more authentic to the WWI model with no steerable tail -->
            <!-- <static_friction> 5 </static_friction>
            <dynamic_friction> 5 </dynamic_friction>
            <rolling_friction> .1 </rolling_friction>
            <spring_coeff unit="LBS/FT"> 200 </spring_coeff>
            <damping_coeff unit="LBS/FT/SEC"> 195 </damping_coeff>
            <damping_coeff_rebound type="SQUARE" unit="LBS/FT2/SEC2"> 400 </damping_coeff_rebound>
            <max_steer unit="DEG"> -5 </max_steer>
            -->


            <brake_group> NONE </brake_group>
            <retractable> 0 </retractable>
        </contact>

        <!-- FRICTION COEFFICIENTS: The friction coefficients for things like wings, tail, body vs the ground are somewhat of a guess, of course, but in the general range indicated by sources like these:
            http://www.supercivilcd.com/FRICTION.htm
            http://www.roymech.co.uk/Useful_Tables/Tribology/co_of_frict.htm
            http://www.engineershandbook.com/Tables/frictioncoefficients.htm
            http://www.engineeringtoolbox.com/friction-coefficients-d_778.html
            http://www.school-for-champions.com/science/friction_coefficient.htm#.UtQCavRDurh

            JSBSim.nas manipulates the static & dynamic friction components given here by multiplying them by the 'friction_factor' given in Flightgear scenery.  I interpret friction_factor as meaning a factor that alters the given static and dynamic friction of your aircraft surfaces by multiplying it by friction_factor factor, to take into account the different ground surfaces the aircraft surfaces might be sliding over.

            Flightgear scenery also provides a rolling resistance value, which probably is more meant to be the rolling resistance of a typical tire in that terrain, and probably should simply replace the rolling resistance value that we provide here (though in practice what have done is add them - which makes little practical difference since the rolling resistance of the gear elements here is small.  But since we have one gear element that doesn't actually roll (the tail drag), that approach works better for the Camel FDM.
        -->

        <contact type="STRUCTURE" name="LEFT_WING">
            <location unit="IN">
                <x> 45 </x>
                <y> -164 </y>
                <z> -16.62 </z>
            </location>
            <static_friction> 0.4 </static_friction>
            <dynamic_friction> 0.2 </dynamic_friction>
            <rolling_friction> 0.1 </rolling_friction>
            <spring_coeff unit="LBS/FT"> 200 </spring_coeff>
            <damping_coeff unit="LBS/FT/SEC"> 195 </damping_coeff>
            <damping_coeff_rebound type="SQUARE" unit="LBS/FT2/SEC2"> 195 </damping_coeff_rebound>
            <max_steer unit="DEG"> 0 </max_steer>
            <brake_group> NONE </brake_group>
            <retractable> 0 </retractable>
        </contact>
        <contact type="STRUCTURE" name="RIGHT_WING">
            <location unit="IN">
                <x> 45 </x>
                <y> 164 </y>
                <z> -16.62 </z>
            </location>
            <static_friction> 0.4 </static_friction>
            <dynamic_friction> 0.2 </dynamic_friction>
            <rolling_friction> 0.1 </rolling_friction>
            <spring_coeff unit="LBS/FT"> 200 </spring_coeff>
            <damping_coeff unit="LBS/FT/SEC"> 195 </damping_coeff>
            <damping_coeff_rebound type="SQUARE" unit="LBS/FT2/SEC2"> 195 </damping_coeff_rebound>
            <max_steer unit="DEG"> 0 </max_steer>
            <brake_group> NONE </brake_group>
            <retractable> 0 </retractable>
        </contact>
        <contact type="STRUCTURE" name="LEFT_WING_REAR">
            <location unit="IN">
                <x> 125 </x>
                <y> -164 </y>
                <z> -16.62 </z>
            </location>
            <static_friction> 0.4 </static_friction>
            <dynamic_friction> 0.2 </dynamic_friction>
            <rolling_friction> 0.1 </rolling_friction>
            <spring_coeff unit="LBS/FT"> 200 </spring_coeff>
            <damping_coeff unit="LBS/FT/SEC"> 195 </damping_coeff>
            <damping_coeff_rebound type="SQUARE" unit="LBS/FT2/SEC2"> 195 </damping_coeff_rebound>
            <max_steer unit="DEG"> 0 </max_steer>
            <brake_group> NONE </brake_group>
            <retractable> 0 </retractable>
        </contact>
        <contact type="STRUCTURE" name="RIGHT_WING_REAR">
            <location unit="IN">
                <x> 125 </x>
                <y> 164 </y>
                <z> -16.62 </z>
            </location>
            <static_friction> 0.4 </static_friction>
            <dynamic_friction> 0.2 </dynamic_friction>
            <rolling_friction> 0.1 </rolling_friction>
            <spring_coeff unit="LBS/FT"> 200 </spring_coeff>
            <damping_coeff unit="LBS/FT/SEC"> 195 </damping_coeff>
            <damping_coeff_rebound type="SQUARE" unit="LBS/FT2/SEC2"> 195 </damping_coeff_rebound>
            <max_steer unit="DEG"> 0 </max_steer>
            <brake_group> NONE </brake_group>
            <retractable> 0 </retractable>
        </contact>
        <contact type="STRUCTURE" name="LEFT_WING_OUTER_TOP">
            <location unit="IN">
                <x> 85 </x>
                <y> -164 </y>
                <z> 62 </z>
            </location>
            <static_friction> 0.4 </static_friction>
            <dynamic_friction> 0.3 </dynamic_friction>
            <rolling_friction> 0.3 </rolling_friction>
            <spring_coeff unit="LBS/FT"> 200 </spring_coeff>
            <damping_coeff unit="LBS/FT/SEC"> 195 </damping_coeff>
            <damping_coeff_rebound type="SQUARE" unit="LBS/FT2/SEC2"> 195 </damping_coeff_rebound>
            <max_steer unit="DEG"> 0 </max_steer>
            <brake_group> NONE </brake_group>
            <retractable> 0 </retractable>
        </contact>
        <contact type="STRUCTURE" name="RIGHT_WING_OUTER_TOP">
            <location unit="IN">
                <x> 85 </x>
                <y> 164 </y>
                <z> 62 </z>
            </location>
            <static_friction> 0.4 </static_friction>
            <dynamic_friction> 0.3 </dynamic_friction>
            <rolling_friction> 0.3 </rolling_friction>
            <spring_coeff unit="LBS/FT"> 200 </spring_coeff>
            <damping_coeff unit="LBS/FT/SEC"> 195 </damping_coeff>
            <damping_coeff_rebound type="SQUARE" unit="LBS/FT2/SEC2"> 195 </damping_coeff_rebound>
            <max_steer unit="DEG"> 0 </max_steer>
            <brake_group> NONE </brake_group>
            <retractable> 0 </retractable>
        </contact>

        <contact type="STRUCTURE" name="NOSE">
            <location unit="IN">
                <x> -40 </x>
                <y> 0 </y>
                <z> 0 </z>
            </location>
            <static_friction> 0.5 </static_friction>
            <dynamic_friction> 0.35 </dynamic_friction>
            <rolling_friction> 0.35 </rolling_friction>
            <spring_coeff unit="LBS/FT"> 1500 </spring_coeff>
            <damping_coeff unit="LBS/FT/SEC"> 2000 </damping_coeff>
            <damping_coeff_rebound type="SQUARE" unit="LBS/FT2/SEC2"> 2000 </damping_coeff_rebound>
            <max_steer unit="DEG"> 0 </max_steer>
            <brake_group> NONE </brake_group>
            <retractable> 0 </retractable>
        </contact>

        <contact type="STRUCTURE" name="PROP_TOP">
            <location unit="IN">
                <x> 10 </x>
                <y> 0 </y>
                <z> 59 </z>
            </location>
            <static_friction> 0.4 </static_friction>
            <dynamic_friction> 0.3 </dynamic_friction>
            <rolling_friction> 0.3 </rolling_friction>
            <spring_coeff unit="LBS/FT"> 600 </spring_coeff>
            <damping_coeff unit="LBS/FT/SEC"> 900 </damping_coeff>
            <damping_coeff_rebound type="SQUARE" unit="LBS/FT2/SEC2"> 900 </damping_coeff_rebound>
            <max_steer unit="DEG"> 0 </max_steer>
            <brake_group> NONE </brake_group>
            <retractable> 0 </retractable>
        </contact>
        <contact type="STRUCTURE" name="PROP_BOTTOM">
            <location unit="IN">
                <x> 10 </x>
                <y> 0 </y>
                <z> -52 </z> <!-- -59 in ver 1.8  moving it just a bit up to be a bit more forgiving on noseover. NOTE that this is override in jsbsim.nas, so change BOTH! -->
            </location>
            <static_friction> 0.4 </static_friction>
            <dynamic_friction> 0.3 </dynamic_friction>
            <rolling_friction> 0.3 </rolling_friction>
            <spring_coeff unit="LBS/FT"> 600 </spring_coeff>
            <damping_coeff unit="LBS/FT/SEC"> 900 </damping_coeff>
            <damping_coeff_rebound type="SQUARE" unit="LBS/FT2/SEC2"> 900 </damping_coeff_rebound>
            <max_steer unit="DEG"> 0 </max_steer>
            <brake_group> NONE </brake_group>
            <retractable> 0 </retractable>
        </contact>


        <contact type="STRUCTURE" name="WING_TOP">
            <location unit="IN">
                <x> 30 </x>
                <y> 0 </y>
                <z> 56 </z>
            </location>
            <static_friction> 0.8 </static_friction>
            <dynamic_friction> 0.6 </dynamic_friction>
            <rolling_friction> 0.3 </rolling_friction>
            <spring_coeff unit="LBS/FT"> 200 </spring_coeff>
            <damping_coeff unit="LBS/FT/SEC"> 300 </damping_coeff>
            <damping_coeff_rebound type="SQUARE" unit="LBS/FT2/SEC2"> 300 </damping_coeff_rebound>
            <max_steer unit="DEG"> 0 </max_steer>
            <brake_group> NONE </brake_group>
            <retractable> 0 </retractable>
        </contact>

        <contact type="STRUCTURE" name="WING_TOP_MID_LEFT">
            <location unit="IN">
                <x> 30 </x>
                <y> -50 </y>
                <z> 56 </z>
            </location>
            <static_friction> 0.8 </static_friction>
            <dynamic_friction> 0.6 </dynamic_friction>
            <rolling_friction> 0.3 </rolling_friction>
            <spring_coeff unit="LBS/FT"> 200 </spring_coeff>
            <damping_coeff unit="LBS/FT/SEC"> 300 </damping_coeff>
            <damping_coeff_rebound type="SQUARE" unit="LBS/FT2/SEC2"> 300 </damping_coeff_rebound>
            <max_steer unit="DEG"> 0 </max_steer>
            <brake_group> NONE </brake_group>
            <retractable> 0 </retractable>
        </contact>

        <contact type="STRUCTURE" name="WING_TOP_MID_RIGHT">
            <location unit="IN">
                <x> 30 </x>
                <y> 50 </y>
                <z> 56 </z>
            </location>
            <static_friction> 0.8 </static_friction>
            <dynamic_friction> 0.6 </dynamic_friction>
            <rolling_friction> 0.3 </rolling_friction>
            <spring_coeff unit="LBS/FT"> 200 </spring_coeff>
            <damping_coeff unit="LBS/FT/SEC"> 300 </damping_coeff>
            <damping_coeff_rebound type="SQUARE" unit="LBS/FT2/SEC2"> 300 </damping_coeff_rebound>
            <max_steer unit="DEG"> 0 </max_steer>
            <brake_group> NONE </brake_group>
            <retractable> 0 </retractable>
        </contact>

        <contact type="STRUCTURE" name="MIDDLE_UPPER">
            <location unit="IN">
                <x> 70 </x>
                <y> 0 </y>
                <z> 48 </z>
            </location>
            <static_friction> 0.8 </static_friction>
            <dynamic_friction> 0.6 </dynamic_friction>
            <rolling_friction> 0.3 </rolling_friction>
            <spring_coeff unit="LBS/FT"> 200 </spring_coeff>
            <damping_coeff unit="LBS/FT/SEC"> 300 </damping_coeff>
            <damping_coeff_rebound type="SQUARE" unit="LBS/FT2/SEC2"> 300 </damping_coeff_rebound>
            <max_steer unit="DEG"> 0 </max_steer>
            <brake_group> NONE </brake_group>
            <retractable> 0 </retractable>
        </contact>

        <contact type="STRUCTURE" name="MIDDLE_BACK_UPPER">
            <location unit="IN">
                <x> 130 </x>
                <y> 0 </y>
                <z> 32 </z>
            </location>
            <static_friction> 0.8 </static_friction>
            <dynamic_friction> 0.6 </dynamic_friction>
            <rolling_friction> 0.3 </rolling_friction>
            <spring_coeff unit="LBS/FT"> 200 </spring_coeff>
            <damping_coeff unit="LBS/FT/SEC"> 300 </damping_coeff>
            <damping_coeff_rebound type="SQUARE" unit="LBS/FT2/SEC2"> 300 </damping_coeff_rebound>
            <max_steer unit="DEG"> 0 </max_steer>
            <brake_group> NONE </brake_group>
            <retractable> 0 </retractable>
        </contact>

        <contact type="STRUCTURE" name="BACK_UPPER">
            <location unit="IN">
                <x> 180 </x>
                <y> 0 </y>
                <z> 28 </z>
            </location>
            <static_friction> 0.8 </static_friction>
            <dynamic_friction> 0.6 </dynamic_friction>
            <rolling_friction> 0.3 </rolling_friction>
            <spring_coeff unit="LBS/FT"> 200 </spring_coeff>
            <damping_coeff unit="LBS/FT/SEC"> 300 </damping_coeff>
            <damping_coeff_rebound type="SQUARE" unit="LBS/FT2/SEC2"> 300 </damping_coeff_rebound>
            <max_steer unit="DEG"> 0 </max_steer>
            <brake_group> NONE </brake_group>
            <retractable> 0 </retractable>
        </contact>


        <contact type="STRUCTURE" name="TAIL_TOP">
            <location unit="IN">
                <x> 239 </x>
                <y> 0 </y>
                <z> 25 </z>
            </location>
            <static_friction> 0.8 </static_friction>
            <dynamic_friction> 0.6 </dynamic_friction>
            <rolling_friction> 0.3 </rolling_friction>
            <spring_coeff unit="LBS/FT"> 200 </spring_coeff>
            <damping_coeff unit="LBS/FT/SEC"> 300 </damping_coeff>
            <damping_coeff_rebound type="SQUARE" unit="LBS/FT2/SEC2"> 300 </damping_coeff_rebound>
            <max_steer unit="DEG"> 0 </max_steer>
            <brake_group> NONE </brake_group>
            <retractable> 0 </retractable>
        </contact>

        <!-- These contact points are designed to protect the BOGEY contact points with STRUCTURE contact points to protect them from impact at angles far from vertical, as described in http://wiki.flightgear.org/JSBSim_GroundReactions

        Note that the z position of these elements in manipulated in JSBSim.nas to match the position of the main gear elements, which varies depending on whether we're on water or solid ground.-->

        <contact type="STRUCTURE" name="LEFT_MAIN_PROTECTOR">
            <location unit="IN">
                <x> 40 </x> <!--2.0alpha1: 10 -->
                <y> -39.06 </y>
                <z> -55 </z>
            </location>
            <static_friction> 5 </static_friction>
            <dynamic_friction> 5 </dynamic_friction>
            <rolling_friction> 5 </rolling_friction>
            <spring_coeff unit="LBS/FT"> 1000 </spring_coeff>
            <damping_coeff unit="LBS/FT/SEC"> 300 </damping_coeff>
            <damping_coeff_rebound type="SQUARE" unit="LBS/FT2/SEC2"> 10000 </damping_coeff_rebound>
            <max_steer unit="DEG"> 0 </max_steer>
            <brake_group> NONE </brake_group>
            <retractable> 0 </retractable>
        </contact>
        <contact type="STRUCTURE" name="RIGHT_MAIN_PROTECTOR">
            <location unit="IN">
                <x> 40 </x> <!--2.0alpha1: 10 -->
                <y> 39.06 </y>
                <z> -55 </z>
            </location>
            <static_friction> 5 </static_friction>
            <dynamic_friction> 5 </dynamic_friction>
            <rolling_friction> 5 </rolling_friction>
            <spring_coeff unit="LBS/FT"> 1000 </spring_coeff>
            <damping_coeff unit="LBS/FT/SEC"> 300 </damping_coeff>
            <damping_coeff_rebound type="SQUARE" unit="LBS/FT2/SEC2"> 10000 </damping_coeff_rebound>
            <max_steer unit="DEG"> 0 </max_steer>
            <brake_group> NONE </brake_group>
            <retractable> 0 </retractable>
        </contact>

        <contact type="STRUCTURE" name="TAIL_PROTECTOR">
            <location unit="IN">
                <x> 249 </x>
                <y> 0 </y>
                <z> -2 </z>
            </location>
            <static_friction> 0.4 </static_friction>
            <dynamic_friction> 0.3 </dynamic_friction>
            <rolling_friction> 0.1 </rolling_friction>
            <spring_coeff unit="LBS/FT"> 150 </spring_coeff>
            <damping_coeff unit="LBS/FT/SEC"> 195 </damping_coeff>
            <damping_coeff_rebound type="SQUARE" unit="LBS/FT2/SEC2"> 195 </damping_coeff_rebound>
            <max_steer unit="DEG"> -20 </max_steer>
            <brake_group> NONE </brake_group>
            <retractable> 0 </retractable>
        </contact>


    </ground_reactions>

    <propulsion>
        <engine file="Clerget9B">
            <location unit="IN">
                <x> 10 </x>
                <y> 0 </y>
                <z> 0 </z>
            </location>
            <orient unit="DEG">
                <roll> 0 </roll>
                <pitch> 0 </pitch>
                <yaw> 0 </yaw>
            </orient>
            <feed>0</feed>
            <feed>1</feed>
            <thruster file="CamelProp">
                <!--OK, the docs say that sense =1 for CW propeller as seen
                from the cockpit.  The camel has a CW propeller by every example
                I've been able to find. This source definitely says, "The
                direction of rotation was counter-clockwise as seen from the
                propeller-end of the engine." The photos also show a CCW (from
                propeller-end) rotating prop.  That would be clockwise as seen
                from the pilot's seat and sense=1.
                http://www.gracesguide.co.uk/Clerget

                But sense=1 makes the Camel climb on RH
                turn and dive on LH turn.  Lots of sources say the opposite,
                especially including this experienced pilot who is clearly
                flying a craft with a CW propeller (as seen from cockpit) and
                yet he says the Camel dives on RH turn and climbs on LH.

                 http://www.youtube.com/watch?v=j6PnKUEFX8g

                Wikipedia says, "To easily ascertain the direction of gyro effect, simply remember that a rolling wheel tends, when it leans to the side, to turn in the direction of the lean." http://en.wikipedia.org/wiki/Gyroscope#Properties That means, for a CW (from the rear) propeller, a turn to the right causes nose to drop, exactly what is reported for the Camel.

                My conclusion is that JSBSim has it backwards and sense=1 corresponds to CCW rotation of the prop, as seen from the rear, as far as gyroscopic moment is concerned.

				However, as far as p_factor & torque is concerned, JSBSim seems to have it right.

                So what we're going to do is put in sense=1 here to get correct p_factor and torque effects, but then put in a correction down in the aero section
				to correct the moments, which JSBSim seems to have reversed.

        UPDATE, Ver. 2.0.  The JSBSim folks fixed the SENSE issue described above.  So now we have <propeller name="prop" version="1.1">  in the CamelProp.xml file, which fixes the 'reversed sense' issue.  So now we can revert sense to 1 instead of -1 - and ALSO undo all of the various compensations (torque etc) we did to adjust for the fact the sense = -1 is actually incorrect.
                -->
                <sense>1</sense>
                <location unit="IN">
                    <x> 0 </x>
                    <y> 0 </y>
                    <z> 0 </z>
                </location>
                <orient unit="DEG">
                    <roll> 0 </roll>
                    <pitch> 0 </pitch>
                    <yaw> 0 </yaw>
                </orient>
            </thruster>
        </engine>
        <!-- Fuel is behind the pilot, 22 gal, 133.6 lb.  Appears to be
          about half way between nose & tail.  With fuel full,
          AC was tailheavy acc to http://www.theaerodrome.com/forum/2000/9166-sopwith-camel-facts-2.html With fuel empty, nose heavy.

         UPDATE: Per sopwith-camel-specs-drawings-2-2.jpg main fuel tank is about 80.9 inches behind tip of nose/propeller, and may 1-3 inches above the centerline.  Aux fuel tank is about 78 inches back & higher, say 18 inches above the centerline.

         The above 22 gal figure appears to be incorrect (though 2X22gallon tanks = 37 Imperial Gallons, so perhaps that explains the discrepancy), here is more detail:

         http://www.theaerodrome.com/forum/aircraft/58481-sopwith-camel-fuel-tank-capacities.html
           Bruce Robertson in 'Sopwith - The man and his Aircraft' has the following Fuel and Oil capacities for the Sopwith Camel in his data tables:
F.1/1 130hp Clerget - 37 galls. of fuel, no oil given.
TF.1 110 hp Le Rhone - 37 galls. fuel, 2 1/2 galls. oil.
F.1 150 hp Mono Gnome - 27 1/2 galls. fuel, 5 1/4 galls. oil.
F.1 180 hp Le Rhone - 26 1/4 galls fuel, 5 1/4 galls. oil.
F.1 150 hp BR.1 - 37 galls. fuel, 5 1/4 galls. oil.
F.1 150 hp BR.1 HC - 37 galls. fuel, 5 1/4 galls. oil.
2F.1 130 hp Clerget - 37 galls. fuel, 5 1/2 galls. oil.
2F.1 150 hp BR.2 - 37 galls. fuel, 5 1/2 galls. oil.

Jack Bruce's 'British Aeroplanes 1914-1918', page 589, the tankage is - Petrol: main (pressure) tank, 30 gallons; gravity tank, 7 gallons; total 37 gallons. Oil: 6 1/2 gallons. (all imperial).

More:
130 HP Clerget - 243 lb.
110 HP Le Rhone - 252 lb.
150 HP AR.1 - 250 lb.
100 HP Gnome Monosoupape - 224 lb.
150 HP Gnome Monosoupape - 230 lb.
180 HP Le Rhone - 238 lb.

2.F.1 Camel:
130 HP Clerget - 286 lb.
150 HP BR.1 - 223 lb.

Taper Wing Camel:
130 HP Clerget - 252 lb.

We're modeling the 130 HP Clerget here, so 30 imp. gal in one tank and 7 in the other; plus 6.5 imperial gallons oil just behind engine.  Gasoline is 6.1 lbs per gallon and castor oil is    956 kg/m^3 or 7.97820666 pounds per u.s. gallon.
 30 imp gal = 36.0285 gal = 219.8 lbs
  7 imp gal = 8.40665 gal = 51.3 lbs
  6.5 imp gal = 30 liters = 7.81 gal = 62.31 lbs

  TODO: Not sure if fuel tanks need more code to draw from one to the other or switch between them.
  TODO: Oil is just a pointmass & doesn't empty throughout the flight (see Castor Oil below under pointmass).
       <priority> - not sure it works?
          -->
          <!-- 2.0gamma version
          <tank type="FUEL" number="0">
            <location unit="IN">
                <x> 60 </x>
                <y> 0 </y>
                <z> -5.62 </z>
            </location>
            <capacity unit="LBS">51.3</capacity>
            <contents unit="LBS">51.3</contents>
            <priority>1</priority>
        </tank>
        <tank type="FUEL" number="1">
            <location unit="IN">
                <x> 90 </x>
                <y> 0 </y>
                <z> -5.62 </z>
            </location>
            <capacity unit="LBS">219.8</capacity>
            <contents unit="LBS">219.8</contents>
            <priority>2</priority>
        </tank>
        -->

        <tank type="FUEL" number="0">
            <location unit="IN">
                <x> 78 </x>
                <y> 0 </y>
                <z> 18 </z>
            </location>
            <capacity unit="LBS">51.3</capacity>
            <contents unit="LBS">51.3</contents>
            <priority>1</priority> <!-- gravity tank, it feeds first -->
        </tank>
        <tank type="FUEL" number="1">
            <location unit="IN">
                <x> 80.9 </x>
                <y> 0 </y>
                <z> 3 </z>
            </location>
            <capacity unit="LBS">219.8</capacity>
            <contents unit="LBS">219.8</contents>
            <priority>2</priority>
        </tank>

    </propulsion>

    <flight_control name="FCS: Camel">

        <channel name="Pitch">
            <!-- squaring joystick input to give greater sensitivity in the center of the range -->
            <fcs_function name="elevator-cmd-sqred">
               <input>fcs/elevator-cmd-norm</input>
               <function>
                 <product>
                  <abs>
                            <property>fcs/elevator-cmd-norm</property>
                  </abs>
                  <!-- <abs>
                            <property>fcs/elevator-cmd-norm</property>
                  </abs> -->
                 </product>
               </function>
               <clipto>
                 <min> -1 </min>
                 <max> 1 </max>
               </clipto>
               <output>fcs/elevator-cmd-sqred</output>
            </fcs_function >

            <summer name="Pitch Trim Sum">
              <input>fcs/elevator-cmd-sqred</input>
              <input>fcs/pitch-trim-cmd-norm</input>
              <clipto>
                <min>-1</min>
                <max>1</max>
              </clipto>
            </summer>

            <aerosurface_scale name="Elevator Control">
              <input>fcs/pitch-trim-sum</input>
              <range>
                <min>-0.55</min>
                <max>0.55</max>
              </range>
              <output>fcs/elevator-pos-rad</output>
            </aerosurface_scale>

            <aerosurface_scale name="elevator normalization">
              <input>fcs/elevator-pos-rad</input>
              <domain>
                <min>-0.35</min>
                <max>0.35</max>
              </domain>
              <range>
                <min>-1</min>
                <max>1</max>
              </range>
              <output>fcs/elevator-pos-norm</output>
            </aerosurface_scale>

        </channel>

        <channel name="Roll">

            <!-- squaring joystick input to give greater sensitivity in the center of the range -->
            <fcs_function name="aileron-cmd-sqred">
               <input>fcs/aileron-cmd-norm</input>
               <function>
                 <product>
                  <abs>
                            <property>fcs/aileron-cmd-norm</property>
                  </abs>
                  <!-- <abs>
                            <property>fcs/aileron-cmd-norm</property>
                  </abs> -->
                 </product>
               </function>
               <clipto>
                 <min> -1 </min>
                 <max> 1 </max>
               </clipto>
               <output>fcs/aileron-cmd-sqred</output>
            </fcs_function >

            <summer name="Roll Trim Sum">
              <input>fcs/aileron-cmd-sqred</input>
              <input>fcs/roll-trim-cmd-norm</input>

              <!-- This bias value just trims out the ailerons a bit so that
              the Camel doesn't require continual aileron input under
              full power.   -->
              <!-- <bias> 0.11825 </bias> -->
              <clipto>
                <min>-1</min>
                <max>1</max>
              </clipto>
            </summer>

            <aerosurface_scale name="Left Aileron Control">
              <input>fcs/roll-trim-sum</input>
              <range>
                <min>-0.35</min>
                <max>0.35</max>
              </range>
              <output>fcs/left-aileron-pos-rad</output>
            </aerosurface_scale>


            <aerosurface_scale name="Right Aileron Control">
              <input>fcs/roll-trim-sum</input>
              <range>
                <min>-0.35</min>
                <max>0.35</max>
              </range>
              <output>fcs/right-aileron-pos-rad</output>
            </aerosurface_scale>

            <aerosurface_scale name="left aileron normalization">
              <input>fcs/left-aileron-pos-rad</input>
              <domain>
                <min>-0.35</min>
                <max>0.35</max>
              </domain>
              <range>
                <min>-1</min>
                <max>1</max>
              </range>
              <output>fcs/left-aileron-pos-norm</output>
            </aerosurface_scale>

            <aerosurface_scale name="right aileron normalization">
              <input>fcs/right-aileron-pos-rad</input>
              <domain>
                <min>-0.35</min>
                <max>0.35</max>
              </domain>
              <range>
                <min>-1</min>
                <max>1</max>
              </range>
              <output>fcs/right-aileron-pos-norm</output>
            </aerosurface_scale>

        </channel>

        <channel name="Yaw">

            <fcs_function name="rudder-cmd-sqred">
               <input>fcs/rudder-cmd-norm</input>
               <function>
                 <product>
                  <abs>
                            <property>fcs/rudder-cmd-norm</property>
                  </abs>
                  <!-- <abs>
                            <property>fcs/rudder-cmd-norm</property>
                  </abs> -->
                 </product>
               </function>
               <clipto>
                 <min> -1 </min>
                 <max> 1 </max>
               </clipto>
               <output>fcs/rudder-cmd-sqred</output>
            </fcs_function >

            <summer name="Rudder Command Sum">
              <input>fcs/rudder-cmd-sqred</input>
              <input>fcs/yaw-trim-cmd-norm</input>
              <clipto>
                <min>-0.35</min>
                <max>0.35</max>
              </clipto>
            </summer>

            <aerosurface_scale name="Rudder Control">
              <input>fcs/rudder-command-sum</input>
              <range>
                <min>-0.35</min>
                <max>0.35</max>
              </range>
              <output>fcs/rudder-pos-rad</output>
            </aerosurface_scale>

            <aerosurface_scale name="rudder normalization">
              <input>fcs/rudder-pos-rad</input>
              <domain>
                <min>-0.35</min>
                <max>0.35</max>
              </domain>
              <range>
                <min>-1</min>
                <max>1</max>
              </range>
              <output>fcs/rudder-pos-norm</output>
            </aerosurface_scale>

        </channel>
           <property value="1">fcs/mag-switch-right</property>
           <property value="1">fcs/mag-switch-left</property>
        <channel name="Throttle">

            <!-- LIMITING throttle some on the lower end to mimic the more crude type throttle controls available on the rotary engines.  Basically, our full throttle throw controls only the upper 50% or less of the throttle; we can't reach the lower 50%, which mimics the fact that you couldn't really throttle down rotary engines to a low idle etc -->
            <aerosurface_scale name="throttle-cmd-limit">
                <input>fcs/throttle-cmd-norm</input>
                 <zero_centered>false</zero_centered>
                <domain>
                  <min> 0 </min>   <!-- If omitted, default is -1.0 -->
                  <max> 1 </max>   <!-- If omitted, default is  1.0 -->
                </domain>
                <range>
                  <min> 0.85 </min>   <!-- If omitted, default is 0 -->
                  <max> 1 </max>   <!-- If omitted, default is 0 -->
                </range>

          </aerosurface_scale>

          <!-- if the right magneto is OFF we limit the throttle by about 1/9
          this is to duplicate the effect the real magnetos had, where one reduced engine power by about 4/9, the other reduced it by 5/9
          JSBSim engine / Clerget9B.xml / only allows us to consider the power
          reduction from one magneto, so here is where we work in the 2nd one
          Adjust this in concert with sparkfaildrop in Clerget9B.xml
          -->
          <scheduled_gain name="fcs/throttle_limit_by_magento">
                <input>fcs/throttle-cmd-limit</input>
                <table>
                    <independentVar>fcs/mag-switch-right</independentVar>
                      <tableData>
                      0 .865 <!-- ver 2.0gamma: 0.8 -->
                      1  1
                      </tableData>
                 </table>

            </scheduled_gain>
            <!-- This is a bit of a kludge to reduce the Camel service ceiling to 19,600 ft, and reduce performance above 12,000 as reported at the time.
            This function simply reduces throttle at these altitudes to give lower engine performance.-->
            <!-- starting the limit @ 15000 gives FAR too high performance in climb  11000 or 10000 or maybe even lower is better.  However, starting the limit below 10000 may interfere with the reported airspeed @ 10000 ft
            15000 .9285 gives our desired 92.5 knots TAS at 15000.
            13944 1 gives pretty much straight line dropoff in engine between 13944 & 19600
            And now, after testing & implementing this approach to the ceiling
            for several versions, now in Ver. 2.0 it seems to be unneeded. With
            the table set to flat '1's the ceiling is 19600 almost exactly.

            It's possible to work up to 20000 or 21000 but the margin is very,
            very narrow and that type of altitude is not very usable for any
            practical purpose.

            -->
            <scheduled_gain name="fcs/throttle_limit_by_altitude">
                <input>fcs/throttle_limit_by_magento</input>
                <table>
                    <independentVar>atmosphere/pressure-altitude</independentVar>
                      <tableData>
                      <!--
                      -10000 1
                      13944  1
                      15000 .9285
                      19600  .58
                      -->
                      -10000 1
                      13944  1
                      15000  1
                      19600  1
                      </tableData>
                 </table>

                 <output>fcs/throttle-pos-norm</output>

            </scheduled_gain>

        </channel>


    </flight_control>


    <system file="crash-detect"/>
    <system file="automixture"/>
    <system file="tie-down"/>
    <aerodynamics>
            <function name="aero/function/kCDge">
            <description>Change_in_drag_due_to_ground_effect</description>
            <product>
                  <table>
                      <independentVar>aero/h_b-mac-ft</independentVar>
                      <tableData>
                          0.0000	0.4800
                          0.1000	0.5150
                          0.1500	0.6290
                          0.2000	0.7090
                          0.3000	0.8150
                          0.4000	0.8820
                          0.5000	0.9280
                          0.6000	0.9620
                          0.7000	0.9880
                          0.8000	1.0000
                      </tableData>
                  </table>
            </product>
        </function>

        <function name="aero/function/kCLge">
            <description>Change_in_u_due_to_ground_effect</description>
            <product>
                  <table>
                      <independentVar>aero/h_b-mac-ft</independentVar>
                      <tableData>
                          0.0000	1.2030
                          0.1000	1.1270
                          0.1500	1.0900
                          0.2000	1.0730
                          0.3000	1.0460
                          0.4000	1.0550
                          0.5000	1.0190
                          0.6000	1.0130
                          0.7000	1.0080
                          0.8000	1.0060
                          0.9000	1.0030
                          1.0000	1.0020
                          1.1000	1.0000
                      </tableData>
                  </table>
            </product>
        </function>
        <!-- Below two functions from c172p.xml, FG2.10 -->
        <function name="aero/function/velocity-induced-fps">
            <description> velocity including the propulsion induced velocity.</description>
            <sum>
                <property>velocities/u-aero-fps</property>
                <property>propulsion/engine/prop-induced-velocity_fps</property>
                <property>propulsion/engine/prop-induced-velocity_fps</property>
            </sum>
        </function>

        <function name="aero/function/qbar-induced-psf">
            <description> q bar including the propulsion induced velocity.</description>
            <product>
                <property>aero/function/velocity-induced-fps</property>
                <property>aero/function/velocity-induced-fps</property>
                <property>atmosphere/rho-slugs_ft3</property>
                <value>0.5</value>
            </product>
        </function>

        <axis name="LIFT" unit="LBS">
            <function name="aero/force/Lift_alpha">
                <description>Lift due to alpha</description>
                <product>
                    <property>systems/tie-down-factor</property>
                    <property>aero/qbar-psf</property>
                    <property>metrics/Sw-sqft</property>
                    <property>aero/function/kCLge</property>
                    <!-- 1.4 candidate <value>1.4</value> -->
                    <!-- ver 1.8 value: 1.4 -->
                    <value>1.05</value>  <!-- was 1.0 for 2.0gamma, but backing up to 1.1. It won't do loops easily, for one thing.  We don't have any lift for body or tail, for another. Maybe  it could be 1.05 or something. -->
                    <table>
                        <!--
                        <independentVar>aero/alpha-rad</independentVar>
                        <tableData>
                          -0.2          -0.5
                          0             0.15
                          0.23          1
                          0.3           1.03
                          0.6           0.4
                        </tableData>
                        -->
                        <!-- the lift data is based on wind tunnel data from:
                          On the Effect of Cutting a Hole in the Top Plane of a Biplane
                          By C.H. Powell, Repots and Memoranda (New Series), No. 419, Feb 1918
                          That includes data for the wings only, so it has been
                          massaged to approximate the entire AC and also extended
                          to create data for -90 to 90 degrees.  See
                          Camel-JSBSim-calcs-2011-10D.xls in Docs directory for details.
                        -->

                        <independentVar>aero/alpha-deg</independentVar>
                        <tableData>
<!-- -90	0
-60	-0.1
-30	-0.4
-20	-0.6
-14	-0.512
-12	-0.449
-10	-0.379
-8	-0.306
-6	-0.2444
-4	-0.116
-3	-0.0484
-2	0.018
-1	0.0804
0	0.148
1	0.2254
2	0.3054
3	0.379
4	0.449
5	0.512
6	0.574
8	0.69
10	0.79
12	0.896
14	0.99
16	1.062
18	1.066
20	1.042
30	0.7
60	0.3
90	0 -->

<!--
-90	0
-60	-0.1
-30	-0.4
-20	-0.6
-14	-0.512
-12	-0.449
-10	-0.379
-8	-0.306
-6	-0.2444
-4	-0.116
-3	-0.0484
-2	0.018
-1	0.0804
0	0.148
1	0.2254
2	0.3054
3	0.379
4	0.449
4.5	0.512
5	0.574
6	0.69
7	0.79
8 0.896
9	0.99
10	1.062
11	1.066
12	1.042
17	0.7
20  0.5
23  0.7  #this appears to be a mistake/typo
26  0.5  #this appears to be a mistake/typo
30  0.2
60	0.1
90	0

-->
<!-- Ver. 1.9: tweaking the values for 25 degrees and above/-25 and below, to better simulate deep stall

TODO: Not sure if the core values here for drag & lift in ver 1.8 are really our best data -->

-90	0
-60	-0.4
-45 -0.6   <!-- The second peak of the lift curve, to better simulate 'deep stall -->
-30	-0.4
-20	-0.6
-14	-0.512
-12	-0.449
-10	-0.379
-8	-0.306
-6	-0.2444
-4	-0.116
-3	-0.0484
-2	0.018
-1	0.0804
0	0.148
1	0.2254
2	0.3054
3	0.379
4	0.449
4.5	0.512
5	0.574
6	0.69
7	0.79
8 0.896
9	0.99
10	1.062
11	1.066
12	1.042
17	0.7
20  0.5
26  0.5
30  0.7
45  1.042  <!-- The second peak of the lift curve, to better simulate 'deep stall -->
60	0.6
90	0


                        </tableData>
                        <!-- The lift data from LesterBoffo -->
                        <!--
                        <independentVar>aero/alpha-rad</independentVar>
                        <tableData>
                          -0.2793        -1.298
                          -0.1396        -0.5118
                          -0.1047        -0.3244
                          -0.0698        -0.1446
                          -0.0349        0.0581
                           0.000         0.170
                           0.01745       0.355
                           0.03491       0.536
                           0.0428        0.69
                           0.0523        0.84
                           0.06981       0.984
                           0.1047         1.045
                           0.1396         1.18
                           0.1745         1.316
                           0.1918         1.59
                           0.2443         1.565
                           0.2793         1.491
                           0.3142         1.383
                           0.3316         1.214
                           0.3491         1.191
                           0.3665         1.037
                           0.3840         0.8031
                           0.436         0.6785
                        </tableData>
                        -->

                    </table>
                </product>
            </function>
            <function name="aero/force/Lift_elevator">
                <description>Lift due to Elevator Deflection</description>
                <product>
                   <property>systems/tie-down-factor</property>
                    <property>aero/qbar-psf</property>
                    <property>metrics/Sw-sqft</property>
                    <property>fcs/elevator-pos-rad</property>
                    <!-- Aeromatic: <value>0.15</value> -->
                    <!-- <value>0.921</value> --> <!-- to compensate for Sw-sqft of 212.6948698 vs 231 - most things tuned for 212.7 but now 231 -->
                    <value>0.05</value>
                </product>
            </function>
        </axis>
        <axis name="DRAG" unit="LBS">
            <function name="aero/force/Drag_basic">
                <description>Drag at zero lift</description>
                <product>
                   <property>systems/tie-down-factor</property>
                    <property>aero/qbar-psf</property>
                    <property>metrics/Sw-sqft</property>
                    <!--  Zero Lift Drag Coefficient for Camel is 0.0378 per http://en.wikipedia.org/wiki/Sopwith_Camel-->
                    <!-- Cruising speed for Camel with 130 HP Clerget, per SopwithCamelSpecs-1955.pdf - Flight, "Sopwith Camel", 22 April 1955, is
                          115 mph @ 6500 ft      = 99.3 kts
                          113 mph @ 10000 ft     = 98.2 kts
                          106.5 mph @ 15000 ft   = 92.5 kts

                          2013/04/13 measured w/ 0.0378 for Cd0:
                           6500 = 100.4 kts IAS  115.2 KTS GROUNDSPEED   110.8 kts vtrue
                           10000 = 92.5 kts IAS  110.7 KTS GROUNDSPEED   107.7 kts vtrue
                           15000 = 82.8 kts IAS  109.2 KTS GROUNDSPEED   104.8 kts vtrue

                           2013/04/13 measured w/ 0.0478 for Cd0:
                           6500 = 91.9 kts IAS   97.49 KTS GROUNDSPEED   101.8 kts vtrue
                           10000 = 85.7 kts IAS  100.4 KTS GROUNDSPEED   99.9 kts vtrue
                           15000 = 76.0 kts IAS  91.2  KTS GROUNDSPEED   95.7  kts vtrue

                           2013/04/13, later, measured w/ 0.0378 for Cd0 and numerous other changes to lift/drag to make the 10,000 ft climb perf chart at Camel JSBSim Climb vs Speed1.3a in Camel-JSBSim-calcs-2011-10D.xls:
                           6500 =  86.5 kts IAS    96.0 kts vtrue
                           10000 = 81.5 kts IAS    95.3 kts vtrue
                           15000 = 75.3 kts IAS    95.5 kts vtrue

                           2013/04/15
                           6500 = 100.8 vtrue
                           10000 = 96.5 vtrue
                           15000 = 90.3 vtrue


                         Climb to
                          6500 ft = 6 min 0 sec
                          10000 ft = 10 min 35 sec
                          15000 ft = 20 min 40 sec

                    -->

                    <value>0.0378 </value>
                </product>
            </function>

            <function name="aero/force/Drag_induced">
                <description>Induced drag</description>
                <product>
                   <property>systems/tie-down-factor</property>
                    <property>aero/qbar-psf</property>
                    <property>metrics/Sw-sqft</property>
                    <property>aero/function/kCDge</property>
                    <!-- ver 1.4 candidate <value>1.5</value> --> <!-- because the drag data is from the wings only we use this factor to adjust is so that it matches published speed & climb data for the Camel A/C as a whole -->
                    <value>1.5</value> <!-- 1.8 value: 1.5. Trying 2.0 for ver. 2.0 bec the climb rate @ low speeds seems too high, plus stall speed a bit too high
                    2.0gamma: 2.  Trying 1, just to see.
                    -->
                    <table>
                        <independentVar>aero/alpha-deg</independentVar>

                        <tableData>
<!-- ver 1.8 drag data:     -->
-90	2.79
-60	1.39
-30	0.39
-20	0.11
-14	0.067
-12	0.054
-10	0.043
-8	0.033
-6	0.0264
-4	0.005
-3	0.003
-2	0.002
-1	0.001
0	0
1	0.001
2	0.005
3	0.0075
4	0.0085
5	0.0105
6	0.015
8	0.025
10	0.032
12	0.045
14	0.0633
16	0.08
18	0.125
20	0.22
30	0.39
60	1.39
90	2.79


<!-- 2.0 trial data: this data was tweaked from the above in the range 4-6 degrees to see if we can address an anomaly where the speed/climb @ 4.5-6 deg AoA seems abnormally high. Decided not to use this bec. the 'abnormally high' climb rate business actually gives us pretty darn close to the historically recorded climb rate for the Camel, whereas nicking off that little 'anomaly' makes it climb far slowly than recorded historically -->
<!--
-90	2.79
-60	1.39
-30	0.39
-20	0.11
-14	0.067
-12	0.054
-10	0.043
-8	0.033
-6	0.0264
-4	0.005
-3	0.003
-2	0.002
-1	0.001
0	0
1	0.001
2	0.005
3	0.0075
4	0.01152
5	0.0135
6	0.017
8	0.025
10	0.032
12	0.045
14	0.0633
16	0.08
18	0.125
20	0.22
30	0.39
60	1.39
90	2.79
-->


                        </tableData>
                    </table>
                </product>
            </function>

            <function name="aero/force/Drag_mach">
                <description>Drag due to mach</description>
                <product>
                   <property>systems/tie-down-factor</property>
                    <property>aero/qbar-psf</property>
                    <property>metrics/Sw-sqft</property>
                    <table>
                        <independentVar>velocities/mach</independentVar>
                        <tableData>
                          0             0
                          0.7           0
                          1.1           0.023
                          1.8           0.015
                        </tableData>
                    </table>
                </product>
            </function>

            <function name="aero/force/Drag_beta">
                <description>Drag due to sideslip</description>
                <product>
                   <property>systems/tie-down-factor</property>
                    <property>aero/qbar-psf</property>
                    <property>metrics/Sw-sqft</property>
                    <value>1.5</value>
                    <table>
                        <!--
                        <independentVar>aero/beta-rad</independentVar>
                        <tableData>
                          -1.57         0.5
                          -0.26         0.05
                          0             0
                          0.26          0.05
                          1.57          0.5
                        </tableData>
                        -->
                        <!-- Switching this to degrees just for
                        consistency with alpha drag -->

                        <independentVar>aero/beta-deg</independentVar>
                        <tableData>
                         -180           0
                         -160           .15
                          -90           .3 <!-- see note below -->
                          -30           0.15
                          -10           0.02
                          0             0
                          10            0.02
                          30.0          0.15
                          90            .3  <!-- was 1.2, but drag when 90 deg to wind seems disproportationately huge.  Changing to 0.3 9/2023 -->
                          160           .15
                          180           0
                        </tableData>

                    </table>
                </product>
            </function>

            <function name="aero/force/Drag_elevator">
                <description>Drag due to Elevator Deflection</description>
                <product>
                   <property>systems/tie-down-factor</property>
                    <property>aero/qbar-psf</property>
                    <property>metrics/Sw-sqft</property>
                    <abs>
                        <property>fcs/elevator-pos-norm</property>
                    </abs>
                    <!--Aeromatic: 0.02 -->
                    <value>0.015</value>
                    <!-- <value>0.921</value> --> <!-- to compensate for Sw-sqft of 212.6948698 vs 231 - most things tuned for 212.7 but now 231 -->
                </product>
            </function>

            <!-- Camels large (but ineffective) 'barn door' ailerons produced
            'awe-inspiring' amounts of adverse yaw and also a great deal of drag. With no
            rudder correction it falls into a deep side-slip within a few seconds.
            http://riseofflight.com/Forum/download/file.php?id=31942&mode=view
            -->
            <function name="aero/force/Drag_left_aileron">
                <description>Drag due to Left Aileron Deflection</description>
                <product>
                   <property>systems/tie-down-factor</property>
                    <property>aero/qbar-psf</property>
                    <property>metrics/Sw-sqft</property>
                    <abs>
                        <property>fcs/left-aileron-pos-norm</property>
                    </abs>
                    <!--Aeromatic for Elevators: 0.02
                    Each aileron is nearly as large as the Elevator and there
                    are two of them on each side . . .
                    Max aileron deflection is about 15 degrees, per
                    http://www.theaerodrome.com/forum/replica-aircraft/43868-airdrome-f-1-camel-64.html
                    .04 seems to work OK.

                    Ballpark calculations:
                    Based on idea the fully deployed ailerons are about as draggy as say 1/3 the clean A/C (.0378 drag coefficient, so 0.0126) or as say 2/15 of the total wing drag @ 15 degrees alpha, which would be about .07 * 1.5 * 2/15 = .014
                    -->
                    <value>0.006</value>  <!-- ver 1.6 value .015 -->
                </product>
            </function>
            <function name="aero/force/Drag_right_aileron">
                <description>Drag due to Right Aileron Deflection</description>
                <product>
                   <property>systems/tie-down-factor</property>
                    <property>aero/qbar-psf</property>
                    <property>metrics/Sw-sqft</property>
                    <abs>
                        <property>fcs/right-aileron-pos-norm</property>
                    </abs>
                    <!--Aeromatic for Elevators: 0.02
                    Each aileron is nearly as large as the Elevator and there
                    are two of them on each side . . .
                    -->
                    <value>0.006</value>  <!-- ver 1.6 value .015 -->
                </product>
            </function>

            <function name="aero/force/Drag_roll_rate">
                <description>Drag due to fast roll rate roiling the air, causing wings to stall etc</description>
                <product>
                   <property>systems/tie-down-factor</property>
                    <property>aero/qbar-psf</property>
                    <property>metrics/Sw-sqft</property>
                    <value>0.15</value> <!-- started with 1.5, this was HUGELY too high and you could never get out of a spin bec. you stayed below stall speed no matter what.  Going to 1/10th that means this is a little higher than basic and induced drag in this kind of situation, which is still perhaps a bit too high 9/2023 -->
                    <table>
                       <independentVar>velocities/p-aero-rad_sec</independentVar>

                        <tableData>
                            -20       1
                            -6.5      0.43
                            -3        0.001
                            0            0
                            3         0.001
                            6.5       0.43
                            20        1
                        </tableData>

                    </table>
                </product>
            </function>


        </axis>
        <axis name="SIDE" unit="LBS">
            <function name="aero/force/Side_beta">
                <description>Side force due to beta</description>
                <product>
                   <property>systems/tie-down-factor</property>
                    <property>aero/qbar-psf</property>
                    <property>metrics/Sw-sqft</property>
                    <!-- <value>0.921</value> --> <!-- to compensate for Sw-sqft of 212.6948698 vs 231 - most things tuned for 212.7 but now 231 -->
                    <!--Aeromatic: <property>aero/beta-rad</property>
                    <value>-1</value> -->
                    <value>2</value> <!-- 1.6b experiment -->
                    <table>
                          <independentVar lookup="row">aero/beta-deg</independentVar>
                          <!-- Based on values from c172p plus generic wing lift graph data-->
                          <tableData>
                              -90     0
                              -15	    0.1370
                              0.0000	0.0000
                              15	    -0.1370
                              90      0
                          </tableData>
                      </table>
                </product>
            </function>
        </axis>

        <axis name="ROLL" unit="LBS*FT">
            <!-- This is to compensate for the fact the JSBSim has the direction of the gyroscopic moment from the propellor/engine
            reversed.  So we're switching sense to -1 to compensate, but then Torque is reversed.  So
            We're using this function to reverse the torque. -->
            <!--  Note for dummies:
              X = Axial drag force
              Y Side Force
              Z Normal Lift force

              l = roll (moments)
              m = pitch
              n = yaw

              p Roll Rate
              q Pitch Rate
              r Yaw Rate

              U Axial Velocity
              V Lateral Velocity
              W Normal Velocity
            -->

           <!-- Ver. 2.0 2017/03/02: OK, JSBSim fixed the sense direction issue, we have implemented the fix, and so now we can get rid of this unnecessary corrective function! -->
            <!--
     		    <function name="aero/moment/Roll_moment_prop_torque_jsbsim_correction">
                <description>This reverses the roll moment of the propeller, which we have reversed to compensate for the reversed sense of the gyroscopic moment in JSBSim</description>
                <product>
                    <property>moments/l-prop-lbsft</property>
                    <value>-2</value>
                </product>
            </function>
            -->

            <!-- Dihedral -->
            <function name="aero/moment/Roll_beta_alpha">
                <description>Roll moment due to beta, which is increased when when alpha increases/in stall</description>
                <product>
                    <property>systems/tie-down-factor</property>
                    <property>aero/qbar-psf</property>
                    <property>metrics/Sw-sqft</property>
                    <property>metrics/bw-ft</property>
                    <!-- <property>aero/beta-rad</property> plain alpha-rad is OK for small values, but for larger than abs(1) or so, need sin(alpha-rad) instead-->
                    <!-- <sin>
                        <property>aero/beta-rad</property>
                    </sin> -->

                    <table>
                        <independentVar>aero/beta-rad</independentVar>
                        <tableData>
                          -3.415            -0
                          -1                0
                          -.200             -0.2
                          0                  0
                          .2                 0.2
                          1                0
                          3.415              0
                        </tableData>
                    </table>

                        <value>4</value>  <!-- to adjust the table to =1 at -8 and 10 degrees. Was 3, now 8 -->
                        <table>

                        <!-- the roll/spin during stall is caused by the fact
                        that one wing will stall first, causing drag on that
                        side preferentially, which then causes more yaw,
                        which causes more beta, which further stalls the wing,
                        etc.  Point is, the roll moment due to beta increases
                        by A LOT as stall deepens.  Once both wings are stalled the differential decreases. -->
                        <independentVar>aero/alpha-deg</independentVar>
                        <tableData>
                            -90	0.25
                            -26 0.25
                            -24	0.33
                            -22	0.43
                            -18	0.54
                            -14	0.67
                            -12	0.54
                            -10	0.43
                            -8	0.33
                            -6	0.25
                            -5  0.25
                            -4	0.25
                            -3	0.25
                            -2	0.25
                            -1	0.25
                            0	0.25
                            1	0.25
                            2	0.25
                            3	0.25
                            4	0.25
                            5	0.25
                            6	0.25
                            8	0.29
                            10	0.32
                            12	0.45
                            14	0.633
                            16	0.8
                            18	1
                            20	0.8
                            22  0.6
                            24  0.4
                            26  0.25
                            90  0.25
                        </tableData>
                    </table>


                    <!-- value>-0.2</value -->
                    <!-- -0.1 according to Aeromatic -->
                    <!-- <value>-0.075</value> -->
                    <value>-0.1</value>
                    <!-- Asymmetric stall -->
                    <!-- This is cribbed directly from p51d-jsbsim.xml for now -->
                    <!-- Assymmetric stall - at higher alpha/beta angles the beta starts to destabilize the roll rather than stabilize it-->

                    <!--
                    <table>
                        <independentVar lookup="row">aero/alpha-deg</independentVar>


                        <independentVar lookup="column">velocities/vc-kts</independentVar>
                         <tableData>
                                 0  22  38   44   48  52
                            -45  -1 -1.1  -2     -1    -1   -1
                            -14.5  -1  -1.1 -2     -2    -1   -1
                            -13   1  1  1     1    1   1
                            13 1  1  1     1    1   1
                            14.5   -1  -1.1 -2     -2   -2   -1
                            30   -1  -1.1 -2     -2   -1.5   -1
                            45   -1  -1 -2     -2.5    -1   -1
                        </tableData>
                    </table>
                    -->
                </product>
            </function>
            <function name="aero/moment/Roll_damp">
                <description>Roll moment due to roll rate</description>
                <product>
                    <property>systems/tie-down-factor</property>
                    <property>aero/qbar-psf</property>
                    <property>metrics/Sw-sqft</property>
                    <property>metrics/bw-ft</property>
                    <property>aero/bi2vel</property>
                    <property>velocities/p-aero-rad_sec</property>

                    <!-- Aeromatic value was -0.4; this is replaced by the value * table value
                    below, to reduce the damping values for the Camel -->

                    <!-- Camel was sensitive & poorly damped in all directions of motion.  Adjusting this 0-1 adjusts this sensitivity. -->

                    <!--this tends to damp or *stop* the roll, thus the negative numbers (the overall effect is always to reduce the amount of roll moment).
          					With the Camel, in certain situations the roll actually won't damp out (ie, when in a tailspin - if you take your hands off the controls it will
          					just keep tailspinning indefinitely, unlike modern aircraft which are designed to naturally recover if you take your hands off the controls);
          					this is like having a roll damp of 0 or close to it.

                    "its time period is 1 to 2 seconds, and the loss of height per turn 150 to 200
                    feet." The table below is designed to 'channel' the spin to a speed of between
                    3.14 and 6.28 rad per second.
          					-->

                    <!-- <value>0.9</value> -->

                    <value>1.9</value><!-- testing -->

          					<table>
                        <independentVar>velocities/p-aero-rad_sec</independentVar>
                        <!-- 1.6  The problem with this is that is dampens too much in the ~3 rad/sec rank, thus stopping the spin
                        <tableData>
                          -100         -0.25
                          -6.28        -0.75
					              	-3           -0.4
                          -2.14        -0.005
                          -1.9         -0.05

                          -1.1         -0.25
                          -0.01        -0.27
                          0            -.3
                          0.01          -0.27
                          1.1          -0.25

                          1.9          -0.05
                          2.14         -0.005
						              3            -0.4
						              6.28         -0.75
                          100          -0.25
                        </tableData>
                        -->
                        <!-- 2.0 version - seems to allow pilots to too easily slip into a regular (controlled) aileron roll at 2 seconds per revolution, when in reality that fast a roll was nearly impossible.
                        <tableData>
                          -100         -0.75
                          -6          -0.4
                          -3          -0.01
                          -1.5         -0.005
                          -1.0         -0.23
                          -0.01        -0.27
                          0            -0.3
                          0.01         -0.27
                          1.0          -0.23
                          1.5          -0.005
                          3            -0.01
						              6            -0.4
                          100          -0.75
                        </tableData>
                        -->
                        <tableData>
                          -100         -0.75
                          -6.8          -0.4
                          -6.3          -0.01
                          -4          -0.001 <!-- 9/11/2023 was -.01, moving to -.001 to keep the roll going once it's in this range -->
                          -1.9         -0.005 <!-- 9/11/2009 adjustment, was 1.25 and 2.0, 1.2 and 1.9 just to tighten it up *slightly* -->
                          -1.2         -0.2  <!-- was -1.2 -.23, but now added .0.6 so that by say .7 we lose our damp quite a bit. .6/.7 is where a stall/spin starts -->
                          -0.4         -0.23
                          -0.01        -0.27
                          0            -0.3
                          0.01         -0.27
                          0.4          -0.23   <!-- see cojmments above -->
                          1.2          -0.2
                          1.9          -0.005
                          4            -0.001
                          6.3          -0.01
						  6.8            -0.4
                          100          -0.75
                        </tableData>
                        <!--
                        <tableData>
                          -100         -0.25
                          -6.28        -0.75
					              	-5           -0.005
                          -3.14        -0.005
                          -2.5         -0.1
                          -0.4         -0.1
                          0            -0.35
                          0.4          -0.1
                          2.5          -0.1
                          3.14         -0.005
						              5            -0.005
						              6.28         -0.75
                          100          -0.25
                        </tableData>
                        -->
                    </table>


                    <!-- camel is poorly damped and won't get out of spin/dive/etc just by releasing the controls -->

                </product>
            </function>
                        <!-- when the tie-down in placed, we want to dampen out pitch, roll, yaw moments rapidly -->
            <!-- this will only be operative when tie-down-factor == 0, ie when all other pitch moments are disabled -->
            <function name="aero/moment/Roll_damp_tiedown">
                <description>Yaw moment due to yaw rate</description>
                <product>
                    <sum>
                            <value>1</value>
                            <product>
                                <property>systems/tie-down-factor</property>
                                <value>-1</value>
                            </product>
                    </sum>


                    <property>aero/qbar-psf</property>
                    <property>metrics/Sw-sqft</property>
                    <property>metrics/bw-ft</property>
                    <property>aero/bi2vel</property>
                    <property>velocities/p-aero-rad_sec</property>


                    <value>-1.5</value>  <!-- Aeromatic value was -0.15; -->
                </product>
            </function>

            <function name="aero/moment/Roll_yaw">
                <description>Roll moment due to yaw rate</description>
                <product>
                    <property>systems/tie-down-factor</property>
                    <property>aero/qbar-psf</property>
                    <property>metrics/Sw-sqft</property>
                    <property>metrics/bw-ft</property>
                    <property>aero/bi2vel</property>
                    <property>velocities/r-aero-rad_sec</property>
                    <!-- value>0.35</value -->
                    <value>0.35</value>
                    <value>0</value> <!-- testing -->
                    <!-- Spin on stall -->
                        <!-- This seems to provide the main source of spin/rotation for the aircraft
                        when it is stalling. In the abscence of wind tunnel data the numbers are a
                        guess, of course, but it matches well the contemporary description, that if in
                        a sharp turn you tightened up the elevator just a little too much, you would
                        end up in a severe spin. The trick is that the alpha angles less than 20
                        degrees or so (whatever the the stall angle of the wing is) shouldn't produce
                        any spin, especially at low speeds, or landing and takeoff become almost
                        impossible.-->
                    <table>

                        <independentVar lookup="row">aero/alpha-deg</independentVar>
                        <independentVar lookup="column">velocities/vc-kts</independentVar>
                        <tableData>
                                 0   13  28  38  48  70  100   150
                            -45  -1 -2 -3  -2.5   -3   -1.5  -1    -1.5
                            -35  -1 -2 -4  -4  -4  -3 -2    -1.5
                            -30  -1 -2 -4  -4  -4  -3 -2    -1.5
                            -14.5  -1 -2 -3   -3   -3   -2  -1.5  -1
                            -13  0 0   0    0    0    0  0     0
                             0     0 0   0    0    0    0  0     0
                            13   0 0   0    0    0    0  0     0
                            14.5   1  2  3     3    3   2   1.5     1
                            30   1  4  4    4   4  3  2     1.5
                            35   1  4  4    4   4  3  2     1.5
                            45   1  2  3    2.5    3   1.5   1     1.5
                        </tableData>
                    </table>
                </product>
            </function>
            <function name="aero/moment/Roll_aileron">
                <description>Roll moment due to aileron</description>
                <product>
                    <property>systems/tie-down-factor</property>
                    <property>aero/qbar-psf</property>
                    <property>metrics/Sw-sqft</property>
                    <property>metrics/bw-ft</property>
                    <property>fcs/left-aileron-pos-rad</property>
                    <!-- <value>0.921</value> --> <!-- to compensate for Sw-sqft of 212.6948698 vs 231 - most things tuned for 212.7 but now 231 -->
                    <!-- .08 per aeromatic; Camel had relatively ineffective ailerons;  they
                    are large as 'barn doors' but induce tons of drag & adverse yaw. 23 seconds
                    to slow roll - if could even be done at all!
                    I'm taking this to mean that, being far larger in surface area than ailerons in modern plane, they produce quite a bit of roll but perhaps even more of drag and adverse yaw.-->
                    <table>
                        <independentVar>velocities/mach</independentVar>
                        <tableData>
                          0             0.10 <!-- ver 1.6: .14-->
                          2             0.01
                        </tableData>
                    </table>
                    <!-- It became harder & harder to deflect the Camel's
                    ailerons as the speed increased.
                    p. 7: http://assets.cambridge.org/97805218/09924/sample/9780521809924ws.pdf  -->
                   <table>
                        <independentVar>velocities/ve-kts</independentVar>
                        <tableData>
                          0             1
                          70            0.9
                          180           0.3
                          400           0
                        </tableData>
                    </table>
                    <!-- Asymmetric stall; you lose aileron control as stall deepens -->
                    <!-- This is cribbed directly from p51d-jsbsim.xml for now -->
                    <table>
                        <independentVar lookup="row">aero/alpha-deg</independentVar>
                        <tableData>
                        -35    0.05
                        -19    0.3
                        -12    1
                        12     1
                        19     0.3
                        35     0.05
                        </tableData>
                    </table>
                </product>
            </function>
            <function name="aero/moment/Roll_rudder">
                <description>Roll moment due to rudder</description>
                <product>
                    <property>systems/tie-down-factor</property>
                    <property>aero/qbar-psf</property>
                    <property>metrics/Sw-sqft</property>
                    <property>metrics/bw-ft</property>
                    <property>fcs/rudder-pos-rad</property>
                    <!-- <value>0.921</value> --> <!-- to compensate for Sw-sqft of 212.6948698 vs 231 - most things tuned for 212.7 but now 231 -->
                    <!-- Aeromatic 0.01 -->
                    <value>0.01</value>
                </product>
            </function>
            <!--
               Create roll moment with a tendency
               to drop a wing at stall.
               This will help to induce a spin.

               From example/source of the following table (not Sopwith Camel):
               #The positive value at aero/alpha-deg = 10.35
               #is to simulate actual behavior.  The NACA
               #test report on stall behavior says that
               #initially it will drop the right wing and then
               #roll to the left as the stall deepens.
               #this commented out for Camel.

               Camel: The idea of the r-aero-rad-_sec table is to turn the spin in the
               direction the yaw is moving, ie if we're yawing towards the left wing then we drop the left wing.
               The reason is, if you're yawing towards the left wing, then the airspeed of the right wing is faster, thus it produces more lift.  The left wing is going slower, thus less lift.  If we get into a stall situation (thus the involvement of alpha) then the differential can become very important, as the right wing is flying while the left wing is in stall, and generally producing less lift.  Thus a rolling moment.
            -->
           <function name="aero/moment/Roll_Clalpha">
                <description>roll_moment_due_to_yaw_rate_and_alpha</description>
                <product>
                    <property>systems/tie-down-factor</property>
                    <property>aero/qbar-psf</property>
                    <property>metrics/Sw-sqft</property>
                    <property>metrics/bw-ft</property>
                    <value>1</value><!-- set to 0 to disable or 1 to enable -->
                    <value>300</value><!-- ver 1.6a: 400 -->
                    <table>
                        <!-- ver 1.6: <independentVar>velocities/r-aero-rad_sec</independentVar> -->
                        <independentVar>velocities/r-aero-rad_sec</independentVar>
                        <!-- 2.1alpha 9/2023, trying to keep the stall spin going a bit better <tableData>
                          -6             -.01
                          -3.415             -0.5
                          -.02             -1
                          0                  0
                          .02             1
                          3.415             0.5
                          6             0.01

                        </tableData>
                        -->
                        <tableData>
                          -6             -.01
                          -3.415             -0.8
                          -.02             -1
                          0                  0
                          .02             1
                          3.415             0.8
                          6             0.01

                        </tableData>

                    </table>
                    <table>
                        <independentVar lookup="row">aero/alpha-deg</independentVar>
                        <independentVar lookup="column">aero/Re</independentVar>
                        <!-- 2.0 - seems to go into inverted stall too hard/easily (ie, when pushing stick forward rather than pushing back) <tableData>
                                          0  1000000  10000000   20000000
                                 -180.0    0.0    -0.0005   -0.00025   -0.000025
                                 -24.0    0.0    -0.0005   -0.00025   -0.000025
                                 -17.8      0.0    -0.00025 -0.000125 -0.0000125
                                 -11.8      0       0       0         0
                                   0.0    0.0     0.0     0.0       0.0
                                  11.8      0       0       0         0
                                  17.8      0.0     0.00025 0.000125  0.00000125
                                  24      0.0     0.0005  0.00025   0.0000025
                                  180      0.0     0.0005  0.00025   0.0000025
                        </tableData>
                        -->
                        <tableData>
                                          0  1000000  10000000   20000000
                                 -180.0    0.0    -0.0005   -0.00025   -0.000025
                                 -24.0    0.0    -0.00005   -0.000025   -0.000025
                                 -17.8      0.0    -0.000025 -0.0000125 -0.0000125
                                 -11.8      0       0       0         0
                                   0.0    0.0     0.0     0.0       0.0
                                  11.8      0       0       0         0
                                  17.8      0.0     0.00025 0.000125  0.00000125
                                  24      0.0     0.0005  0.00025   0.0000025
                                  180      0.0     0.0005  0.00025   0.0000025
                        </tableData>
                    </table>
                </product>
            </function>


        </axis>
        <axis name="PITCH" unit="LBS*FT">
            <function name="aero/moment/Pitch_alpha">
                <description>Pitch moment due to alpha</description>
                <product>
                    <property>systems/tie-down-factor</property>
                    <property>aero/qbar-psf</property>
                    <property>metrics/Sw-sqft</property>
                    <!-- <value>0.921</value> --> <!-- to compensate for Sw-sqft of 212.6948698 vs 231 - most things tuned for 212.7 but now 231 -->
                    <property>metrics/cbarw-ft</property>
                    <!-- <property>aero/alpha-rad</property> plain alpha-rad is OK for small values, but for larger than abs(1) or so, need sin(alpha-rad) instead-->

                    <table>
                        <independentVar>aero/alpha-rad</independentVar>
                        <tableData>
                          -3.415            -0
                          -3.4              -2.4
                          -.200             -0.2
                          0                  0
                          .2                 0.2
                          3.4                2.4
                          3.415              0
                        </tableData>
                    </table>


                    <!-- <sin>
                        <property>aero/alpha-rad</property>
                    </sin> -->

                    <!-- <value>-0.5</value> orig -->
                    <value>-0.5</value>
                </product>
            </function>

            <function name="aero/moment/Pitch_elevator">
                <description>Pitch moment due to elevator</description>
                <product>
                    <property>systems/tie-down-factor</property>
                    <!-- <property>aero/qbar-psf</property> using induced-psf instead bec it includes a factor for prop wash-->
                    <property>aero/function/qbar-induced-psf</property>
                    <property>metrics/Sw-sqft</property> <!--this is sq footage of wing whereas it would better to start where w/ sq footage of elevator -->
                    <property>metrics/cbarw-ft</property><!-- similarly, we're using wingspan here, Sw-sqft, whereas really we should be using distance to tail? These don't really make any difference in the end bec. we adjust the strength with a factor based on actual flying/behavior below.  But starting with actual moment arm and sq footage of the rudder would be a more reasonable starting point . . . -->
                    <property>fcs/elevator-pos-rad</property>
                    <!-- <value>0.921</value> --> <!-- to compensate for Sw-sqft of 212.6948698 vs 231 - most things tuned for 212.7 but now 231 -->
                    <table>
                        <independentVar>velocities/mach</independentVar>
                        <tableData>
                            <!-- aeromatic original values:
                                        <tableData>
                                          0.0     -1.100
                                          2.0     -0.275
                                        </tableData>
                                  Camel had a powerful and sensitive elevator
                            -->
                            <!-- ver. 1.6 0      -0.32
                            2      -0.1  -->
                            0      -0.5
                            2      -0.15


                        </tableData>
                    </table>

                    <!-- The idea of the following table is to model the force feedback or the
                    idea that as you pull higher & higher Gs you really can't just keep yanking on
                    the controls as hard. They are pulling back harder and harder with back-force
                    or maybe you are just feeling the G forces physically with your body that
                    gives you the feedback to stop yanking on the controls so hard.
                    Load factor is in Gs, http://en.wikipedia.org/wiki/Load_factor_(aeronautics)
                    -->

                    <table>

                        <independentVar>forces/load-factor</independentVar>
                        <tableData>
                            <!-- -.0551 = aeromatic original value; Camel had a powerful and
                            sensitive elevator -->
                           -100     0.01
                            -10     0.2
                             -1     1
                              0     1
                              1     1
                             10     0.2
                            100     0.01

                        </tableData>
                    </table>

                    <!-- Asymmetric stall; you lose elevator control as stall deepens -->
                    <table>
                        <independentVar lookup="row">aero/alpha-deg</independentVar>
                        <!-- <tableData>
                        -50    0.2
                        -24    0.3
                        -17.5    1
                        17.5     1
                        24     0.3
                        50     0.2
                        </tableData>
                        -->
                        <tableData>
                        -50    0.5
                        -24    0.8
                        -17.5    1
                        17.5     1
                        24     0.8
                        50     0.5
                        </tableData>
                    </table>

                </product>
            </function>
            <function name="aero/moment/Pitch_damp">
                <description>Pitch moment due to pitch rate</description>
                <product>
                    <property>systems/tie-down-factor</property>
                    <property>aero/qbar-psf</property>
                    <property>metrics/Sw-sqft</property>
                    <property>metrics/cbarw-ft</property>
                    <property>aero/ci2vel</property>
                    <property>velocities/q-aero-rad_sec</property>

                    <!-- Aeromatic value was -12; this is replaced by the value * table value
                    below, to reduce the damping values for the Camel -->

                    <value>-12</value>   <!-- ver. 1.6: -12 -->

                    <table>
                        <independentVar>velocities/q-aero-rad_sec</independentVar>
                        <tableData>
                          -32.14        0.2
						              -20            0.2  <!-- ver 1.6: 4 -->
                          -2            0.02
						              -1.57         0.07
                          -0.7          0.3
                          -0.25         0.4      <!-- ver 1.6a = .5-->
                          0              .5        <!-- ver. 1.6 = 1.5, 1.6a .75 -->
                          0.25          0.4
                          0.7           0.3
                          1.57          0.07
						              2             0.02
                          20             0.2
						              32.14         0.2
                        </tableData>
                    </table>

                    <!-- orig: <value>-12</value> -->
                    <!-- Camel is pretty poorly damped in most all ways -->
                </product>
            </function>

            <!-- when the tie-down in placed, we want to dampen out pitch, roll, yaw moments rapidly -->
            <!-- this will only be operative when tie-down-factor == 0, ie when all other pitch moments are disabled -->
            <function name="aero/moment/Pitch_damp_tiedown">
                <description>Pitch moment due to pitch rate when tied down</description>
                <product>
                    <sum>
                            <value>1</value>
                            <product>
                                <property>systems/tie-down-factor</property>
                                <value>-1</value>
                            </product>
                    </sum>
                    <property>aero/qbar-psf</property>
                    <property>metrics/Sw-sqft</property>
                    <property>metrics/cbarw-ft</property>
                    <property>aero/ci2vel</property>
                    <property>velocities/q-aero-rad_sec</property>

                    <!-- Aeromatic value was -12; this is replaced by the value * table value
                    below, to reduce the damping values for the Camel -->

                    <value>-5</value>
                </product>
            </function>

            <function name="aero/moment/Pitch_alphadot">
                <description>Pitch moment due to alpha rate</description>
                <product>
                    <property>systems/tie-down-factor</property>
                    <property>aero/qbar-psf</property>
                    <property>metrics/Sw-sqft</property>
                    <property>metrics/cbarw-ft</property>
                    <property>aero/ci2vel</property>
                    <!-- <property>aero/alphadot-rad_sec</property>       -->

                    <!-- If this is allowed to grow unrestricted there are pretty nasty results, at slow speed stalls -->
                    <table>
                        <independentVar>aero/alphadot-rad_sec</independentVar>
                        <tableData>
                          -32.14        -.75

						              -.5         -.5
                          0             0
                          .5          .5
						              32.14         .75
                        </tableData>
                    </table>


                    <value>-7</value>      <!-- was -7 prior to 9/2023, trying to lower it to calm behavior a bit by -3, didn't work, back to -7 -->
                </product>
            </function>

            <!-- "On strafing runs, as soon as the airspeed reaches 130 to 140 mph the nose
            begins to hunt up and down, and the elevator becomes extremely sensitive. I
            feel this action is due largely to the square windshield between the two
            Vickers guns, causing a substantial burble over the tail surfaces."
            We're modeling it here as simply reduced elevator effectiveness starting at
            that speed (130 mph = 0.17 mach) - which may not be the best way. -->

            <function name="aero/moment/Pitch_burble">
                <description>Pitch moment due to burble at high speeds</description>
                <product>
                    <property>systems/tie-down-factor</property>
                     <value> 1200 </value> <!-- ver 1.6: 1200 -->
                     <!-- <abs>
                       <urandom/>
                     </abs>
                     -->
                     <table>
                        <independentVar>velocities/ve-kts</independentVar>
                        <tableData>
                            <!-- -.0551 = aeromatic original value; Camel had a powerful and
                            sensitive elevator -->
                            0      0
                            <!-- "On strafing runs, as soon as the airspeed reaches 130 to 140 mph the nose
                            begins to hunt up and down, and the elevator becomes extremely sensitive. I
                            feel this action is due largely to the square windshield between the two
                            Vickers guns, causing a substantial burble over the tail surfaces."
                            We're modeling it here as simply bumps up/down in pitch starting at
                            that speed (130 mph = 0.196 mach= 113 kts).

                            The idea to do the per speed is as bit kludgy but seems to work pretty well in practice -->

                            112.96688	0
                            113.5432416	-0.5
                            122.7880822	-1.5
                            131.5833607	-1.7
                            140.0558767	-1.4
                            143.5140465	-1.4
                            145.9347654	-1.7
                            146.7993078	-2.7
                            147.6062141	-1.2
                            148.4707566	-1.7
                            149.2776629	1.7
                            152.7358327	6.4
                            161.9576188	8
                            171.1794049	6
                            180.401191	-8
                            189.45032	-7.9
                            198.6721061	8.5
                            207.7212351	7
                            216.9430212	-5.1
                            225.9921502	-5
                            235.2139363	7
                            244.2630653	9.5
                            253.4848514	-9
                            260.401191	-8
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
                            1152.723265	0

                            <!--
                            156.1940024	14
                            156.7703641	1.8
                            157.3467257	20
                            157.9230873	-22
                            158.499449	28.5
                            159.0758106	-39
                            159.6521722	30
                            160.2285339	-32
                            160.8048955	24
                            161.3812571	-25.1
                            161.9576188	24
                            162.5339804	-25.1
                            163.110342	26.4
                            163.6867037	-27.9
                            164.2630653	28.5
                            164.8394269	-39
                            165.4157886	30
                            165.9921502	-32
                            166.5685118	30
                            167.1448735	-32
                            167.7212351	34
                            168.2975967	-35.1
                            168.8739584	36.4
                            169.45032	-37.9
                            170.0266816	38.5
                            170.6030433	-39
                            171.1794049	30
                            171.7557665	36.4
                            172.3321282	-37.9
                            172.9084898	38.5
                            173.4848514	-39
                            174.0612131	30
                            174.6375747	-32
                            175.2139363	40
                            175.790298	-42
                            176.3666596	44
                            176.9430212	-45.1
                            177.5193829	46.4
                            178.0957445	-47.9
                            178.6721061	48.5
                            179.2484678	-49
                            179.8248294	40
                            180.401191	-42
                            1152.723265	0
                            -->

                        </tableData>
                     </table>
                </product>
            </function>


            <!-- This is to compensate for the fact the JSBSim has the direction of the gyroscopic moment from the propellor/engine
            reversed.  However it seems to have some feedback/delay problems of its own so for now we're going to remove it
            and live with the fact that the gyroscopic moment is reversed.

            Later note: This never worked correctly because gyroscopic moment isn't always just in the pitch direction - it can be in ANY direction, depending -->

      			<!-- <function name="aero/moment/Pitch_moment_gyroscopic_jsbsim_correction">
                      <description>This reverses the pitch moment due to the gyrosopic action of the propeller, which JSBSim seems to have reversed</description>
                      <product>
                          <property>moments/m-prop-lbsft</property>
                          <value>-2</value>
                      </product>
            </function>
            -->

        </axis>

        <axis name="YAW" unit="LBS*FT">
            <function name="aero/moment/Yaw_beta">
                <description>Yaw moment due to beta</description>
                <product>
                    <property>systems/tie-down-factor</property>
                    <property>aero/qbar-psf</property>
                    <property>metrics/Sw-sqft</property>
                    <property>metrics/bw-ft</property>
                    <!-- <property>aero/beta-rad</property> plain alpha-rad is OK for small values, but for larger than abs(1) or so, need sin(alpha-rad) instead-->
                    <sin>
                        <property>aero/beta-rad</property>
                    </sin>

                    <!-- <value>0.12</value> orig -->
                    <!-- <value>0.06</value> 1.6 -->
                    <value>0.08</value> <!-- 2.0, was .04 but trying to raise it a bit to help it be a bit more stable. 9/2023 -->
                    <!-- <value>0.921</value> --> <!-- to compensate for Sw-sqft of 212.6948698 vs 231 - most things tuned for 212.7 but now 231 -->
                </product>
            </function>
            <function name="aero/moment/Yaw_damp">
                <description>Yaw moment due to yaw rate</description>
                <product>
                    <property>systems/tie-down-factor</property>
                    <property>aero/qbar-psf</property>
                    <property>metrics/Sw-sqft</property>
                    <property>metrics/bw-ft</property>
                    <property>aero/bi2vel</property>
                    <!-- Aeromatic value was -0.15; this is replaced by the value * table value
                    below, to reduce the damping values for the Camel -->

                    <!-- Camel was sensitive & poorly damped in all directions of motion, particularly in yaw stability, where the pathetically small tail fin doesn't do much and the rudder doesn't do much in terms of damping.  Adjusting this 0-1 adjusts this sensitivity. -->
                    <!-- <value>-0.10</value>  accidentally left this un-remed out and it worked quite well, so  . . . -->
                    <!-- orig: <value>-0.15</value> -->
                    <!-- camel is poorly damped and won't get out of spin/turn automatically if the controls are released.  You have to steer it out. -->
					<!--this tends to damp or *stop* the yaw, thus the negative numbers (the overall effect is always to reduce the amount of yaw moment).
					With the Camel, in certain situations the yaw & roll actually won't damp out (ie, when in a tailspin - if you take your hands off the cdontrols it will
					just keep tailspinning indefinitely, unlike modern aircraft which are designed to naturally recover if you take your hands off the controls);
					this is like having a yaw damp of 0 or close to it.


          The physical interpretation here is: As long as it is going straight
          or with moderate yaw it is stable and yaw tends to damp, but as the spin speeds up it becomes more like just a round ball with less & less resistance to the spin.

          In order to keep a spin that doesn't damp itself out it seems to need yaw AND roll spin & them both to become undamped at some point.

          Also, it seems to be that the spin rates that lead to these un-damped spins should be a fair bit beyond the ability of the ailerons/rudder/elevator to produce in normal flight.  That's why the designers didn't notice & address the problem immediately: Within a certain flight envelope it is all very stable.
          Yaw rate usually produces a moment that reduces yaw (by a small amount).  However when we get into stall, that changes (thus the involvement of alpha).  At stall, the wing we are yawing towards will stall while the other one continues to fly, thus creating a large yaw force in the direction of the yaw movement.

					-->

                    <property>velocities/r-aero-rad_sec</property>
                    <!-- <value>1.9</value>  -->
                    <value>-0.05</value>  <!-- ver 1.8 was -0.05 -->
                    <!-- <value>-0.02</value> -->

                    <!-- <value>0.921</value> --> <!-- to compensate for Sw-sqft of 212.6948698 vs 231 - most things tuned for 212.7 but now 231 -->

                     <!-- this table was a first crack at the idea that yaw rate does not always reduce yaw.  However, let's go with the alpha/stall approach -->
                    <!-- <table>
                        <independentVar>velocities/r-aero-rad_sec</independentVar>
                        <tableData>

                           ; ver 1.7<B></B>:

                          -32.14          0.5
                          -6              0.2
                          -1.75           0.05     ; 1.6c exper: 2.1
                          0               1.5      ; 1.6c exper: 1.0
                          1.75            0.05     ; 1.6c exper: 2.1
                          6               0.2
						              32.14           0.5
                                      -->

                          <!-- ver 1.6a:  -->
                          <!--
                          -32.14        -0.50
                          -4            -0.5
						              -1.25          -0.06
                          -1            -0.003
						              -.97         -0.01
                          -0.7          -0.03
                          -0.25         -0.05
                          -0.1          -0.40
                          0              -0.5
                          0.1           -0.40
                          0.25          -0.05
                          0.7           -0.03
                          .97          -0.01
						              1             -0.003
                          1.25           -0.06
                          4             -.5
						              32.14         -0.5
                           -->
                           <!-- ver 1.7:  -->
                           <!--
                          -32.14        -3.50
                          -4            -0.5
						              -1.25          -0.06
                          -1            -0.003
						              -.97         -0.01
                          -0.7          -0.05
                          -0.25         -0.45
                          -0.1          -0.70
                          0              -0.8
                          0.1           -0.70
                          0.25          -0.45
                          0.7           -0.05
                          .97          -0.01
						              1             -0.003
                          1.25           -0.06
                          4             -.5
						              32.14         -3.5 -->

                          <!--
                          -32.14        -3.50
                          -4            -0.5
						              -1.25          -0.06
                          -1            -0.003
						              -.97          -0.01
                          0              -0.8
                          .97          -0.01
						              1             -0.003
                          1.25           -0.06
                          4             -.5
						              32.14         -3.5
                          -->
                          <!-- ver 1.6b experiment: Less damp right around stability, doesn't really work quite right  -->
                          <!--
                          -32.14        -0.50
                          -4            -0.5
						              -1.25          -0.06
                          -1            -0.003
						              -.97         -0.01
                          -0.7          -0.03
                          -0.25         -0.05
                          -0.01          -0.05
                          0              -0.08
                          0.01           -0.05
                          0.25          -0.05
                          0.7           -0.03
                          .97          -0.01
						              1             -0.003
                          1.25           -0.06
                          4             -.5
						              32.14         -0.5
                          -->
                 <!--
                        </tableData>
                    </table>
                    -->


                    <!--
                    <value>0.2</value>
                    <table>
                        <independentVar>velocities/r-aero-rad_sec</independentVar>
                        <tableData>
                    -32.14	1.607
                    -9	0.27
                    -2	0.006
                    -1.57	0.0157
                    -0.7	0.03
                    -0.25	0.05
                    -0.05	0.2
                    -0.000001	0.5
                    0	0
                    0.000001	-0.5
                    0.05	-0.2
                    0.25	-0.05
                    0.7	-0.03
                    1.57	-0.0157
                    2	-0.006
                    9	-0.27
                    32.14	-1.607

                    </tableData>
                  </table>
                  -->


                  <value>4</value>  <!-- to adjust the table to =1 in the normal flight regime.  Once we enter stall however the effect is greatly increased, as one wing is stalled (massive drag) while the other is still flying (normal low flying drag) -->
                        <table>

                        <!-- the roll/spin during stall is caused by the fact
                        that one wing will stall first, causing drag on that
                        side preferentially, which then causes more yaw,
                        which causes more beta, which further stalls the wing,
                        etc.  Point is, the yaw moment due to rate rate normally dampens yaw but as we get into a stall situation that reverses dramatically.  However, as both wings stall then it evens out again. -->
                        <independentVar>aero/alpha-deg</independentVar>
                        <tableData>
                            -90	0.25
                            -35 0.15
                            -30 0.05
                            -28 -0.05
                            -26 -0.15
                            -24	-0.25
                            -22	-0.35
                            -18	-0.25
                            -14	-0.15
                            -12	-0.05
                            -10	0.05
                            -8	0.15
                            -6	0.25
                            -5  0.25
                            -4	0.25
                            -3	0.25
                            -2	0.25
                            -1	0.25
                            0	0.25
                            1	0.25
                            2	0.25
                            3	0.25
                            4	0.25
                            5	0.25
                            6	0.25
                            8	0.20
                            10	0.15
                            12	0.1
                            14	0.0
                            16	-0.1
                            18	-0.2
                            20	-0.3
                            22  -0.4
                            24  -0.3
                            26  -0.2
                            28 -0.1
                            30  0
                            32  0.05
                            35  0.15
                            90  0.25
                        </tableData>
                    </table>

                </product>
            </function>
            <!-- when the tie-down in placed, we want to dampen out pitch, roll, yaw moments rapidly -->
            <!-- this will only be operative when tie-down-factor == 0, ie when all other pitch moments are disabled -->
            <function name="aero/moment/Yaw_damp_tiedown">
                <description>Yaw moment due to yaw rate</description>
                <product>
                    <sum>
                            <value>1</value>
                            <product>
                                <property>systems/tie-down-factor</property>
                                <value>-1</value>
                            </product>
                    </sum>
                    <property>aero/qbar-psf</property>
                    <property>metrics/Sw-sqft</property>
                    <property>metrics/bw-ft</property>
                    <property>aero/bi2vel</property>
                    <property>velocities/r-aero-rad_sec</property>


                    <value>-0.6</value>  <!-- Aeromatic value was -0.15; -->
                </product>
            </function>
            <function name="aero/moment/Yaw_rudder">
                <description>Yaw moment due to rudder</description>
                <product>
                    <property>systems/tie-down-factor</property>
                    <!-- <property>aero/qbar-psf</property> using induced-psf instead bec it includes a factor for prop wash -->
                    <property>aero/function/qbar-induced-psf</property>
                    <property>metrics/Sw-sqft</property>  <!-- we're using wing area here, Sw-sqft, whereas really we should be using rudder area ? -->
                    <property>metrics/bw-ft</property> <!-- similarly, we're using wingspan here, Sw-sqft, whereas really we should be using distance to tail? These don't really make any difference in the end bec. we adjust the strength with a factor based on actual flying/behavior below.  But starting with actual moment arm and sq footage of the rudder would be a more reasonable starting point . . . -->
                    <property>fcs/rudder-pos-rad</property>
                    <!-- 0.18 - Aeromatic -->
                    <!-- <value>-0.18</value> ver 1.4RC-->
                    <!-- According to a simple calculation (sq ft of rudder/elevator area X distance from CoG) the elevator should have about 2X the effectiveness of the rudder.  This is approx. true for -0.20 here and -1.1 for elevator
                    Two data points on the rudder:
                      - We know that some used FULL RUDDER on takeoff, easing it off after becoming airborne.
                      - We know that both R & L turns at max turn rate used FULL RUDDER.

                      - The rudder was considered rather small and ineffective; consideration was given to increasing its size

                     All these put a rather low bound how on effective the rudder was.

                     Cessna 172 has rudder area 7.43 sq ft, 27ft 2 in in length; Whereas Camel is 4.9 sq ft. X 18ft 6 in in length
                    -->
                    <!-- <value>-0.1</value> -->
                    <value>-0.075</value>  <!--ver 1.6 value .05, ver 1.8 0.075 At takeoff the elevator had fully 10X the authority of the rudder!  So that is probably not realistic.  Perhaps the elevator is too strong & the rudder too weak, and the right value is somewhere in the middle, but rudder should be maybe 1/3 to 1/2 as effective as elevator just based on square footage and geometry?
                    2.0 exper: .3 here req .55 in _damp & didn't allow stall.  -->


                    <!-- <value>-0.10</value> -->  <!--trying this based on Sopwith Camel Calculated article, ver 1.7 -->
                    <!-- it became harder & hard to rudder with speed,
                    due to wind pressure -->
                    <!-- <table>
                        <independentVar>velocities/ve-kts</independentVar>
                        <tableData>
                          0              0
                          50             1
                          105           0.95
                          180           0.5
                          500           0
                        </tableData>
                    </table>
                    -->

                    <!-- <value>0.921</value> --> <!-- to compensate for Sw-sqft of 212.6948698 vs 231 - most things tuned for 212.7 but now 231 -->

                    <!-- Rudder effectiveness lost as soon as tail sets down on landing -->
                    <table>
                        <independentVar lookup="row">aero/alpha-deg</independentVar>
                        <tableData>
                        -90    0.01
                        -20    1
                        12     1
                        14     1    <!-- 0.7 in ver 1.8 - reducing to make takeoff more feasible -->
                        90     0.01
                        </tableData>
                    </table>


                    <!-- Asymmetric stall; you lose rudder as a stall in `` occurs -->
                    <!-- Based p51d-jsbsim.xml -->
                    <table>
                        <independentVar lookup="row">aero/beta-deg</independentVar>
                        <tableData>
                        -180   -.7
                        -90    0.05
                        -22    0.3
                        -17    1
                        17     1
                        22     0.3
                        90     0.05
                        180    -.7
                        </tableData>
                    </table>

                </product>
            </function>
            <function name="aero/moment/Yaw_aileron">

                <!-- Camels large (but ineffective) 'barn door' ailerons produced 'awe-inspiring'
                amounts of adverse yaw and also a great deal of drag. With no rudder correction it falls into a deep
                side-slip with a few seconds.
                http://riseofflight.com/Forum/download/file.php?id=31942&mode=view
                Sopwith Camel replica

                extract from P1lot magazine November 1981

                Engine: Warner Super Scarab

                The rudder and elevator are very light and sensitive while the ailerons are astonishingly heavy, and appear to have practically no effect on anything at all. Heaving the stick from side to side produces a sort of drunken wallowing, like a politician trying to duck out of a commitment. A suspicious glance at the vibrating wings reveals that the ailerons are in fact still connected up -and the sight of them moving sluggishly in the airflow suggests the answer to the conundrum: the Camel has four enormous ailerons, and they are quite simply far too big. Furthermore, they have all the design subtlety of a quartet of barn doors. Frise effect, slotting, balancing, differential -these weren't even words in the aviation dictionary in 1916 when this lady was conceived, if you wanted your aeroplane to roll faster you just made the ailerons bigger. (And then, presumably, wondered why it didn't roll faster ... ) Those huge control surfaces so degrade the airflow over the wings that not only is their primary effect vastly blunted, but at the same time the drag thus engendered is awe-inspiring. Adverse yaw completely overcomes the normal secondary effect of roll, so that if you are so misguided as to take your feet off the Camel's rudder and then bank (say) to the left, the stubby round nose will instantly zap off to the right and keep going.    . . .

                Thus I found that the Camel performed tight little loops, well-behaved spins, good stall-turns, and somewhat ponderous barrel rolls. Slow rolls, however, were something else again. She would just about do it if you insisted, but you had to start at nigh on Vne , use both hands to crank on full aileron -and then wait. And wait. And wait. She took 23 seconds to go round (compared to about six seconds in, say, a Chipmunk), and that 23 seconds felt like a fortnight. After the first 100 degrees or so the engine would pack up and you were left rolling in hideous slow motion with only the howl of the wind in the wires for company. Treading the rudder very gently -for only a touch too much out-roll rudder would be enough to overcome the ailerons and stop the roll altogether, leaving you stuck on your back like some helpless airborne turtle -you finally regained erect flight with perhaps 80 mph left ,whereupon you had to wait several more seconds before the Scarab would cough and splutter and belch and finally struggle back to its normal asthmatic blattering. (In the end I did slow rolls at three or four shows before sanity prevailed and I dropped the exercise as being too hard on both the airframe and the nervous system).
                 http://riseofflight.com/forum/viewtopic.php?f=49&t=30890&start=30
                 -->
                <description>Adverse yaw</description>
                <product>
                    <property>systems/tie-down-factor</property>
                    <property>aero/qbar-psf</property>
                    <property>metrics/Sw-sqft</property>
                    <property>metrics/bw-ft</property>
                    <property>fcs/left-aileron-pos-rad</property>
                    <!-- Aeromatic: -0.01  -.07 is QUITE large ver 1.6a: -0.06-->                   <!-- 2.0gamme: -0.04.  Seems a bit high, so trying -0.03 for 2.0delta.  Also we increased Sw-sqft, which auto-increased this by almost 10%
                    2.1alpha 9/2023 - reducing this sa bit to -0.02-->
                    <value>-0.02</value>
                    <table>
                        <independentVar>velocities/ve-kts</independentVar>
                        <tableData>
                          0             1
                          70            0.9
                          180           0.3
                          400           0
                        </tableData>
                    </table>
                </product>
            </function>

            <!-- This is to compensate for the fact the JSBSim has the direction of the gyroscopic moment from the propellor/engine
            reversed.  However it seems to have some feedback/delay problems of its own so for now we're going to remove it
            and live with the fact that the gyroscopic moment is reversed. -->

     		    <!-- <function name="aero/moment/Yaw_moment_gyroscopic_jsbsim_correction">
                <description>This reverses the yaw moment due to the gyrosopic action of the propeller, which JSBSim seems to have reversed</description>
                <product>
                    <property>moments/n-prop-lbsft</property>
                    <value>-2</value>
                </product>
            </function>
            -->


            <!--
               Create YAW to help drop a wing at stall.
               This will help to induce a spin or a snap
               roll depending on how fast the stall entry
               speed is.
               Which wing is dropped and how hard it
               drops depends on the beta angle.
            -->
           <!-- This is based on p51d-jsbsim.xml, modified to produce better/more realistic results for the Camel -->

           <function name="aero/moment/Yaw_Cnalphabeta">
                <description>Yaw_moment_due_to_alpha-beta</description>
                <product>
                    <property>systems/tie-down-factor</property>
                    <value>1</value> <!-- set to 0 to disable for testing; 1 to enable; disabled for 1.6 - let's try enabling it -->
                    <value> -2.5 </value> <!--ver 1.6: -2.5 -->
                    <property>aero/qbar-psf</property>
                    <property>metrics/Sw-sqft</property>
                    <property>metrics/bw-ft</property>

                    <!-- See Yaw_Cnalphabeta Table worksheet in Camel-JSBSim-calcs.xlsx workshop for the original/editable table -->

                  <table>
                        <independentVar>velocities/p-aero-rad_sec</independentVar>
                       <tableData>
                            -100     1
                            -5       3
                            -3.2       0
                            0        0
                            3.2        0
                            5        3
                            100      1
                        </tableData>
                  </table>


                    <table>
                        <independentVar lookup="row">aero/alpha-deg</independentVar>
                        <independentVar lookup="column">aero/beta-deg</independentVar>
                        <independentVar lookup="table">aero/Re</independentVar>
                        <tableData breakPoint="2500000">

	-50	-5	-2	2.5	6	52
-27	0	0.005	0.003	-0.003	-0.005	0
-15	0	0.005	0.003	-0.003	-0.005	0
-14.7	0	0.005	0.003	-0.003	-0.005	0
-14.3	0	0.005	0.003	-0.003	-0.005	0
-13.9	0	0.005	0.003	-0.003	-0.005	0
-13.4	0	0.005	0.003	-0.003	-0.005	0
-13	0	0	0	0	0	0
0	0	0	0	0	0	0
13	0	0	0	0	0	0
13.5	0	0.001	0.005	-0.005	-0.001	0
14	0	0.0015	0.006	-0.006	-0.0015	0
14.4	0	0.0025	0.008	-0.008	-0.0025	0
14.8	0	0.0035	0.01	-0.01	-0.0035	0
17.5	0	0.005	0.012	-0.012	-0.005	0
19.5	0	0.00625	0.013	-0.013	-0.00625	0
21.5	0	0.0075	0.015	-0.015	-0.0075	0
27	0	0.00125	0.005	-0.005	-0.00125	0
</tableData>
<tableData	breakPoint="5000000">
	-50	-5	-2	2.5	6	52
-27	0	0.005	0.003	-0.003	-0.005	0
-15	0	0.005	0.003	-0.003	-0.005	0
-14.7	0	0.005	0.003	-0.003	-0.005	0
-14.3	0	0.005	0.003	-0.003	-0.005	0
-13.9	0	0.005	0.003	-0.003	-0.005	0
-13.4	0	0.005	0.003	-0.003	-0.005	0
-13	0	0	0	0	0	0
0	0	0	0	0	0	0
13	0	0	0	0	0	0
13.5	0	0.005	0.01	-0.01	-0.005	0
14	0	0.015	0.01	-0.01	-0.015	0
14.4	0	0.02	0.015	-0.015	-0.02	0
14.8	0	0.025	0.02	-0.02	-0.025	0
17.5	0	0.03	0.023	-0.023	-0.03	0
19.5	0	0.04	0.026	-0.026	-0.04	0
21.5	0	0.05	0.03	-0.03	-0.05	0
27	0	0.02	0.01	-0.01	-0.02	0
</tableData>
<tableData	breakPoint="10000000">
	-50	-5	-2	2.5	6	52
-27	0	0.005	0.003	-0.003	-0.005	0
-15	0	0.005	0.003	-0.003	-0.005	0
-14.7	0	0.005	0.003	-0.003	-0.005	0
-14.3	0	0.005	0.003	-0.003	-0.005	0
-13.9	0	0.002	0.001	-0.001	-0.002	0
-13.4	0	0.0005	0.0003	-0.0003	-0.0005	0
-13	0	0	0	0	0	0
0	0	0	0	0	0	0
13	0	0	0	0	0	0
13.5	0	0.002	0.006	-0.006	-0.002	0
14	0	0.005	0.005	-0.005	-0.005	0
14.4	0	0.01	0.01	-0.01	-0.01	0
14.8	0	0.015	0.015	-0.015	-0.015	0
17.5	0	0.03	0.02	-0.02	-0.03	0
19.5	0	0.035	0.025	-0.025	-0.035	0
21.5	0	0.04	0.03	-0.03	-0.04	0
27	0	0.02	0.01	-0.01	-0.02	0
</tableData>
<tableData	breakPoint="20000000">
	-50	-5	-2	2.5	6	52
-27	0	0.005	0.003	-0.003	-0.005	0
-15	0	0.005	0.003	-0.003	-0.005	0
-14.7	0	0.005	0.003	-0.003	-0.005	0
-14.3	0	0.002	0.001	-0.001	-0.002	0
-13.9	0	0.005	0.003	-0.003	-0.005	0
-13.4	0	0.002	0.001	-0.001	-0.002	0
-13	0	0	0	0	0	0
0	0	0	0	0	0	0
13	0	0	0	0	0	0
13.5	0	0	0	0	0	0
14	0	0	0	0	0	0
14.4	0	0	0	0	0	0
14.8	0	0.01	0.01	-0.01	-0.01	0
17.5	0	0.02	0.016	-0.016	-0.02	0
19.5	0	0.03	0.023	-0.023	-0.03	0
21.5	0	0.05	0.03	-0.03	-0.05	0
27	0	0.02	0.01	-0.01	-0.02	0
</tableData>
<tableData	breakPoint="30000000">
	-50	-5	-2	2.5	6	52
-27	0	0.05	0.03	-0.03	-0.05	0
-15	0	0.05	0.03	-0.03	-0.05	0
-14.7	0	0.02	0.01	-0.01	-0.02	0
-14.3	0	0.005	0.003	-0.003	-0.005	0
-13.9	0	0.002	0.001	-0.001	-0.002	0
-13.4	0	0	0	0	0	0
-13	0	0	0	0	0	0
0	0	0	0	0	0	0
13	0	0	0	0	0	0
13.5	0	0	0	0	0	0
14	0	0	0	0	0	0
14.4	0	0	0	0	0	0
14.8	0	0	0	0	0	0
17.5	0	0.01	0.01	-0.01	-0.01	0
19.5	0	0.03	0.02	-0.02	-0.03	0
21.5	0	0.05	0.03	-0.03	-0.05	0
27	0	0.02	0.01	-0.01	-0.02	0
</tableData>
<tableData	breakPoint="40000000">
	-50	-5	-2	2.5	6	52
-27	0	0.05	0.03	-0.03	-0.05	0
-15	0	0.05	0.03	-0.03	-0.05	0
-14.7	0	0.02	0.01	-0.01	-0.02	0
-14.3	0	0.005	0.003	-0.003	-0.005	0
-13.9	0	0.002	0.001	-0.001	-0.002	0
-13.4	0	0	0	0	0	0
-13	0	0	0	0	0	0
0	0	0	0	0	0	0
13	0	0	0	0	0	0
13.5	0	0	0	0	0	0
14	0	0	0	0	0	0
14.4	0	0	0	0	0	0
14.8	0	0	0	0	0	0
17.5	0	0	0	0	0	0
19.5	0	0.03	0.02	-0.02	-0.03	0
21.5	0	0.05	0.03	-0.03	-0.05	0
27	0	0.02	0.01	-0.01	-0.02	0

                        </tableData>
                    </table>


                </product>
            </function>


            <function name="aero/moment/Yaw_roll">
                <description>Yaw moment due to roll rate</description>
                <product>
                    <property>systems/tie-down-factor</property>
                    <property>aero/qbar-psf</property>
                    <property>metrics/Sw-sqft</property>
                    <property>metrics/bw-ft</property>
                    <property>aero/bi2vel</property>
                    <property>velocities/p-aero-rad_sec</property>
                    <!-- value>0.35</value -->
                    <value>0.035</value>
                    <value>1</value> <!-- testing -->
                    <!-- Spin on stall -->
                        <!-- This seems to provide the main source of spin/rotation for the aircraft
                        when it is stalling. In the abscence of wind tunnel data the numbers are a
                        guess, of course, but it matches well the contemporary description, that if in
                        a sharp turn you tightened up the elevator just a little too much, you would
                        end up in a severe spin. The trick is that the alpha angles less than 20
                        degrees or so (whatever the the stall angle of the wing is) shouldn't produce
                        any spin, especially at low speeds, or landing and takeoff become almost
                        impossible.-->
                    <table>

                        <independentVar lookup="row">aero/alpha-deg</independentVar>
                        <independentVar lookup="column">velocities/vc-kts</independentVar>
                        <tableData>
                                 0   13  28  38  48  70  100   150
                            -45  -1 -2 -3  -2.5   -3   -1.5  -1    -1.5
                            -35  -1 -2 -4  -4  -4  -3 -2    -1.5
                            -30  -1 -2 -4  -4  -4  -3 -2    -1.5
                            -14.5  -1 -2 -3   -3   -3   -2  -1.5  -1
                            -13  0 0   0    0    0    0  0     0
                             0     0 0   0    0    0    0  0     0
                            13   0 0   0    0    0    0  0     0
                            14.5   1  2  3     3    3   2   1.5     1
                            30   1  4  4    4   4  3  2     1.5
                            35   1  4  4    4   4  3  2     1.5
                            45   1  2  3    2.5    3   1.5   1     1.5
                        </tableData>
                    </table>
                </product>
            </function>


        </axis>
    </aerodynamics>

	<!-- <output name="JSBout.csv" type="CSV" rate="100">
        <simulation> ON </simulation>
        <atmosphere> ON </atmosphere>
        <massprops> ON </massprops>
        <aerosurfaces> ON </aerosurfaces>
        <rates> ON </rates>
        <velocities> ON </velocities>
        <forces> ON </forces>
        <moments> ON </moments>
        <position> ON </position>
        <coefficients> ON </coefficients>
        <ground_reactions> ON </ground_reactions>
        <fcs> ON </fcs>
        <propulsion> ON </propulsion>
    </output>
	-->
</fdm_config>
